// SBML level 3 version 1

model mw8a4ca32c_dea1_493b_acec_2cc45ea812c5_A0()
  // mix_of_E30VNPRL_E30VNPRL_gene_expression
  // model units - substance: substance, time: second, volume: volume, area: area, length: metre, extent: substance

  // Compartments:
  compartment cell = 1 volume;

  // Species:
  species mw497388cd_7f56_4af2_bfcb_e196dc07058a_A0 in cell = 100.0001/cell; mw497388cd_7f56_4af2_bfcb_e196dc07058a_A0 is "RNAP";
  species mw00f45716_be42_4897_b864_a105290636f8_A0 in cell = 30.00002/cell; mw00f45716_be42_4897_b864_a105290636f8_A0 is "Ribo";
  species mwfd140f3c_03f1_4f0c_8212_e52be5e321fb_A0 in cell = 5.000003/cell; mwfd140f3c_03f1_4f0c_8212_e52be5e321fb_A0 is "RecBCD";
  species mw9dcce971_94dd_43cc_a416_f9c5b92b7ea9_A0 in cell = 100.0001/cell; mw9dcce971_94dd_43cc_a416_f9c5b92b7ea9_A0 is "RNase";
  species mw11e10894_8a40_4b9a_a399_a74704855a0c_A0 in cell = 3180048/cell; mw11e10894_8a40_4b9a_a399_a74704855a0c_A0 is "AGTP";
  species mw32c91943_802e_414d_b5d0_ec55344d6143_A0 in cell = 1908029/cell; mw32c91943_802e_414d_b5d0_ec55344d6143_A0 is "CUTP";
  species mw1abcc808_a59f_467d_b71b_421398c97d74_A0 in cell = 3.180048e7/cell; mw1abcc808_a59f_467d_b71b_421398c97d74_A0 is "AA";
  species mwece12cb0_788c_4d80_aacb_158afc63be78_A0 in cell = 0; mwece12cb0_788c_4d80_aacb_158afc63be78_A0 is "protein deGFP";
  species mw4c49a944_cb18_4848_9df8_d269a16a522f_A0 in cell = 0; mw4c49a944_cb18_4848_9df8_d269a16a522f_A0 is "protein deGFP*";
  species mw13299012_9d61_4da1_9237_576f460c5bc3_A0 in cell = 0; mw13299012_9d61_4da1_9237_576f460c5bc3_A0 is "RNA utr1--deGFP";
  species mwa63b6bc2_3062_4276_906a_bec4375fd6f1_A0 in cell = 0; mwa63b6bc2_3062_4276_906a_bec4375fd6f1_A0 is "Ribo:RNA utr1--deGFP";
  species mw3720c25e_5f8d_4e8a_aa0c_2107880eedbe_A0 in cell = 2.000001/cell; mw3720c25e_5f8d_4e8a_aa0c_2107880eedbe_A0 is "DNA p28_ptet--utr1--deGFP";
  species mw5576dd43_d1a5_4349_963e_08d3372d976a_A0 in cell = 0; mw5576dd43_d1a5_4349_963e_08d3372d976a_A0 is "RNAP28";
  species mw9e0e02a5_500c_4c07_ae7f_25e3954419dd_A0 in cell = 0; mw9e0e02a5_500c_4c07_ae7f_25e3954419dd_A0 is "RNAP28:DNA p28_ptet--utr1--deGFP";
  species mw877dd876_63c5_4801_b778_351a377ac9de_A0 in cell = 0; mw877dd876_63c5_4801_b778_351a377ac9de_A0 is "protein sigma28";
  species mw10646eba_6639_4f41_8c69_c8836c5a7a15_A0 in cell = 0; mw10646eba_6639_4f41_8c69_c8836c5a7a15_A0 is "protein tetRdimer";
  species mwbf810b4c_29dd_4ee3_866c_269d7f98d18d_A0 in cell = 0; mwbf810b4c_29dd_4ee3_866c_269d7f98d18d_A0 is "CUTP:AGTP:RNAP28:DNA p28_ptet--utr1--deGFP";
  species mwcd4b43b7_65f5_4293_9bc2_bfd759c68d4c_A0 in cell = 0; mwcd4b43b7_65f5_4293_9bc2_bfd759c68d4c_A0 is "term_RNAP28:DNA p28_ptet--utr1--deGFP";
  species mweed2e9a7_0ff6_464c_ac3e_a15d4839d990_A0 in cell = 0; mweed2e9a7_0ff6_464c_ac3e_a15d4839d990_A0 is "RNAP28:DNA p28_ptet--utr1--deGFP:protein tetRdimer";
  species mw8a82a795_8fd6_4c99_826c_eb4192ff970a_A0 in cell = 0; mw8a82a795_8fd6_4c99_826c_eb4192ff970a_A0 is "CUTP:AGTP:RNAP28:DNA p28_ptet--utr1--deGFP:protein tetRdimer";
  species mw96c7bbf2_2143_48e3_92dc_3e94c3a5b59d_A0 in cell = 0; mw96c7bbf2_2143_48e3_92dc_3e94c3a5b59d_A0 is "term_RNAP28:DNA p28_ptet--utr1--deGFP:protein tetRdimer";
  species mwc8688555_e588_4ad9_9e55_f053892bfbf5_A0 in cell = 0; mwc8688555_e588_4ad9_9e55_f053892bfbf5_A0 is "AA:2AGTP:Ribo:RNA utr1--deGFP";
  species mw4976d02d_0642_4ab4_86ba_3cd5bf362bdc_A0 in cell = 0; mw4976d02d_0642_4ab4_86ba_3cd5bf362bdc_A0 is "term_Ribo:RNA utr1--deGFP";
  species mwfaa4de1c_e7a5_41cd_aa6c_26d34f2c1c0d_A0 in cell = 0; mwfaa4de1c_e7a5_41cd_aa6c_26d34f2c1c0d_A0 is "DNA p28_ptet--utr1--deGFP:protein tetRdimer";
  species mwffe28a9c_4ffe_40ae_acff_4b428ced7051_A0 in cell = 0; mwffe28a9c_4ffe_40ae_acff_4b428ced7051_A0 is "AGTP:RNAP28:DNA p28_ptet--utr1--deGFP";
  species mwf7e77d9f_bb65_4836_b45f_f3af4e3f6358_A0 in cell = 0; mwf7e77d9f_bb65_4836_b45f_f3af4e3f6358_A0 is "CUTP:RNAP28:DNA p28_ptet--utr1--deGFP";
  species mw9a0110d7_1397_4305_80a5_1a5a401d89e6_A0 in cell = 0; mw9a0110d7_1397_4305_80a5_1a5a401d89e6_A0 is "AGTP:RNAP28:DNA p28_ptet--utr1--deGFP:protein tetRdimer";
  species mw06b37943_9d2f_46cd_bc30_fa8d4c06a00b_A0 in cell = 0; mw06b37943_9d2f_46cd_bc30_fa8d4c06a00b_A0 is "CUTP:RNAP28:DNA p28_ptet--utr1--deGFP:protein tetRdimer";
  species mw9c4d2b72_7efb_42ac_9af0_2b6e68621f73_A0 in cell = 0; mw9c4d2b72_7efb_42ac_9af0_2b6e68621f73_A0 is "AA:Ribo:RNA utr1--deGFP";
  species mwf167ff93_6af9_4ad3_be9e_dfc18aaf6a7d_A0 in cell = 0; mwf167ff93_6af9_4ad3_be9e_dfc18aaf6a7d_A0 is "RNA utr1--deGFP:RNase";
  species mwd4d5d75f_2cfe_4a16_b934_d2513bb1aaea_A0 in cell = 0; mwd4d5d75f_2cfe_4a16_b934_d2513bb1aaea_A0 is "Ribo:RNA utr1--deGFP:RNase";
  species mwdc093847_c1af_4016_aad3_e2c57c50d317_A0 in cell = 0; mwdc093847_c1af_4016_aad3_e2c57c50d317_A0 is "AA:2AGTP:Ribo:RNA utr1--deGFP:RNase";
  species mw364eef4c_8431_467d_bd97_6172b02b980b_A0 in cell = 0; mw364eef4c_8431_467d_bd97_6172b02b980b_A0 is "term_Ribo:RNA utr1--deGFP:RNase";
  species mwb7433d67_6138_489c_b6ac_9fc9b22bbfcf_A0 in cell = 0; mwb7433d67_6138_489c_b6ac_9fc9b22bbfcf_A0 is "AA:Ribo:RNA utr1--deGFP:RNase";
  species mw17310191_3888_4d94_a11e_856eb88960c6_A0 in cell = 0; mw17310191_3888_4d94_a11e_856eb88960c6_A0 is "AGTP_USED";

  // Parameters:
  mw1b3c7b9e_a9ce_4463_ac55_43201909284a_A0 = 0; mw1b3c7b9e_a9ce_4463_ac55_43201909284a_A0 is "AGTPdeg_F";

  // Reactions:
  mw0a08d853_359c_4508_8dce_33caa778923d_A0: mw497388cd_7f56_4af2_bfcb_e196dc07058a_A0 + mw877dd876_63c5_4801_b778_351a377ac9de_A0 -> mw5576dd43_d1a5_4349_963e_08d3372d976a_A0; Sigma28_RNAP_F*mw497388cd_7f56_4af2_bfcb_e196dc07058a_A0*mw877dd876_63c5_4801_b778_351a377ac9de_A0 - Sigma28_RNAP_R*mw5576dd43_d1a5_4349_963e_08d3372d976a_A0;
    Sigma28_RNAP_F = 100; Sigma28_RNAP_R = 0.1;
  mwb826ae13_af34_44fd_ade0_d4025e755600_A0: mwece12cb0_788c_4d80_aacb_158afc63be78_A0 => mw4c49a944_cb18_4848_9df8_d269a16a522f_A0; TXTL_PROT_deGFP_MATURATION*mwece12cb0_788c_4d80_aacb_158afc63be78_A0;
    TXTL_PROT_deGFP_MATURATION = 0.002310491;
  mw4e259b17_31f6_4d5d_9a07_5802a83a9558_A0: mw13299012_9d61_4da1_9237_576f460c5bc3_A0 + mw00f45716_be42_4897_b864_a105290636f8_A0 -> mwa63b6bc2_3062_4276_906a_bec4375fd6f1_A0; TXTL_UTR_UTR1_F*mw13299012_9d61_4da1_9237_576f460c5bc3_A0*mw00f45716_be42_4897_b864_a105290636f8_A0 - TXTL_UTR_UTR1_R*mwa63b6bc2_3062_4276_906a_bec4375fd6f1_A0;
    TXTL_UTR_UTR1_F = 0.2; TXTL_UTR_UTR1_R = 4;
  mw5e660db8_c87a_4d3e_b33a_5cad41468e67_A0: mw3720c25e_5f8d_4e8a_aa0c_2107880eedbe_A0 + mw5576dd43_d1a5_4349_963e_08d3372d976a_A0 -> mw9e0e02a5_500c_4c07_ae7f_25e3954419dd_A0; TXTL_PTET_RNAPbound_F*mw3720c25e_5f8d_4e8a_aa0c_2107880eedbe_A0*mw5576dd43_d1a5_4349_963e_08d3372d976a_A0 - TXTL_PTET_RNAPbound_R*mw9e0e02a5_500c_4c07_ae7f_25e3954419dd_A0;
    TXTL_PTET_RNAPbound_F = 0.006; TXTL_PTET_RNAPbound_R = 5;
  mw1d0af278_3a84_4c03_b6a0_ccd65ec5c56a_A0: mw3720c25e_5f8d_4e8a_aa0c_2107880eedbe_A0 + mw10646eba_6639_4f41_8c69_c8836c5a7a15_A0 -> mwfaa4de1c_e7a5_41cd_aa6c_26d34f2c1c0d_A0; mw1d0af278_3a84_4c03_b6a0_ccd65ec5c56a_A0_kf*mw3720c25e_5f8d_4e8a_aa0c_2107880eedbe_A0*mw10646eba_6639_4f41_8c69_c8836c5a7a15_A0 - mw1d0af278_3a84_4c03_b6a0_ccd65ec5c56a_A0_kr*mwfaa4de1c_e7a5_41cd_aa6c_26d34f2c1c0d_A0;
    mw1d0af278_3a84_4c03_b6a0_ccd65ec5c56a_A0_kf = 0.00286; mw1d0af278_3a84_4c03_b6a0_ccd65ec5c56a_A0_kr = 1.1e-5;
  mwb226f3b4_0150_4f36_82e3_fc6baeee6578_A0: mw9e0e02a5_500c_4c07_ae7f_25e3954419dd_A0 + mw10646eba_6639_4f41_8c69_c8836c5a7a15_A0 -> mweed2e9a7_0ff6_464c_ac3e_a15d4839d990_A0; mwb226f3b4_0150_4f36_82e3_fc6baeee6578_A0_kf*mw9e0e02a5_500c_4c07_ae7f_25e3954419dd_A0*mw10646eba_6639_4f41_8c69_c8836c5a7a15_A0 - mwb226f3b4_0150_4f36_82e3_fc6baeee6578_A0_kr*mweed2e9a7_0ff6_464c_ac3e_a15d4839d990_A0;
    mwb226f3b4_0150_4f36_82e3_fc6baeee6578_A0_kf = 0.00286; mwb226f3b4_0150_4f36_82e3_fc6baeee6578_A0_kr = 1.1e-5;
  mw3a0330c9_38e6_448c_86a2_19b3bbf924f9_A0: mwfaa4de1c_e7a5_41cd_aa6c_26d34f2c1c0d_A0 + mw5576dd43_d1a5_4349_963e_08d3372d976a_A0 -> mweed2e9a7_0ff6_464c_ac3e_a15d4839d990_A0; mw3a0330c9_38e6_448c_86a2_19b3bbf924f9_A0_kf*mwfaa4de1c_e7a5_41cd_aa6c_26d34f2c1c0d_A0*mw5576dd43_d1a5_4349_963e_08d3372d976a_A0 - mw3a0330c9_38e6_448c_86a2_19b3bbf924f9_A0_kr*mweed2e9a7_0ff6_464c_ac3e_a15d4839d990_A0;
    mw3a0330c9_38e6_448c_86a2_19b3bbf924f9_A0_kf = 0.006; mw3a0330c9_38e6_448c_86a2_19b3bbf924f9_A0_kr = 5000;
  mwbce29f24_c47f_4800_9399_a0f3b4154d06_A0: mwbf810b4c_29dd_4ee3_866c_269d7f98d18d_A0 => mw9e0e02a5_500c_4c07_ae7f_25e3954419dd_A0; mwbce29f24_c47f_4800_9399_a0f3b4154d06_A0_TXTL_NTP_consumption*mwbf810b4c_29dd_4ee3_866c_269d7f98d18d_A0;
    mwbce29f24_c47f_4800_9399_a0f3b4154d06_A0_TXTL_NTP_consumption = 0.7485294;
  mw99937676_2d2d_4e0f_8be4_9eaa0a02f039_A0: mwcd4b43b7_65f5_4293_9bc2_bfd759c68d4c_A0 => mw5576dd43_d1a5_4349_963e_08d3372d976a_A0 + mw3720c25e_5f8d_4e8a_aa0c_2107880eedbe_A0; mw99937676_2d2d_4e0f_8be4_9eaa0a02f039_A0_TXTL_RNAPBOUND_TERMINATION_RATE*mwcd4b43b7_65f5_4293_9bc2_bfd759c68d4c_A0;
    mw99937676_2d2d_4e0f_8be4_9eaa0a02f039_A0_TXTL_RNAPBOUND_TERMINATION_RATE = 0.05;
  mwa58b0bb6_364f_41b0_adce_57107d010840_A0: mw9e0e02a5_500c_4c07_ae7f_25e3954419dd_A0 + mw11e10894_8a40_4b9a_a399_a74704855a0c_A0 -> mwffe28a9c_4ffe_40ae_acff_4b428ced7051_A0; mwa58b0bb6_364f_41b0_adce_57107d010840_A0_TXTL_NTP_RNAP_F*mw9e0e02a5_500c_4c07_ae7f_25e3954419dd_A0*mw11e10894_8a40_4b9a_a399_a74704855a0c_A0 - mwa58b0bb6_364f_41b0_adce_57107d010840_A0_TXTL_NTP_RNAP_R*mwffe28a9c_4ffe_40ae_acff_4b428ced7051_A0;
    mwa58b0bb6_364f_41b0_adce_57107d010840_A0_TXTL_NTP_RNAP_F = 1000; mwa58b0bb6_364f_41b0_adce_57107d010840_A0_TXTL_NTP_RNAP_R = 120000000;
  mw389cab2a_ea10_43e4_9b57_6b9ee6eae934_A0: mw9e0e02a5_500c_4c07_ae7f_25e3954419dd_A0 + mw32c91943_802e_414d_b5d0_ec55344d6143_A0 -> mwf7e77d9f_bb65_4836_b45f_f3af4e3f6358_A0; mw389cab2a_ea10_43e4_9b57_6b9ee6eae934_A0_TXTL_NTP_RNAP_F*mw9e0e02a5_500c_4c07_ae7f_25e3954419dd_A0*mw32c91943_802e_414d_b5d0_ec55344d6143_A0 - mw389cab2a_ea10_43e4_9b57_6b9ee6eae934_A0_TXTL_NTP_RNAP_R*mwf7e77d9f_bb65_4836_b45f_f3af4e3f6358_A0;
    mw389cab2a_ea10_43e4_9b57_6b9ee6eae934_A0_TXTL_NTP_RNAP_F = 1000; mw389cab2a_ea10_43e4_9b57_6b9ee6eae934_A0_TXTL_NTP_RNAP_R = 120000000;
  mwdbb0ca87_b20a_4730_b514_642cc9dd12ea_A0: mwffe28a9c_4ffe_40ae_acff_4b428ced7051_A0 + mw32c91943_802e_414d_b5d0_ec55344d6143_A0 -> mwbf810b4c_29dd_4ee3_866c_269d7f98d18d_A0; mwdbb0ca87_b20a_4730_b514_642cc9dd12ea_A0_TXTL_NTP_RNAP_F*mwffe28a9c_4ffe_40ae_acff_4b428ced7051_A0*mw32c91943_802e_414d_b5d0_ec55344d6143_A0 - mwdbb0ca87_b20a_4730_b514_642cc9dd12ea_A0_TXTL_NTP_RNAP_R*mwbf810b4c_29dd_4ee3_866c_269d7f98d18d_A0;
    mwdbb0ca87_b20a_4730_b514_642cc9dd12ea_A0_TXTL_NTP_RNAP_F = 1; mwdbb0ca87_b20a_4730_b514_642cc9dd12ea_A0_TXTL_NTP_RNAP_R = 120000;
  mw6cf8dd26_07e0_4022_a023_d17c1b403051_A0: mwf7e77d9f_bb65_4836_b45f_f3af4e3f6358_A0 + mw11e10894_8a40_4b9a_a399_a74704855a0c_A0 -> mwbf810b4c_29dd_4ee3_866c_269d7f98d18d_A0; mw6cf8dd26_07e0_4022_a023_d17c1b403051_A0_TXTL_NTP_RNAP_F*mwf7e77d9f_bb65_4836_b45f_f3af4e3f6358_A0*mw11e10894_8a40_4b9a_a399_a74704855a0c_A0 - mw6cf8dd26_07e0_4022_a023_d17c1b403051_A0_TXTL_NTP_RNAP_R*mwbf810b4c_29dd_4ee3_866c_269d7f98d18d_A0;
    mw6cf8dd26_07e0_4022_a023_d17c1b403051_A0_TXTL_NTP_RNAP_F = 1; mw6cf8dd26_07e0_4022_a023_d17c1b403051_A0_TXTL_NTP_RNAP_R = 120000;
  mwc0ea753d_a308_4b08_a809_2d8690813b0b_A0: mwbf810b4c_29dd_4ee3_866c_269d7f98d18d_A0 => mwcd4b43b7_65f5_4293_9bc2_bfd759c68d4c_A0 + mw13299012_9d61_4da1_9237_576f460c5bc3_A0; mwc0ea753d_a308_4b08_a809_2d8690813b0b_A0_TXTL_transcription_rate1*mwbf810b4c_29dd_4ee3_866c_269d7f98d18d_A0;
    mwc0ea753d_a308_4b08_a809_2d8690813b0b_A0_TXTL_transcription_rate1 = 0.001470588;
  mw25b6ecab_5863_4f7d_8acc_f3add485106b_A0: mw8a82a795_8fd6_4c99_826c_eb4192ff970a_A0 => mweed2e9a7_0ff6_464c_ac3e_a15d4839d990_A0; mw25b6ecab_5863_4f7d_8acc_f3add485106b_A0_TXTL_NTP_consumption*mw8a82a795_8fd6_4c99_826c_eb4192ff970a_A0;
    mw25b6ecab_5863_4f7d_8acc_f3add485106b_A0_TXTL_NTP_consumption = 0.7485294;
  mwcc41b823_a82c_470c_b69b_5914d806713a_A0: mw96c7bbf2_2143_48e3_92dc_3e94c3a5b59d_A0 => mw5576dd43_d1a5_4349_963e_08d3372d976a_A0 + mw3720c25e_5f8d_4e8a_aa0c_2107880eedbe_A0 + mw10646eba_6639_4f41_8c69_c8836c5a7a15_A0; mwcc41b823_a82c_470c_b69b_5914d806713a_A0_TXTL_RNAPBOUND_TERMINATION_RATE*mw96c7bbf2_2143_48e3_92dc_3e94c3a5b59d_A0;
    mwcc41b823_a82c_470c_b69b_5914d806713a_A0_TXTL_RNAPBOUND_TERMINATION_RATE = 0.05;
  mw0c645f14_70bd_4ac9_a34b_57d69b40bd1c_A0: mweed2e9a7_0ff6_464c_ac3e_a15d4839d990_A0 + mw11e10894_8a40_4b9a_a399_a74704855a0c_A0 -> mw9a0110d7_1397_4305_80a5_1a5a401d89e6_A0; mw0c645f14_70bd_4ac9_a34b_57d69b40bd1c_A0_TXTL_NTP_RNAP_F*mweed2e9a7_0ff6_464c_ac3e_a15d4839d990_A0*mw11e10894_8a40_4b9a_a399_a74704855a0c_A0 - mw0c645f14_70bd_4ac9_a34b_57d69b40bd1c_A0_TXTL_NTP_RNAP_R*mw9a0110d7_1397_4305_80a5_1a5a401d89e6_A0;
    mw0c645f14_70bd_4ac9_a34b_57d69b40bd1c_A0_TXTL_NTP_RNAP_F = 1000; mw0c645f14_70bd_4ac9_a34b_57d69b40bd1c_A0_TXTL_NTP_RNAP_R = 120000000;
  mw2c78c231_79d4_482e_9d21_6009be23ee7d_A0: mweed2e9a7_0ff6_464c_ac3e_a15d4839d990_A0 + mw32c91943_802e_414d_b5d0_ec55344d6143_A0 -> mw06b37943_9d2f_46cd_bc30_fa8d4c06a00b_A0; mw2c78c231_79d4_482e_9d21_6009be23ee7d_A0_TXTL_NTP_RNAP_F*mweed2e9a7_0ff6_464c_ac3e_a15d4839d990_A0*mw32c91943_802e_414d_b5d0_ec55344d6143_A0 - mw2c78c231_79d4_482e_9d21_6009be23ee7d_A0_TXTL_NTP_RNAP_R*mw06b37943_9d2f_46cd_bc30_fa8d4c06a00b_A0;
    mw2c78c231_79d4_482e_9d21_6009be23ee7d_A0_TXTL_NTP_RNAP_F = 1000; mw2c78c231_79d4_482e_9d21_6009be23ee7d_A0_TXTL_NTP_RNAP_R = 120000000;
  mw4830e99c_cb87_41e9_ab86_8bc1a94f88b9_A0: mw9a0110d7_1397_4305_80a5_1a5a401d89e6_A0 + mw32c91943_802e_414d_b5d0_ec55344d6143_A0 -> mw8a82a795_8fd6_4c99_826c_eb4192ff970a_A0; mw4830e99c_cb87_41e9_ab86_8bc1a94f88b9_A0_TXTL_NTP_RNAP_F*mw9a0110d7_1397_4305_80a5_1a5a401d89e6_A0*mw32c91943_802e_414d_b5d0_ec55344d6143_A0 - mw4830e99c_cb87_41e9_ab86_8bc1a94f88b9_A0_TXTL_NTP_RNAP_R*mw8a82a795_8fd6_4c99_826c_eb4192ff970a_A0;
    mw4830e99c_cb87_41e9_ab86_8bc1a94f88b9_A0_TXTL_NTP_RNAP_F = 1; mw4830e99c_cb87_41e9_ab86_8bc1a94f88b9_A0_TXTL_NTP_RNAP_R = 120000;
  mwfc39e85f_5618_4099_afc8_68a351e70c60_A0: mw06b37943_9d2f_46cd_bc30_fa8d4c06a00b_A0 + mw11e10894_8a40_4b9a_a399_a74704855a0c_A0 -> mw8a82a795_8fd6_4c99_826c_eb4192ff970a_A0; mwfc39e85f_5618_4099_afc8_68a351e70c60_A0_TXTL_NTP_RNAP_F*mw06b37943_9d2f_46cd_bc30_fa8d4c06a00b_A0*mw11e10894_8a40_4b9a_a399_a74704855a0c_A0 - mwfc39e85f_5618_4099_afc8_68a351e70c60_A0_TXTL_NTP_RNAP_R*mw8a82a795_8fd6_4c99_826c_eb4192ff970a_A0;
    mwfc39e85f_5618_4099_afc8_68a351e70c60_A0_TXTL_NTP_RNAP_F = 1; mwfc39e85f_5618_4099_afc8_68a351e70c60_A0_TXTL_NTP_RNAP_R = 120000;
  mw268adbb5_7e00_4466_bc26_d5a0bf80ac26_A0: mw8a82a795_8fd6_4c99_826c_eb4192ff970a_A0 => mw96c7bbf2_2143_48e3_92dc_3e94c3a5b59d_A0 + mw13299012_9d61_4da1_9237_576f460c5bc3_A0; mw268adbb5_7e00_4466_bc26_d5a0bf80ac26_A0_TXTL_transcription_rate1*mw8a82a795_8fd6_4c99_826c_eb4192ff970a_A0;
    mw268adbb5_7e00_4466_bc26_d5a0bf80ac26_A0_TXTL_transcription_rate1 = 0.001470588;
  mwed4a8a70_8ccc_408a_8ad6_c846d8bf66c5_A0: mwa63b6bc2_3062_4276_906a_bec4375fd6f1_A0 + mw1abcc808_a59f_467d_b71b_421398c97d74_A0 -> mw9c4d2b72_7efb_42ac_9af0_2b6e68621f73_A0; TL_AA_F*mwa63b6bc2_3062_4276_906a_bec4375fd6f1_A0*mw1abcc808_a59f_467d_b71b_421398c97d74_A0 - TL_AA_R*mw9c4d2b72_7efb_42ac_9af0_2b6e68621f73_A0;
    TL_AA_F = 300; TL_AA_R = 0.1;
  mwb411cb34_ff07_42df_89f1_5d92ab109d51_A0: mw9c4d2b72_7efb_42ac_9af0_2b6e68621f73_A0 + 2 mw11e10894_8a40_4b9a_a399_a74704855a0c_A0 -> mwc8688555_e588_4ad9_9e55_f053892bfbf5_A0; TL_AGTP_F*mw9c4d2b72_7efb_42ac_9af0_2b6e68621f73_A0*mw11e10894_8a40_4b9a_a399_a74704855a0c_A0^2 - TL_AGTP_R*mwc8688555_e588_4ad9_9e55_f053892bfbf5_A0;
    TL_AGTP_F = 30; TL_AGTP_R = 10;
  mwd0af282d_83c3_40cd_800e_f453cdb9e847_A0: mwc8688555_e588_4ad9_9e55_f053892bfbf5_A0 => mw4976d02d_0642_4ab4_86ba_3cd5bf362bdc_A0; TXTL_TL_AA_consumption*mwc8688555_e588_4ad9_9e55_f053892bfbf5_A0;
    TXTL_TL_AA_consumption = 0.024;
  mw0eaaccee_8210_4ed2_93ad_f7662cdae48f_A0: mwc8688555_e588_4ad9_9e55_f053892bfbf5_A0 => mw4976d02d_0642_4ab4_86ba_3cd5bf362bdc_A0 + mwece12cb0_788c_4d80_aacb_158afc63be78_A0; TXTL_TL_rate*mwc8688555_e588_4ad9_9e55_f053892bfbf5_A0;
    TXTL_TL_rate = 0.012;
  mw142a4aaa_3a3b_40ae_bade_7f74d66bb616_A0: mw4976d02d_0642_4ab4_86ba_3cd5bf362bdc_A0 => mw13299012_9d61_4da1_9237_576f460c5bc3_A0 + mw00f45716_be42_4897_b864_a105290636f8_A0; TXTL_RIBOBOUND_TERMINATION_RATE*mw4976d02d_0642_4ab4_86ba_3cd5bf362bdc_A0;
    TXTL_RIBOBOUND_TERMINATION_RATE = 50;
  mwd86dad3b_9d80_4444_9602_47053ad59fb9_A0: mw13299012_9d61_4da1_9237_576f460c5bc3_A0 + mw9dcce971_94dd_43cc_a416_f9c5b92b7ea9_A0 -> mwf167ff93_6af9_4ad3_be9e_dfc18aaf6a7d_A0; mwd86dad3b_9d80_4444_9602_47053ad59fb9_A0_TXTL_RNAdeg_F*mw13299012_9d61_4da1_9237_576f460c5bc3_A0*mw9dcce971_94dd_43cc_a416_f9c5b92b7ea9_A0 - mwd86dad3b_9d80_4444_9602_47053ad59fb9_A0_TXTL_RNAdeg_R*mwf167ff93_6af9_4ad3_be9e_dfc18aaf6a7d_A0;
    mwd86dad3b_9d80_4444_9602_47053ad59fb9_A0_TXTL_RNAdeg_F = 10; mwd86dad3b_9d80_4444_9602_47053ad59fb9_A0_TXTL_RNAdeg_R = 2000;
  mw69e26851_9967_4b22_80cf_295576290171_A0: mwf167ff93_6af9_4ad3_be9e_dfc18aaf6a7d_A0 => mw9dcce971_94dd_43cc_a416_f9c5b92b7ea9_A0; mw69e26851_9967_4b22_80cf_295576290171_A0_TXTL_RNAdeg_F*mwf167ff93_6af9_4ad3_be9e_dfc18aaf6a7d_A0;
    mw69e26851_9967_4b22_80cf_295576290171_A0_TXTL_RNAdeg_F = 0.002777778;
  mwe0b84c41_a714_4cf9_9e6c_58aca8b38d4a_A0: mwa63b6bc2_3062_4276_906a_bec4375fd6f1_A0 + mw9dcce971_94dd_43cc_a416_f9c5b92b7ea9_A0 -> mwd4d5d75f_2cfe_4a16_b934_d2513bb1aaea_A0; mwe0b84c41_a714_4cf9_9e6c_58aca8b38d4a_A0_TXTL_RNAdeg_F*mwa63b6bc2_3062_4276_906a_bec4375fd6f1_A0*mw9dcce971_94dd_43cc_a416_f9c5b92b7ea9_A0 - mwe0b84c41_a714_4cf9_9e6c_58aca8b38d4a_A0_TXTL_RNAdeg_R*mwd4d5d75f_2cfe_4a16_b934_d2513bb1aaea_A0;
    mwe0b84c41_a714_4cf9_9e6c_58aca8b38d4a_A0_TXTL_RNAdeg_F = 10; mwe0b84c41_a714_4cf9_9e6c_58aca8b38d4a_A0_TXTL_RNAdeg_R = 2000;
  mwdaf894a5_e617_4d19_94e8_b570a67fa75a_A0: mwd4d5d75f_2cfe_4a16_b934_d2513bb1aaea_A0 => mw9dcce971_94dd_43cc_a416_f9c5b92b7ea9_A0 + mw00f45716_be42_4897_b864_a105290636f8_A0; mwdaf894a5_e617_4d19_94e8_b570a67fa75a_A0_TXTL_RNAdeg_F*mwd4d5d75f_2cfe_4a16_b934_d2513bb1aaea_A0;
    mwdaf894a5_e617_4d19_94e8_b570a67fa75a_A0_TXTL_RNAdeg_F = 0.002777778;
  mw58e82d1a_cf38_4591_9f25_f225263706f2_A0: mwc8688555_e588_4ad9_9e55_f053892bfbf5_A0 + mw9dcce971_94dd_43cc_a416_f9c5b92b7ea9_A0 -> mwdc093847_c1af_4016_aad3_e2c57c50d317_A0; mw58e82d1a_cf38_4591_9f25_f225263706f2_A0_TXTL_RNAdeg_F*mwc8688555_e588_4ad9_9e55_f053892bfbf5_A0*mw9dcce971_94dd_43cc_a416_f9c5b92b7ea9_A0 - mw58e82d1a_cf38_4591_9f25_f225263706f2_A0_TXTL_RNAdeg_R*mwdc093847_c1af_4016_aad3_e2c57c50d317_A0;
    mw58e82d1a_cf38_4591_9f25_f225263706f2_A0_TXTL_RNAdeg_F = 10; mw58e82d1a_cf38_4591_9f25_f225263706f2_A0_TXTL_RNAdeg_R = 2000;
  mwc13ba8b4_4e3b_47d9_83aa_59896b329888_A0: mwdc093847_c1af_4016_aad3_e2c57c50d317_A0 => mw9dcce971_94dd_43cc_a416_f9c5b92b7ea9_A0 + mw1abcc808_a59f_467d_b71b_421398c97d74_A0 + 2 mw11e10894_8a40_4b9a_a399_a74704855a0c_A0 + mw00f45716_be42_4897_b864_a105290636f8_A0; mwc13ba8b4_4e3b_47d9_83aa_59896b329888_A0_TXTL_RNAdeg_F*mwdc093847_c1af_4016_aad3_e2c57c50d317_A0;
    mwc13ba8b4_4e3b_47d9_83aa_59896b329888_A0_TXTL_RNAdeg_F = 0.002777778;
  mw4b0592d8_cbba_4312_a435_53fe087279fc_A0: mw4976d02d_0642_4ab4_86ba_3cd5bf362bdc_A0 + mw9dcce971_94dd_43cc_a416_f9c5b92b7ea9_A0 -> mw364eef4c_8431_467d_bd97_6172b02b980b_A0; mw4b0592d8_cbba_4312_a435_53fe087279fc_A0_TXTL_RNAdeg_F*mw4976d02d_0642_4ab4_86ba_3cd5bf362bdc_A0*mw9dcce971_94dd_43cc_a416_f9c5b92b7ea9_A0 - mw4b0592d8_cbba_4312_a435_53fe087279fc_A0_TXTL_RNAdeg_R*mw364eef4c_8431_467d_bd97_6172b02b980b_A0;
    mw4b0592d8_cbba_4312_a435_53fe087279fc_A0_TXTL_RNAdeg_F = 10; mw4b0592d8_cbba_4312_a435_53fe087279fc_A0_TXTL_RNAdeg_R = 2000;
  mw548404d1_e408_401d_b226_f05464aff9a2_A0: mw364eef4c_8431_467d_bd97_6172b02b980b_A0 => mw9dcce971_94dd_43cc_a416_f9c5b92b7ea9_A0 + mw00f45716_be42_4897_b864_a105290636f8_A0; mw548404d1_e408_401d_b226_f05464aff9a2_A0_TXTL_RNAdeg_F*mw364eef4c_8431_467d_bd97_6172b02b980b_A0;
    mw548404d1_e408_401d_b226_f05464aff9a2_A0_TXTL_RNAdeg_F = 0.002777778;
  mw67fbaae0_ad79_477d_83b4_b43bc285936c_A0: mw9c4d2b72_7efb_42ac_9af0_2b6e68621f73_A0 + mw9dcce971_94dd_43cc_a416_f9c5b92b7ea9_A0 -> mwb7433d67_6138_489c_b6ac_9fc9b22bbfcf_A0; mw67fbaae0_ad79_477d_83b4_b43bc285936c_A0_TXTL_RNAdeg_F*mw9c4d2b72_7efb_42ac_9af0_2b6e68621f73_A0*mw9dcce971_94dd_43cc_a416_f9c5b92b7ea9_A0 - mw67fbaae0_ad79_477d_83b4_b43bc285936c_A0_TXTL_RNAdeg_R*mwb7433d67_6138_489c_b6ac_9fc9b22bbfcf_A0;
    mw67fbaae0_ad79_477d_83b4_b43bc285936c_A0_TXTL_RNAdeg_F = 10; mw67fbaae0_ad79_477d_83b4_b43bc285936c_A0_TXTL_RNAdeg_R = 2000;
  mwfda47622_c527_4d68_aa6f_0dd255828cd9_A0: mwb7433d67_6138_489c_b6ac_9fc9b22bbfcf_A0 => mw9dcce971_94dd_43cc_a416_f9c5b92b7ea9_A0 + mw1abcc808_a59f_467d_b71b_421398c97d74_A0 + mw00f45716_be42_4897_b864_a105290636f8_A0; mwfda47622_c527_4d68_aa6f_0dd255828cd9_A0_TXTL_RNAdeg_F*mwb7433d67_6138_489c_b6ac_9fc9b22bbfcf_A0;
    mwfda47622_c527_4d68_aa6f_0dd255828cd9_A0_TXTL_RNAdeg_F = 0.002777778;
  mwe1df7722_9564_4ae2_8545_f55e73861e3f_A0: mw11e10894_8a40_4b9a_a399_a74704855a0c_A0 => mw17310191_3888_4d94_a11e_856eb88960c6_A0; mw1b3c7b9e_a9ce_4463_ac55_43201909284a_A0*mw11e10894_8a40_4b9a_a399_a74704855a0c_A0;

  // Events:
  event_75: at (time <= 5400): mw1b3c7b9e_a9ce_4463_ac55_43201909284a_A0 = 0;
  event_76: at (time > 5400): mw1b3c7b9e_a9ce_4463_ac55_43201909284a_A0 = 0.0002;

  // Unit definitions:
  unit volume = litre;
  unit substance = mole;
  unit area = metre^2;
end
