// SBML level 2 version 4

model mix_of_E30VNPRL_E30VNPRL_gene_expression()
  // mix_of_E30VNPRL_E30VNPRL_gene_expression

  // Compartments:
  compartment contents = 1;

  // Species:
  species RNAP in contents = 100.0001/contents;
  species Ribo in contents = 30.00002/contents;
  species RecBCD in contents = 5.000003/contents;
  species RNase in contents = 100.0001/contents;
  species AGTP in contents = 3180048/contents;
  species CUTP in contents = 1908029/contents;
  species AA in contents = 3.180048e7/contents;
  species protein_tetR in contents = 0;
  species aTc in contents = 0;
  species protein_tetRdimer in contents = 0;
  species RNA_utr1_tetR in contents = 0; RNA_utr1_tetR is "RNA utr1--tetR";
  species Ribo_RNA_utr1_tetR in contents = 0; Ribo_RNA_utr1_tetR is "Ribo:RNA utr1--tetR";
  species DNA_psigX_utr1_tetR in contents = 0.5000003/contents; DNA_psigX_utr1_tetR is "DNA psigX--utr1--tetR";
  species RNAPSIGX in contents = 0;
  species RNAPSIGX_DNA_psigX_utr1_tetR in contents = 0; RNAPSIGX_DNA_psigX_utr1_tetR is "RNAPSIGX:DNA psigX--utr1--tetR";
  species AA_2AGTP_Ribo_RNA_utr1_tetR in contents = 0; AA_2AGTP_Ribo_RNA_utr1_tetR is "AA:2AGTP:Ribo:RNA utr1--tetR";
  species term_Ribo_RNA_utr1_tetR in contents = 0; term_Ribo_RNA_utr1_tetR is "term_Ribo:RNA utr1--tetR";
  species protein_deGFP_contents_19 in contents = 0;
  species protein_deGFP_contents_20 in contents = 0; protein_deGFP_contents_20 is "protein deGFP*";
  species RNA_utr1_deGFP in contents = 0; RNA_utr1_deGFP is "RNA utr1--deGFP";
  species Ribo_RNA_utr1_deGFP in contents = 0; Ribo_RNA_utr1_deGFP is "Ribo:RNA utr1--deGFP";
  species DNA_p28_ptet_utr1_deGFP in contents = 2.000001/contents; DNA_p28_ptet_utr1_deGFP is "DNA p28_ptet--utr1--deGFP";
  species RNAP28 in contents = 0;
  species RNAP28_DNA_p28_ptet_utr1_deGFP in contents = 0; RNAP28_DNA_p28_ptet_utr1_deGFP is "RNAP28:DNA p28_ptet--utr1--deGFP";
  species protein_sigma28 in contents = 0;
  species CUTP_AGTP_RNAP28_DNA_p28_ptet_utr1_deGFP in contents = 0; CUTP_AGTP_RNAP28_DNA_p28_ptet_utr1_deGFP is "CUTP:AGTP:RNAP28:DNA p28_ptet--utr1--deGFP";
  species term_RNAP28_DNA_p28_ptet_utr1_deGFP in contents = 0; term_RNAP28_DNA_p28_ptet_utr1_deGFP is "term_RNAP28:DNA p28_ptet--utr1--deGFP";
  species RNAP28_DNA_p28_ptet_utr1_deGFP_protein_tetRdimer in contents = 0; RNAP28_DNA_p28_ptet_utr1_deGFP_protein_tetRdimer is "RNAP28:DNA p28_ptet--utr1--deGFP:protein tetRdimer";
  species CUTP_AGTP_RNAP28_DNA_p28_ptet_utr1_deGFP_protein_tetRdimer in contents = 0; CUTP_AGTP_RNAP28_DNA_p28_ptet_utr1_deGFP_protein_tetRdimer is "CUTP:AGTP:RNAP28:DNA p28_ptet--utr1--deGFP:protein tetRdimer";
  species term_RNAP28_DNA_p28_ptet_utr1_deGFP_protein_tetRdimer in contents = 0; term_RNAP28_DNA_p28_ptet_utr1_deGFP_protein_tetRdimer is "term_RNAP28:DNA p28_ptet--utr1--deGFP:protein tetRdimer";
  species AA_2AGTP_Ribo_RNA_utr1_deGFP in contents = 0; AA_2AGTP_Ribo_RNA_utr1_deGFP is "AA:2AGTP:Ribo:RNA utr1--deGFP";
  species term_Ribo_RNA_utr1_deGFP in contents = 0; term_Ribo_RNA_utr1_deGFP is "term_Ribo:RNA utr1--deGFP";
  species protein_sigmaX in contents = 0;
  species RNA_utr1_sigmaX in contents = 0; RNA_utr1_sigmaX is "RNA utr1--sigmaX";
  species Ribo_RNA_utr1_sigmaX in contents = 0; Ribo_RNA_utr1_sigmaX is "Ribo:RNA utr1--sigmaX";
  species DNA_plac_utr1_sigmaX in contents = 5.000003/contents; DNA_plac_utr1_sigmaX is "DNA plac--utr1--sigmaX";
  species RNAP_DNA_plac_utr1_sigmaX in contents = 0; RNAP_DNA_plac_utr1_sigmaX is "RNAP:DNA plac--utr1--sigmaX";
  species CUTP_AGTP_RNAP_DNA_plac_utr1_sigmaX in contents = 0; CUTP_AGTP_RNAP_DNA_plac_utr1_sigmaX is "CUTP:AGTP:RNAP:DNA plac--utr1--sigmaX";
  species term_RNAP_DNA_plac_utr1_sigmaX in contents = 0; term_RNAP_DNA_plac_utr1_sigmaX is "term_RNAP:DNA plac--utr1--sigmaX";
  species AA_2AGTP_Ribo_RNA_utr1_sigmaX in contents = 0; AA_2AGTP_Ribo_RNA_utr1_sigmaX is "AA:2AGTP:Ribo:RNA utr1--sigmaX";
  species term_Ribo_RNA_utr1_sigmaX in contents = 0; term_Ribo_RNA_utr1_sigmaX is "term_Ribo:RNA utr1--sigmaX";
  species RNA_utr1_sigma28 in contents = 0; RNA_utr1_sigma28 is "RNA utr1--sigma28";
  species Ribo_RNA_utr1_sigma28 in contents = 0; Ribo_RNA_utr1_sigma28 is "Ribo:RNA utr1--sigma28";
  species DNA_plac_utr1_sigma28 in contents = 0.2000001/contents; DNA_plac_utr1_sigma28 is "DNA plac--utr1--sigma28";
  species RNAP_DNA_plac_utr1_sigma28 in contents = 0; RNAP_DNA_plac_utr1_sigma28 is "RNAP:DNA plac--utr1--sigma28";
  species CUTP_AGTP_RNAP_DNA_plac_utr1_sigma28 in contents = 0; CUTP_AGTP_RNAP_DNA_plac_utr1_sigma28 is "CUTP:AGTP:RNAP:DNA plac--utr1--sigma28";
  species term_RNAP_DNA_plac_utr1_sigma28 in contents = 0; term_RNAP_DNA_plac_utr1_sigma28 is "term_RNAP:DNA plac--utr1--sigma28";
  species AA_2AGTP_Ribo_RNA_utr1_sigma28 in contents = 0; AA_2AGTP_Ribo_RNA_utr1_sigma28 is "AA:2AGTP:Ribo:RNA utr1--sigma28";
  species term_Ribo_RNA_utr1_sigma28 in contents = 0; term_Ribo_RNA_utr1_sigma28 is "term_Ribo:RNA utr1--sigma28";
  species _2_aTc_protein_tetRdimer in contents = 0; _2_aTc_protein_tetRdimer is "2 aTc:protein tetRdimer";
  species CUTP_AGTP_RNAPSIGX_DNA_psigX_utr1_tetR in contents = 0; CUTP_AGTP_RNAPSIGX_DNA_psigX_utr1_tetR is "CUTP:AGTP:RNAPSIGX:DNA psigX--utr1--tetR";
  species term_RNAPSIGX_DNA_psigX_utr1_tetR in contents = 0; term_RNAPSIGX_DNA_psigX_utr1_tetR is "term_RNAPSIGX:DNA psigX--utr1--tetR";
  species AGTP_RNAPSIGX_DNA_psigX_utr1_tetR in contents = 0; AGTP_RNAPSIGX_DNA_psigX_utr1_tetR is "AGTP:RNAPSIGX:DNA psigX--utr1--tetR";
  species CUTP_RNAPSIGX_DNA_psigX_utr1_tetR in contents = 0; CUTP_RNAPSIGX_DNA_psigX_utr1_tetR is "CUTP:RNAPSIGX:DNA psigX--utr1--tetR";
  species AA_Ribo_RNA_utr1_tetR in contents = 0; AA_Ribo_RNA_utr1_tetR is "AA:Ribo:RNA utr1--tetR";
  species RNA_utr1_tetR_RNase in contents = 0; RNA_utr1_tetR_RNase is "RNA utr1--tetR:RNase";
  species Ribo_RNA_utr1_tetR_RNase in contents = 0; Ribo_RNA_utr1_tetR_RNase is "Ribo:RNA utr1--tetR:RNase";
  species AA_2AGTP_Ribo_RNA_utr1_tetR_RNase in contents = 0; AA_2AGTP_Ribo_RNA_utr1_tetR_RNase is "AA:2AGTP:Ribo:RNA utr1--tetR:RNase";
  species term_Ribo_RNA_utr1_tetR_RNase in contents = 0; term_Ribo_RNA_utr1_tetR_RNase is "term_Ribo:RNA utr1--tetR:RNase";
  species AA_Ribo_RNA_utr1_tetR_RNase in contents = 0; AA_Ribo_RNA_utr1_tetR_RNase is "AA:Ribo:RNA utr1--tetR:RNase";
  species DNA_p28_ptet_utr1_deGFP_protein_tetRdimer in contents = 0; DNA_p28_ptet_utr1_deGFP_protein_tetRdimer is "DNA p28_ptet--utr1--deGFP:protein tetRdimer";
  species AGTP_RNAP28_DNA_p28_ptet_utr1_deGFP in contents = 0; AGTP_RNAP28_DNA_p28_ptet_utr1_deGFP is "AGTP:RNAP28:DNA p28_ptet--utr1--deGFP";
  species CUTP_RNAP28_DNA_p28_ptet_utr1_deGFP in contents = 0; CUTP_RNAP28_DNA_p28_ptet_utr1_deGFP is "CUTP:RNAP28:DNA p28_ptet--utr1--deGFP";
  species AGTP_RNAP28_DNA_p28_ptet_utr1_deGFP_protein_tetRdimer in contents = 0; AGTP_RNAP28_DNA_p28_ptet_utr1_deGFP_protein_tetRdimer is "AGTP:RNAP28:DNA p28_ptet--utr1--deGFP:protein tetRdimer";
  species CUTP_RNAP28_DNA_p28_ptet_utr1_deGFP_protein_tetRdimer in contents = 0; CUTP_RNAP28_DNA_p28_ptet_utr1_deGFP_protein_tetRdimer is "CUTP:RNAP28:DNA p28_ptet--utr1--deGFP:protein tetRdimer";
  species AA_Ribo_RNA_utr1_deGFP in contents = 0; AA_Ribo_RNA_utr1_deGFP is "AA:Ribo:RNA utr1--deGFP";
  species RNA_utr1_deGFP_RNase in contents = 0; RNA_utr1_deGFP_RNase is "RNA utr1--deGFP:RNase";
  species Ribo_RNA_utr1_deGFP_RNase in contents = 0; Ribo_RNA_utr1_deGFP_RNase is "Ribo:RNA utr1--deGFP:RNase";
  species AA_2AGTP_Ribo_RNA_utr1_deGFP_RNase in contents = 0; AA_2AGTP_Ribo_RNA_utr1_deGFP_RNase is "AA:2AGTP:Ribo:RNA utr1--deGFP:RNase";
  species term_Ribo_RNA_utr1_deGFP_RNase in contents = 0; term_Ribo_RNA_utr1_deGFP_RNase is "term_Ribo:RNA utr1--deGFP:RNase";
  species AA_Ribo_RNA_utr1_deGFP_RNase in contents = 0; AA_Ribo_RNA_utr1_deGFP_RNase is "AA:Ribo:RNA utr1--deGFP:RNase";
  species AGTP_RNAP_DNA_plac_utr1_sigmaX in contents = 0; AGTP_RNAP_DNA_plac_utr1_sigmaX is "AGTP:RNAP:DNA plac--utr1--sigmaX";
  species CUTP_RNAP_DNA_plac_utr1_sigmaX in contents = 0; CUTP_RNAP_DNA_plac_utr1_sigmaX is "CUTP:RNAP:DNA plac--utr1--sigmaX";
  species AA_Ribo_RNA_utr1_sigmaX in contents = 0; AA_Ribo_RNA_utr1_sigmaX is "AA:Ribo:RNA utr1--sigmaX";
  species RNA_utr1_sigmaX_RNase in contents = 0; RNA_utr1_sigmaX_RNase is "RNA utr1--sigmaX:RNase";
  species Ribo_RNA_utr1_sigmaX_RNase in contents = 0; Ribo_RNA_utr1_sigmaX_RNase is "Ribo:RNA utr1--sigmaX:RNase";
  species AA_2AGTP_Ribo_RNA_utr1_sigmaX_RNase in contents = 0; AA_2AGTP_Ribo_RNA_utr1_sigmaX_RNase is "AA:2AGTP:Ribo:RNA utr1--sigmaX:RNase";
  species term_Ribo_RNA_utr1_sigmaX_RNase in contents = 0; term_Ribo_RNA_utr1_sigmaX_RNase is "term_Ribo:RNA utr1--sigmaX:RNase";
  species AA_Ribo_RNA_utr1_sigmaX_RNase in contents = 0; AA_Ribo_RNA_utr1_sigmaX_RNase is "AA:Ribo:RNA utr1--sigmaX:RNase";
  species AGTP_RNAP_DNA_plac_utr1_sigma28 in contents = 0; AGTP_RNAP_DNA_plac_utr1_sigma28 is "AGTP:RNAP:DNA plac--utr1--sigma28";
  species CUTP_RNAP_DNA_plac_utr1_sigma28 in contents = 0; CUTP_RNAP_DNA_plac_utr1_sigma28 is "CUTP:RNAP:DNA plac--utr1--sigma28";
  species AA_Ribo_RNA_utr1_sigma28 in contents = 0; AA_Ribo_RNA_utr1_sigma28 is "AA:Ribo:RNA utr1--sigma28";
  species RNA_utr1_sigma28_RNase in contents = 0; RNA_utr1_sigma28_RNase is "RNA utr1--sigma28:RNase";
  species Ribo_RNA_utr1_sigma28_RNase in contents = 0; Ribo_RNA_utr1_sigma28_RNase is "Ribo:RNA utr1--sigma28:RNase";
  species AA_2AGTP_Ribo_RNA_utr1_sigma28_RNase in contents = 0; AA_2AGTP_Ribo_RNA_utr1_sigma28_RNase is "AA:2AGTP:Ribo:RNA utr1--sigma28:RNase";
  species term_Ribo_RNA_utr1_sigma28_RNase in contents = 0; term_Ribo_RNA_utr1_sigma28_RNase is "term_Ribo:RNA utr1--sigma28:RNase";
  species AA_Ribo_RNA_utr1_sigma28_RNase in contents = 0; AA_Ribo_RNA_utr1_sigma28_RNase is "AA:Ribo:RNA utr1--sigma28:RNase";
  species AGTP_USED in contents = 0;

  // Parameters:
  AGTPdeg_F = 0;

  // Reactions:
  reaction_91: protein_tetRdimer + 2 aTc -> _2_aTc_protein_tetRdimer; TXTL_INDUCER_TETR_ATC_F*protein_tetRdimer*aTc^2 - TXTL_INDUCER_TETR_ATC_R*_2_aTc_protein_tetRdimer;
    TXTL_INDUCER_TETR_ATC_F = 1e-5; TXTL_INDUCER_TETR_ATC_R = 0.1;
  reaction_92: 2 protein_tetR -> protein_tetRdimer; reaction_92_kf*protein_tetR^2 - reaction_92_kr*protein_tetRdimer;
    reaction_92_kf = 1; reaction_92_kr = 1;
  reaction_93: RNA_utr1_tetR + Ribo -> Ribo_RNA_utr1_tetR; reaction_93_TXTL_UTR_UTR1_F*RNA_utr1_tetR*Ribo - reaction_93_TXTL_UTR_UTR1_R*Ribo_RNA_utr1_tetR;
    reaction_93_TXTL_UTR_UTR1_F = 0.2; reaction_93_TXTL_UTR_UTR1_R = 4;
  reaction_94: DNA_psigX_utr1_tetR + RNAPSIGX -> RNAPSIGX_DNA_psigX_utr1_tetR; TXTL_SIGX_RNAPbound_F*DNA_psigX_utr1_tetR*RNAPSIGX - TXTL_SIGX_RNAPbound_R*RNAPSIGX_DNA_psigX_utr1_tetR;
    TXTL_SIGX_RNAPbound_F = 10; TXTL_SIGX_RNAPbound_R = 0.1;
  reaction_95: CUTP_AGTP_RNAPSIGX_DNA_psigX_utr1_tetR => RNAPSIGX_DNA_psigX_utr1_tetR; reaction_95_TXTL_NTP_consumption*CUTP_AGTP_RNAPSIGX_DNA_psigX_utr1_tetR;
    reaction_95_TXTL_NTP_consumption = 0.7487705;
  reaction_96: term_RNAPSIGX_DNA_psigX_utr1_tetR => RNAPSIGX + DNA_psigX_utr1_tetR; reaction_96_TXTL_RNAPBOUND_TERMINATION_RATE*term_RNAPSIGX_DNA_psigX_utr1_tetR;
    reaction_96_TXTL_RNAPBOUND_TERMINATION_RATE = 0.05;
  reaction_97: RNAPSIGX_DNA_psigX_utr1_tetR + AGTP -> AGTP_RNAPSIGX_DNA_psigX_utr1_tetR; reaction_97_TXTL_NTP_RNAP_F*RNAPSIGX_DNA_psigX_utr1_tetR*AGTP - reaction_97_TXTL_NTP_RNAP_R*AGTP_RNAPSIGX_DNA_psigX_utr1_tetR;
    reaction_97_TXTL_NTP_RNAP_F = 1000; reaction_97_TXTL_NTP_RNAP_R = 120000000;
  reaction_98: RNAPSIGX_DNA_psigX_utr1_tetR + CUTP -> CUTP_RNAPSIGX_DNA_psigX_utr1_tetR; reaction_98_TXTL_NTP_RNAP_F*RNAPSIGX_DNA_psigX_utr1_tetR*CUTP - reaction_98_TXTL_NTP_RNAP_R*CUTP_RNAPSIGX_DNA_psigX_utr1_tetR;
    reaction_98_TXTL_NTP_RNAP_F = 1000; reaction_98_TXTL_NTP_RNAP_R = 120000000;
  reaction_99: AGTP_RNAPSIGX_DNA_psigX_utr1_tetR + CUTP -> CUTP_AGTP_RNAPSIGX_DNA_psigX_utr1_tetR; reaction_99_TXTL_NTP_RNAP_F*AGTP_RNAPSIGX_DNA_psigX_utr1_tetR*CUTP - reaction_99_TXTL_NTP_RNAP_R*CUTP_AGTP_RNAPSIGX_DNA_psigX_utr1_tetR;
    reaction_99_TXTL_NTP_RNAP_F = 1; reaction_99_TXTL_NTP_RNAP_R = 120000;
  reaction_100: CUTP_RNAPSIGX_DNA_psigX_utr1_tetR + AGTP -> CUTP_AGTP_RNAPSIGX_DNA_psigX_utr1_tetR; reaction_100_TXTL_NTP_RNAP_F*CUTP_RNAPSIGX_DNA_psigX_utr1_tetR*AGTP - reaction_100_TXTL_NTP_RNAP_R*CUTP_AGTP_RNAPSIGX_DNA_psigX_utr1_tetR;
    reaction_100_TXTL_NTP_RNAP_F = 1; reaction_100_TXTL_NTP_RNAP_R = 120000;
  reaction_101: CUTP_AGTP_RNAPSIGX_DNA_psigX_utr1_tetR => term_RNAPSIGX_DNA_psigX_utr1_tetR + RNA_utr1_tetR; reaction_101_TXTL_transcription_rate1*CUTP_AGTP_RNAPSIGX_DNA_psigX_utr1_tetR;
    reaction_101_TXTL_transcription_rate1 = 0.001229508;
  reaction_102: Ribo_RNA_utr1_tetR + AA -> AA_Ribo_RNA_utr1_tetR; reaction_102_TL_AA_F*Ribo_RNA_utr1_tetR*AA - reaction_102_TL_AA_R*AA_Ribo_RNA_utr1_tetR;
    reaction_102_TL_AA_F = 300; reaction_102_TL_AA_R = 0.1;
  reaction_103: AA_Ribo_RNA_utr1_tetR + 2 AGTP -> AA_2AGTP_Ribo_RNA_utr1_tetR; reaction_103_TL_AGTP_F*AA_Ribo_RNA_utr1_tetR*AGTP^2 - reaction_103_TL_AGTP_R*AA_2AGTP_Ribo_RNA_utr1_tetR;
    reaction_103_TL_AGTP_F = 30; reaction_103_TL_AGTP_R = 10;
  reaction_104: AA_2AGTP_Ribo_RNA_utr1_tetR => term_Ribo_RNA_utr1_tetR; reaction_104_TXTL_TL_AA_consumption*AA_2AGTP_Ribo_RNA_utr1_tetR;
    reaction_104_TXTL_TL_AA_consumption = 0.03;
  reaction_105: AA_2AGTP_Ribo_RNA_utr1_tetR => term_Ribo_RNA_utr1_tetR + protein_tetR; reaction_105_TXTL_TL_rate*AA_2AGTP_Ribo_RNA_utr1_tetR;
    reaction_105_TXTL_TL_rate = 0.01;
  reaction_106: term_Ribo_RNA_utr1_tetR => RNA_utr1_tetR + Ribo; reaction_106_TXTL_RIBOBOUND_TERMINATION_RATE*term_Ribo_RNA_utr1_tetR;
    reaction_106_TXTL_RIBOBOUND_TERMINATION_RATE = 50;
  reaction_107: RNA_utr1_tetR + RNase -> RNA_utr1_tetR_RNase; reaction_107_TXTL_RNAdeg_F*RNA_utr1_tetR*RNase - reaction_107_TXTL_RNAdeg_R*RNA_utr1_tetR_RNase;
    reaction_107_TXTL_RNAdeg_F = 10; reaction_107_TXTL_RNAdeg_R = 2000;
  reaction_108: RNA_utr1_tetR_RNase => RNase; reaction_108_TXTL_RNAdeg_F*RNA_utr1_tetR_RNase;
    reaction_108_TXTL_RNAdeg_F = 0.002777778;
  reaction_109: Ribo_RNA_utr1_tetR + RNase -> Ribo_RNA_utr1_tetR_RNase; reaction_109_TXTL_RNAdeg_F*Ribo_RNA_utr1_tetR*RNase - reaction_109_TXTL_RNAdeg_R*Ribo_RNA_utr1_tetR_RNase;
    reaction_109_TXTL_RNAdeg_F = 10; reaction_109_TXTL_RNAdeg_R = 2000;
  reaction_110: Ribo_RNA_utr1_tetR_RNase => RNase + Ribo; reaction_110_TXTL_RNAdeg_F*Ribo_RNA_utr1_tetR_RNase;
    reaction_110_TXTL_RNAdeg_F = 0.002777778;
  reaction_111: AA_2AGTP_Ribo_RNA_utr1_tetR + RNase -> AA_2AGTP_Ribo_RNA_utr1_tetR_RNase; reaction_111_TXTL_RNAdeg_F*AA_2AGTP_Ribo_RNA_utr1_tetR*RNase - reaction_111_TXTL_RNAdeg_R*AA_2AGTP_Ribo_RNA_utr1_tetR_RNase;
    reaction_111_TXTL_RNAdeg_F = 10; reaction_111_TXTL_RNAdeg_R = 2000;
  reaction_112: AA_2AGTP_Ribo_RNA_utr1_tetR_RNase => RNase + AA + 2 AGTP + Ribo; reaction_112_TXTL_RNAdeg_F*AA_2AGTP_Ribo_RNA_utr1_tetR_RNase;
    reaction_112_TXTL_RNAdeg_F = 0.002777778;
  reaction_113: term_Ribo_RNA_utr1_tetR + RNase -> term_Ribo_RNA_utr1_tetR_RNase; reaction_113_TXTL_RNAdeg_F*term_Ribo_RNA_utr1_tetR*RNase - reaction_113_TXTL_RNAdeg_R*term_Ribo_RNA_utr1_tetR_RNase;
    reaction_113_TXTL_RNAdeg_F = 10; reaction_113_TXTL_RNAdeg_R = 2000;
  reaction_114: term_Ribo_RNA_utr1_tetR_RNase => RNase + Ribo; reaction_114_TXTL_RNAdeg_F*term_Ribo_RNA_utr1_tetR_RNase;
    reaction_114_TXTL_RNAdeg_F = 0.002777778;
  reaction_115: AA_Ribo_RNA_utr1_tetR + RNase -> AA_Ribo_RNA_utr1_tetR_RNase; reaction_115_TXTL_RNAdeg_F*AA_Ribo_RNA_utr1_tetR*RNase - reaction_115_TXTL_RNAdeg_R*AA_Ribo_RNA_utr1_tetR_RNase;
    reaction_115_TXTL_RNAdeg_F = 10; reaction_115_TXTL_RNAdeg_R = 2000;
  reaction_116: AA_Ribo_RNA_utr1_tetR_RNase => RNase + AA + Ribo; reaction_116_TXTL_RNAdeg_F*AA_Ribo_RNA_utr1_tetR_RNase;
    reaction_116_TXTL_RNAdeg_F = 0.002777778;
  reaction_117: protein_deGFP_contents_19 => protein_deGFP_contents_20; TXTL_PROT_deGFP_MATURATION*protein_deGFP_contents_19;
    TXTL_PROT_deGFP_MATURATION = 0.002310491;
  reaction_118: RNA_utr1_deGFP + Ribo -> Ribo_RNA_utr1_deGFP; reaction_118_TXTL_UTR_UTR1_F*RNA_utr1_deGFP*Ribo - reaction_118_TXTL_UTR_UTR1_R*Ribo_RNA_utr1_deGFP;
    reaction_118_TXTL_UTR_UTR1_F = 0.2; reaction_118_TXTL_UTR_UTR1_R = 4;
  reaction_119: DNA_p28_ptet_utr1_deGFP + RNAP28 -> RNAP28_DNA_p28_ptet_utr1_deGFP; TXTL_PTET_RNAPbound_F*DNA_p28_ptet_utr1_deGFP*RNAP28 - TXTL_PTET_RNAPbound_R*RNAP28_DNA_p28_ptet_utr1_deGFP;
    TXTL_PTET_RNAPbound_F = 0.006; TXTL_PTET_RNAPbound_R = 5;
  reaction_120: DNA_p28_ptet_utr1_deGFP + protein_tetRdimer -> DNA_p28_ptet_utr1_deGFP_protein_tetRdimer; reaction_120_kf*DNA_p28_ptet_utr1_deGFP*protein_tetRdimer - reaction_120_kr*DNA_p28_ptet_utr1_deGFP_protein_tetRdimer;
    reaction_120_kf = 0.00286; reaction_120_kr = 1.1e-5;
  reaction_121: RNAP28_DNA_p28_ptet_utr1_deGFP + protein_tetRdimer -> RNAP28_DNA_p28_ptet_utr1_deGFP_protein_tetRdimer; reaction_121_kf*RNAP28_DNA_p28_ptet_utr1_deGFP*protein_tetRdimer - reaction_121_kr*RNAP28_DNA_p28_ptet_utr1_deGFP_protein_tetRdimer;
    reaction_121_kf = 0.00286; reaction_121_kr = 1.1e-5;
  reaction_122: DNA_p28_ptet_utr1_deGFP_protein_tetRdimer + RNAP28 -> RNAP28_DNA_p28_ptet_utr1_deGFP_protein_tetRdimer; reaction_122_kf*DNA_p28_ptet_utr1_deGFP_protein_tetRdimer*RNAP28 - reaction_122_kr*RNAP28_DNA_p28_ptet_utr1_deGFP_protein_tetRdimer;
    reaction_122_kf = 0.006; reaction_122_kr = 5000;
  reaction_123: CUTP_AGTP_RNAP28_DNA_p28_ptet_utr1_deGFP => RNAP28_DNA_p28_ptet_utr1_deGFP; reaction_123_TXTL_NTP_consumption*CUTP_AGTP_RNAP28_DNA_p28_ptet_utr1_deGFP;
    reaction_123_TXTL_NTP_consumption = 0.7485294;
  reaction_124: term_RNAP28_DNA_p28_ptet_utr1_deGFP => RNAP28 + DNA_p28_ptet_utr1_deGFP; reaction_124_TXTL_RNAPBOUND_TERMINATION_RATE*term_RNAP28_DNA_p28_ptet_utr1_deGFP;
    reaction_124_TXTL_RNAPBOUND_TERMINATION_RATE = 0.05;
  reaction_125: RNAP28_DNA_p28_ptet_utr1_deGFP + AGTP -> AGTP_RNAP28_DNA_p28_ptet_utr1_deGFP; reaction_125_TXTL_NTP_RNAP_F*RNAP28_DNA_p28_ptet_utr1_deGFP*AGTP - reaction_125_TXTL_NTP_RNAP_R*AGTP_RNAP28_DNA_p28_ptet_utr1_deGFP;
    reaction_125_TXTL_NTP_RNAP_F = 1000; reaction_125_TXTL_NTP_RNAP_R = 120000000;
  reaction_126: RNAP28_DNA_p28_ptet_utr1_deGFP + CUTP -> CUTP_RNAP28_DNA_p28_ptet_utr1_deGFP; reaction_126_TXTL_NTP_RNAP_F*RNAP28_DNA_p28_ptet_utr1_deGFP*CUTP - reaction_126_TXTL_NTP_RNAP_R*CUTP_RNAP28_DNA_p28_ptet_utr1_deGFP;
    reaction_126_TXTL_NTP_RNAP_F = 1000; reaction_126_TXTL_NTP_RNAP_R = 120000000;
  reaction_127: AGTP_RNAP28_DNA_p28_ptet_utr1_deGFP + CUTP -> CUTP_AGTP_RNAP28_DNA_p28_ptet_utr1_deGFP; reaction_127_TXTL_NTP_RNAP_F*AGTP_RNAP28_DNA_p28_ptet_utr1_deGFP*CUTP - reaction_127_TXTL_NTP_RNAP_R*CUTP_AGTP_RNAP28_DNA_p28_ptet_utr1_deGFP;
    reaction_127_TXTL_NTP_RNAP_F = 1; reaction_127_TXTL_NTP_RNAP_R = 120000;
  reaction_128: CUTP_RNAP28_DNA_p28_ptet_utr1_deGFP + AGTP -> CUTP_AGTP_RNAP28_DNA_p28_ptet_utr1_deGFP; reaction_128_TXTL_NTP_RNAP_F*CUTP_RNAP28_DNA_p28_ptet_utr1_deGFP*AGTP - reaction_128_TXTL_NTP_RNAP_R*CUTP_AGTP_RNAP28_DNA_p28_ptet_utr1_deGFP;
    reaction_128_TXTL_NTP_RNAP_F = 1; reaction_128_TXTL_NTP_RNAP_R = 120000;
  reaction_129: CUTP_AGTP_RNAP28_DNA_p28_ptet_utr1_deGFP => term_RNAP28_DNA_p28_ptet_utr1_deGFP + RNA_utr1_deGFP; reaction_129_TXTL_transcription_rate1*CUTP_AGTP_RNAP28_DNA_p28_ptet_utr1_deGFP;
    reaction_129_TXTL_transcription_rate1 = 0.001470588;
  reaction_130: CUTP_AGTP_RNAP28_DNA_p28_ptet_utr1_deGFP_protein_tetRdimer => RNAP28_DNA_p28_ptet_utr1_deGFP_protein_tetRdimer; reaction_130_TXTL_NTP_consumption*CUTP_AGTP_RNAP28_DNA_p28_ptet_utr1_deGFP_protein_tetRdimer;
    reaction_130_TXTL_NTP_consumption = 0.7485294;
  reaction_131: term_RNAP28_DNA_p28_ptet_utr1_deGFP_protein_tetRdimer => RNAP28 + DNA_p28_ptet_utr1_deGFP + protein_tetRdimer; reaction_131_TXTL_RNAPBOUND_TERMINATION_RATE*term_RNAP28_DNA_p28_ptet_utr1_deGFP_protein_tetRdimer;
    reaction_131_TXTL_RNAPBOUND_TERMINATION_RATE = 0.05;
  reaction_132: RNAP28_DNA_p28_ptet_utr1_deGFP_protein_tetRdimer + AGTP -> AGTP_RNAP28_DNA_p28_ptet_utr1_deGFP_protein_tetRdimer; reaction_132_TXTL_NTP_RNAP_F*RNAP28_DNA_p28_ptet_utr1_deGFP_protein_tetRdimer*AGTP - reaction_132_TXTL_NTP_RNAP_R*AGTP_RNAP28_DNA_p28_ptet_utr1_deGFP_protein_tetRdimer;
    reaction_132_TXTL_NTP_RNAP_F = 1000; reaction_132_TXTL_NTP_RNAP_R = 120000000;
  reaction_133: RNAP28_DNA_p28_ptet_utr1_deGFP_protein_tetRdimer + CUTP -> CUTP_RNAP28_DNA_p28_ptet_utr1_deGFP_protein_tetRdimer; reaction_133_TXTL_NTP_RNAP_F*RNAP28_DNA_p28_ptet_utr1_deGFP_protein_tetRdimer*CUTP - reaction_133_TXTL_NTP_RNAP_R*CUTP_RNAP28_DNA_p28_ptet_utr1_deGFP_protein_tetRdimer;
    reaction_133_TXTL_NTP_RNAP_F = 1000; reaction_133_TXTL_NTP_RNAP_R = 120000000;
  reaction_134: AGTP_RNAP28_DNA_p28_ptet_utr1_deGFP_protein_tetRdimer + CUTP -> CUTP_AGTP_RNAP28_DNA_p28_ptet_utr1_deGFP_protein_tetRdimer; reaction_134_TXTL_NTP_RNAP_F*AGTP_RNAP28_DNA_p28_ptet_utr1_deGFP_protein_tetRdimer*CUTP - reaction_134_TXTL_NTP_RNAP_R*CUTP_AGTP_RNAP28_DNA_p28_ptet_utr1_deGFP_protein_tetRdimer;
    reaction_134_TXTL_NTP_RNAP_F = 1; reaction_134_TXTL_NTP_RNAP_R = 120000;
  reaction_135: CUTP_RNAP28_DNA_p28_ptet_utr1_deGFP_protein_tetRdimer + AGTP -> CUTP_AGTP_RNAP28_DNA_p28_ptet_utr1_deGFP_protein_tetRdimer; reaction_135_TXTL_NTP_RNAP_F*CUTP_RNAP28_DNA_p28_ptet_utr1_deGFP_protein_tetRdimer*AGTP - reaction_135_TXTL_NTP_RNAP_R*CUTP_AGTP_RNAP28_DNA_p28_ptet_utr1_deGFP_protein_tetRdimer;
    reaction_135_TXTL_NTP_RNAP_F = 1; reaction_135_TXTL_NTP_RNAP_R = 120000;
  reaction_136: CUTP_AGTP_RNAP28_DNA_p28_ptet_utr1_deGFP_protein_tetRdimer => term_RNAP28_DNA_p28_ptet_utr1_deGFP_protein_tetRdimer + RNA_utr1_deGFP; reaction_136_TXTL_transcription_rate1*CUTP_AGTP_RNAP28_DNA_p28_ptet_utr1_deGFP_protein_tetRdimer;
    reaction_136_TXTL_transcription_rate1 = 0.001470588;
  reaction_137: Ribo_RNA_utr1_deGFP + AA -> AA_Ribo_RNA_utr1_deGFP; reaction_137_TL_AA_F*Ribo_RNA_utr1_deGFP*AA - reaction_137_TL_AA_R*AA_Ribo_RNA_utr1_deGFP;
    reaction_137_TL_AA_F = 300; reaction_137_TL_AA_R = 0.1;
  reaction_138: AA_Ribo_RNA_utr1_deGFP + 2 AGTP -> AA_2AGTP_Ribo_RNA_utr1_deGFP; reaction_138_TL_AGTP_F*AA_Ribo_RNA_utr1_deGFP*AGTP^2 - reaction_138_TL_AGTP_R*AA_2AGTP_Ribo_RNA_utr1_deGFP;
    reaction_138_TL_AGTP_F = 30; reaction_138_TL_AGTP_R = 10;
  reaction_139: AA_2AGTP_Ribo_RNA_utr1_deGFP => term_Ribo_RNA_utr1_deGFP; reaction_139_TXTL_TL_AA_consumption*AA_2AGTP_Ribo_RNA_utr1_deGFP;
    reaction_139_TXTL_TL_AA_consumption = 0.024;
  reaction_140: AA_2AGTP_Ribo_RNA_utr1_deGFP => term_Ribo_RNA_utr1_deGFP + protein_deGFP_contents_19; reaction_140_TXTL_TL_rate*AA_2AGTP_Ribo_RNA_utr1_deGFP;
    reaction_140_TXTL_TL_rate = 0.012;
  reaction_141: term_Ribo_RNA_utr1_deGFP => RNA_utr1_deGFP + Ribo; reaction_141_TXTL_RIBOBOUND_TERMINATION_RATE*term_Ribo_RNA_utr1_deGFP;
    reaction_141_TXTL_RIBOBOUND_TERMINATION_RATE = 50;
  reaction_142: RNA_utr1_deGFP + RNase -> RNA_utr1_deGFP_RNase; reaction_142_TXTL_RNAdeg_F*RNA_utr1_deGFP*RNase - reaction_142_TXTL_RNAdeg_R*RNA_utr1_deGFP_RNase;
    reaction_142_TXTL_RNAdeg_F = 10; reaction_142_TXTL_RNAdeg_R = 2000;
  reaction_143: RNA_utr1_deGFP_RNase => RNase; reaction_143_TXTL_RNAdeg_F*RNA_utr1_deGFP_RNase;
    reaction_143_TXTL_RNAdeg_F = 0.002777778;
  reaction_144: Ribo_RNA_utr1_deGFP + RNase -> Ribo_RNA_utr1_deGFP_RNase; reaction_144_TXTL_RNAdeg_F*Ribo_RNA_utr1_deGFP*RNase - reaction_144_TXTL_RNAdeg_R*Ribo_RNA_utr1_deGFP_RNase;
    reaction_144_TXTL_RNAdeg_F = 10; reaction_144_TXTL_RNAdeg_R = 2000;
  reaction_145: Ribo_RNA_utr1_deGFP_RNase => RNase + Ribo; reaction_145_TXTL_RNAdeg_F*Ribo_RNA_utr1_deGFP_RNase;
    reaction_145_TXTL_RNAdeg_F = 0.002777778;
  reaction_146: AA_2AGTP_Ribo_RNA_utr1_deGFP + RNase -> AA_2AGTP_Ribo_RNA_utr1_deGFP_RNase; reaction_146_TXTL_RNAdeg_F*AA_2AGTP_Ribo_RNA_utr1_deGFP*RNase - reaction_146_TXTL_RNAdeg_R*AA_2AGTP_Ribo_RNA_utr1_deGFP_RNase;
    reaction_146_TXTL_RNAdeg_F = 10; reaction_146_TXTL_RNAdeg_R = 2000;
  reaction_147: AA_2AGTP_Ribo_RNA_utr1_deGFP_RNase => RNase + AA + 2 AGTP + Ribo; reaction_147_TXTL_RNAdeg_F*AA_2AGTP_Ribo_RNA_utr1_deGFP_RNase;
    reaction_147_TXTL_RNAdeg_F = 0.002777778;
  reaction_148: term_Ribo_RNA_utr1_deGFP + RNase -> term_Ribo_RNA_utr1_deGFP_RNase; reaction_148_TXTL_RNAdeg_F*term_Ribo_RNA_utr1_deGFP*RNase - reaction_148_TXTL_RNAdeg_R*term_Ribo_RNA_utr1_deGFP_RNase;
    reaction_148_TXTL_RNAdeg_F = 10; reaction_148_TXTL_RNAdeg_R = 2000;
  reaction_149: term_Ribo_RNA_utr1_deGFP_RNase => RNase + Ribo; reaction_149_TXTL_RNAdeg_F*term_Ribo_RNA_utr1_deGFP_RNase;
    reaction_149_TXTL_RNAdeg_F = 0.002777778;
  reaction_150: AA_Ribo_RNA_utr1_deGFP + RNase -> AA_Ribo_RNA_utr1_deGFP_RNase; reaction_150_TXTL_RNAdeg_F*AA_Ribo_RNA_utr1_deGFP*RNase - reaction_150_TXTL_RNAdeg_R*AA_Ribo_RNA_utr1_deGFP_RNase;
    reaction_150_TXTL_RNAdeg_F = 10; reaction_150_TXTL_RNAdeg_R = 2000;
  reaction_151: AA_Ribo_RNA_utr1_deGFP_RNase => RNase + AA + Ribo; reaction_151_TXTL_RNAdeg_F*AA_Ribo_RNA_utr1_deGFP_RNase;
    reaction_151_TXTL_RNAdeg_F = 0.002777778;
  reaction_152: RNAP + protein_sigmaX -> RNAPSIGX; SigmaX_RNAP_F*RNAP*protein_sigmaX - SigmaX_RNAP_R*RNAPSIGX;
    SigmaX_RNAP_F = 100; SigmaX_RNAP_R = 0.1;
  reaction_153: RNA_utr1_sigmaX + Ribo -> Ribo_RNA_utr1_sigmaX; reaction_153_TXTL_UTR_UTR1_F*RNA_utr1_sigmaX*Ribo - reaction_153_TXTL_UTR_UTR1_R*Ribo_RNA_utr1_sigmaX;
    reaction_153_TXTL_UTR_UTR1_F = 0.2; reaction_153_TXTL_UTR_UTR1_R = 4;
  reaction_154: DNA_plac_utr1_sigmaX + RNAP -> RNAP_DNA_plac_utr1_sigmaX; reaction_154_TXTL_PLAC_RNAPbound_F*DNA_plac_utr1_sigmaX*RNAP - reaction_154_TXTL_PLAC_RNAPbound_R*RNAP_DNA_plac_utr1_sigmaX;
    reaction_154_TXTL_PLAC_RNAPbound_F = 20; reaction_154_TXTL_PLAC_RNAPbound_R = 400;
  reaction_155: CUTP_AGTP_RNAP_DNA_plac_utr1_sigmaX => RNAP_DNA_plac_utr1_sigmaX; reaction_155_TXTL_NTP_consumption*CUTP_AGTP_RNAP_DNA_plac_utr1_sigmaX;
    reaction_155_TXTL_NTP_consumption = 0.7485294;
  reaction_156: term_RNAP_DNA_plac_utr1_sigmaX => RNAP + DNA_plac_utr1_sigmaX; reaction_156_TXTL_RNAPBOUND_TERMINATION_RATE*term_RNAP_DNA_plac_utr1_sigmaX;
    reaction_156_TXTL_RNAPBOUND_TERMINATION_RATE = 0.05;
  reaction_157: RNAP_DNA_plac_utr1_sigmaX + AGTP -> AGTP_RNAP_DNA_plac_utr1_sigmaX; reaction_157_TXTL_NTP_RNAP_F*RNAP_DNA_plac_utr1_sigmaX*AGTP - reaction_157_TXTL_NTP_RNAP_R*AGTP_RNAP_DNA_plac_utr1_sigmaX;
    reaction_157_TXTL_NTP_RNAP_F = 1000; reaction_157_TXTL_NTP_RNAP_R = 120000000;
  reaction_158: RNAP_DNA_plac_utr1_sigmaX + CUTP -> CUTP_RNAP_DNA_plac_utr1_sigmaX; reaction_158_TXTL_NTP_RNAP_F*RNAP_DNA_plac_utr1_sigmaX*CUTP - reaction_158_TXTL_NTP_RNAP_R*CUTP_RNAP_DNA_plac_utr1_sigmaX;
    reaction_158_TXTL_NTP_RNAP_F = 1000; reaction_158_TXTL_NTP_RNAP_R = 120000000;
  reaction_159: AGTP_RNAP_DNA_plac_utr1_sigmaX + CUTP -> CUTP_AGTP_RNAP_DNA_plac_utr1_sigmaX; reaction_159_TXTL_NTP_RNAP_F*AGTP_RNAP_DNA_plac_utr1_sigmaX*CUTP - reaction_159_TXTL_NTP_RNAP_R*CUTP_AGTP_RNAP_DNA_plac_utr1_sigmaX;
    reaction_159_TXTL_NTP_RNAP_F = 1; reaction_159_TXTL_NTP_RNAP_R = 120000;
  reaction_160: CUTP_RNAP_DNA_plac_utr1_sigmaX + AGTP -> CUTP_AGTP_RNAP_DNA_plac_utr1_sigmaX; reaction_160_TXTL_NTP_RNAP_F*CUTP_RNAP_DNA_plac_utr1_sigmaX*AGTP - reaction_160_TXTL_NTP_RNAP_R*CUTP_AGTP_RNAP_DNA_plac_utr1_sigmaX;
    reaction_160_TXTL_NTP_RNAP_F = 1; reaction_160_TXTL_NTP_RNAP_R = 120000;
  reaction_161: CUTP_AGTP_RNAP_DNA_plac_utr1_sigmaX => term_RNAP_DNA_plac_utr1_sigmaX + RNA_utr1_sigmaX; reaction_161_TXTL_transcription_rate1*CUTP_AGTP_RNAP_DNA_plac_utr1_sigmaX;
    reaction_161_TXTL_transcription_rate1 = 0.001470588;
  reaction_162: Ribo_RNA_utr1_sigmaX + AA -> AA_Ribo_RNA_utr1_sigmaX; reaction_162_TL_AA_F*Ribo_RNA_utr1_sigmaX*AA - reaction_162_TL_AA_R*AA_Ribo_RNA_utr1_sigmaX;
    reaction_162_TL_AA_F = 300; reaction_162_TL_AA_R = 0.1;
  reaction_163: AA_Ribo_RNA_utr1_sigmaX + 2 AGTP -> AA_2AGTP_Ribo_RNA_utr1_sigmaX; reaction_163_TL_AGTP_F*AA_Ribo_RNA_utr1_sigmaX*AGTP^2 - reaction_163_TL_AGTP_R*AA_2AGTP_Ribo_RNA_utr1_sigmaX;
    reaction_163_TL_AGTP_F = 30; reaction_163_TL_AGTP_R = 10;
  reaction_164: AA_2AGTP_Ribo_RNA_utr1_sigmaX => term_Ribo_RNA_utr1_sigmaX; reaction_164_TXTL_TL_AA_consumption*AA_2AGTP_Ribo_RNA_utr1_sigmaX;
    reaction_164_TXTL_TL_AA_consumption = 0.024;
  reaction_165: AA_2AGTP_Ribo_RNA_utr1_sigmaX => term_Ribo_RNA_utr1_sigmaX + protein_sigmaX; reaction_165_TXTL_TL_rate*AA_2AGTP_Ribo_RNA_utr1_sigmaX;
    reaction_165_TXTL_TL_rate = 0.012;
  reaction_166: term_Ribo_RNA_utr1_sigmaX => RNA_utr1_sigmaX + Ribo; reaction_166_TXTL_RIBOBOUND_TERMINATION_RATE*term_Ribo_RNA_utr1_sigmaX;
    reaction_166_TXTL_RIBOBOUND_TERMINATION_RATE = 50;
  reaction_167: RNA_utr1_sigmaX + RNase -> RNA_utr1_sigmaX_RNase; reaction_167_TXTL_RNAdeg_F*RNA_utr1_sigmaX*RNase - reaction_167_TXTL_RNAdeg_R*RNA_utr1_sigmaX_RNase;
    reaction_167_TXTL_RNAdeg_F = 10; reaction_167_TXTL_RNAdeg_R = 2000;
  reaction_168: RNA_utr1_sigmaX_RNase => RNase; reaction_168_TXTL_RNAdeg_F*RNA_utr1_sigmaX_RNase;
    reaction_168_TXTL_RNAdeg_F = 0.002777778;
  reaction_169: Ribo_RNA_utr1_sigmaX + RNase -> Ribo_RNA_utr1_sigmaX_RNase; reaction_169_TXTL_RNAdeg_F*Ribo_RNA_utr1_sigmaX*RNase - reaction_169_TXTL_RNAdeg_R*Ribo_RNA_utr1_sigmaX_RNase;
    reaction_169_TXTL_RNAdeg_F = 10; reaction_169_TXTL_RNAdeg_R = 2000;
  reaction_170: Ribo_RNA_utr1_sigmaX_RNase => RNase + Ribo; reaction_170_TXTL_RNAdeg_F*Ribo_RNA_utr1_sigmaX_RNase;
    reaction_170_TXTL_RNAdeg_F = 0.002777778;
  reaction_171: AA_2AGTP_Ribo_RNA_utr1_sigmaX + RNase -> AA_2AGTP_Ribo_RNA_utr1_sigmaX_RNase; reaction_171_TXTL_RNAdeg_F*AA_2AGTP_Ribo_RNA_utr1_sigmaX*RNase - reaction_171_TXTL_RNAdeg_R*AA_2AGTP_Ribo_RNA_utr1_sigmaX_RNase;
    reaction_171_TXTL_RNAdeg_F = 10; reaction_171_TXTL_RNAdeg_R = 2000;
  reaction_172: AA_2AGTP_Ribo_RNA_utr1_sigmaX_RNase => RNase + AA + 2 AGTP + Ribo; reaction_172_TXTL_RNAdeg_F*AA_2AGTP_Ribo_RNA_utr1_sigmaX_RNase;
    reaction_172_TXTL_RNAdeg_F = 0.002777778;
  reaction_173: term_Ribo_RNA_utr1_sigmaX + RNase -> term_Ribo_RNA_utr1_sigmaX_RNase; reaction_173_TXTL_RNAdeg_F*term_Ribo_RNA_utr1_sigmaX*RNase - reaction_173_TXTL_RNAdeg_R*term_Ribo_RNA_utr1_sigmaX_RNase;
    reaction_173_TXTL_RNAdeg_F = 10; reaction_173_TXTL_RNAdeg_R = 2000;
  reaction_174: term_Ribo_RNA_utr1_sigmaX_RNase => RNase + Ribo; reaction_174_TXTL_RNAdeg_F*term_Ribo_RNA_utr1_sigmaX_RNase;
    reaction_174_TXTL_RNAdeg_F = 0.002777778;
  reaction_175: AA_Ribo_RNA_utr1_sigmaX + RNase -> AA_Ribo_RNA_utr1_sigmaX_RNase; reaction_175_TXTL_RNAdeg_F*AA_Ribo_RNA_utr1_sigmaX*RNase - reaction_175_TXTL_RNAdeg_R*AA_Ribo_RNA_utr1_sigmaX_RNase;
    reaction_175_TXTL_RNAdeg_F = 10; reaction_175_TXTL_RNAdeg_R = 2000;
  reaction_176: AA_Ribo_RNA_utr1_sigmaX_RNase => RNase + AA + Ribo; reaction_176_TXTL_RNAdeg_F*AA_Ribo_RNA_utr1_sigmaX_RNase;
    reaction_176_TXTL_RNAdeg_F = 0.002777778;
  reaction_177: RNAP + protein_sigma28 -> RNAP28; Sigma28_RNAP_F*RNAP*protein_sigma28 - Sigma28_RNAP_R*RNAP28;
    Sigma28_RNAP_F = 100; Sigma28_RNAP_R = 0.1;
  reaction_178: RNA_utr1_sigma28 + Ribo -> Ribo_RNA_utr1_sigma28; reaction_178_TXTL_UTR_UTR1_F*RNA_utr1_sigma28*Ribo - reaction_178_TXTL_UTR_UTR1_R*Ribo_RNA_utr1_sigma28;
    reaction_178_TXTL_UTR_UTR1_F = 0.2; reaction_178_TXTL_UTR_UTR1_R = 4;
  reaction_179: DNA_plac_utr1_sigma28 + RNAP -> RNAP_DNA_plac_utr1_sigma28; reaction_179_TXTL_PLAC_RNAPbound_F*DNA_plac_utr1_sigma28*RNAP - reaction_179_TXTL_PLAC_RNAPbound_R*RNAP_DNA_plac_utr1_sigma28;
    reaction_179_TXTL_PLAC_RNAPbound_F = 20; reaction_179_TXTL_PLAC_RNAPbound_R = 400;
  reaction_180: CUTP_AGTP_RNAP_DNA_plac_utr1_sigma28 => RNAP_DNA_plac_utr1_sigma28; reaction_180_TXTL_NTP_consumption*CUTP_AGTP_RNAP_DNA_plac_utr1_sigma28;
    reaction_180_TXTL_NTP_consumption = 0.7487705;
  reaction_181: term_RNAP_DNA_plac_utr1_sigma28 => RNAP + DNA_plac_utr1_sigma28; reaction_181_TXTL_RNAPBOUND_TERMINATION_RATE*term_RNAP_DNA_plac_utr1_sigma28;
    reaction_181_TXTL_RNAPBOUND_TERMINATION_RATE = 0.05;
  reaction_182: RNAP_DNA_plac_utr1_sigma28 + AGTP -> AGTP_RNAP_DNA_plac_utr1_sigma28; reaction_182_TXTL_NTP_RNAP_F*RNAP_DNA_plac_utr1_sigma28*AGTP - reaction_182_TXTL_NTP_RNAP_R*AGTP_RNAP_DNA_plac_utr1_sigma28;
    reaction_182_TXTL_NTP_RNAP_F = 1000; reaction_182_TXTL_NTP_RNAP_R = 120000000;
  reaction_183: RNAP_DNA_plac_utr1_sigma28 + CUTP -> CUTP_RNAP_DNA_plac_utr1_sigma28; reaction_183_TXTL_NTP_RNAP_F*RNAP_DNA_plac_utr1_sigma28*CUTP - reaction_183_TXTL_NTP_RNAP_R*CUTP_RNAP_DNA_plac_utr1_sigma28;
    reaction_183_TXTL_NTP_RNAP_F = 1000; reaction_183_TXTL_NTP_RNAP_R = 120000000;
  reaction_184: AGTP_RNAP_DNA_plac_utr1_sigma28 + CUTP -> CUTP_AGTP_RNAP_DNA_plac_utr1_sigma28; reaction_184_TXTL_NTP_RNAP_F*AGTP_RNAP_DNA_plac_utr1_sigma28*CUTP - reaction_184_TXTL_NTP_RNAP_R*CUTP_AGTP_RNAP_DNA_plac_utr1_sigma28;
    reaction_184_TXTL_NTP_RNAP_F = 1; reaction_184_TXTL_NTP_RNAP_R = 120000;
  reaction_185: CUTP_RNAP_DNA_plac_utr1_sigma28 + AGTP -> CUTP_AGTP_RNAP_DNA_plac_utr1_sigma28; reaction_185_TXTL_NTP_RNAP_F*CUTP_RNAP_DNA_plac_utr1_sigma28*AGTP - reaction_185_TXTL_NTP_RNAP_R*CUTP_AGTP_RNAP_DNA_plac_utr1_sigma28;
    reaction_185_TXTL_NTP_RNAP_F = 1; reaction_185_TXTL_NTP_RNAP_R = 120000;
  reaction_186: CUTP_AGTP_RNAP_DNA_plac_utr1_sigma28 => term_RNAP_DNA_plac_utr1_sigma28 + RNA_utr1_sigma28; reaction_186_TXTL_transcription_rate1*CUTP_AGTP_RNAP_DNA_plac_utr1_sigma28;
    reaction_186_TXTL_transcription_rate1 = 0.001229508;
  reaction_187: Ribo_RNA_utr1_sigma28 + AA -> AA_Ribo_RNA_utr1_sigma28; reaction_187_TL_AA_F*Ribo_RNA_utr1_sigma28*AA - reaction_187_TL_AA_R*AA_Ribo_RNA_utr1_sigma28;
    reaction_187_TL_AA_F = 300; reaction_187_TL_AA_R = 0.1;
  reaction_188: AA_Ribo_RNA_utr1_sigma28 + 2 AGTP -> AA_2AGTP_Ribo_RNA_utr1_sigma28; reaction_188_TL_AGTP_F*AA_Ribo_RNA_utr1_sigma28*AGTP^2 - reaction_188_TL_AGTP_R*AA_2AGTP_Ribo_RNA_utr1_sigma28;
    reaction_188_TL_AGTP_F = 30; reaction_188_TL_AGTP_R = 10;
  reaction_189: AA_2AGTP_Ribo_RNA_utr1_sigma28 => term_Ribo_RNA_utr1_sigma28; reaction_189_TXTL_TL_AA_consumption*AA_2AGTP_Ribo_RNA_utr1_sigma28;
    reaction_189_TXTL_TL_AA_consumption = 0.03;
  reaction_190: AA_2AGTP_Ribo_RNA_utr1_sigma28 => term_Ribo_RNA_utr1_sigma28 + protein_sigma28; reaction_190_TXTL_TL_rate*AA_2AGTP_Ribo_RNA_utr1_sigma28;
    reaction_190_TXTL_TL_rate = 0.01;
  reaction_191: term_Ribo_RNA_utr1_sigma28 => RNA_utr1_sigma28 + Ribo; reaction_191_TXTL_RIBOBOUND_TERMINATION_RATE*term_Ribo_RNA_utr1_sigma28;
    reaction_191_TXTL_RIBOBOUND_TERMINATION_RATE = 50;
  reaction_192: RNA_utr1_sigma28 + RNase -> RNA_utr1_sigma28_RNase; reaction_192_TXTL_RNAdeg_F*RNA_utr1_sigma28*RNase - reaction_192_TXTL_RNAdeg_R*RNA_utr1_sigma28_RNase;
    reaction_192_TXTL_RNAdeg_F = 10; reaction_192_TXTL_RNAdeg_R = 2000;
  reaction_193: RNA_utr1_sigma28_RNase => RNase; reaction_193_TXTL_RNAdeg_F*RNA_utr1_sigma28_RNase;
    reaction_193_TXTL_RNAdeg_F = 0.002777778;
  reaction_194: Ribo_RNA_utr1_sigma28 + RNase -> Ribo_RNA_utr1_sigma28_RNase; reaction_194_TXTL_RNAdeg_F*Ribo_RNA_utr1_sigma28*RNase - reaction_194_TXTL_RNAdeg_R*Ribo_RNA_utr1_sigma28_RNase;
    reaction_194_TXTL_RNAdeg_F = 10; reaction_194_TXTL_RNAdeg_R = 2000;
  reaction_195: Ribo_RNA_utr1_sigma28_RNase => RNase + Ribo; reaction_195_TXTL_RNAdeg_F*Ribo_RNA_utr1_sigma28_RNase;
    reaction_195_TXTL_RNAdeg_F = 0.002777778;
  reaction_196: AA_2AGTP_Ribo_RNA_utr1_sigma28 + RNase -> AA_2AGTP_Ribo_RNA_utr1_sigma28_RNase; reaction_196_TXTL_RNAdeg_F*AA_2AGTP_Ribo_RNA_utr1_sigma28*RNase - reaction_196_TXTL_RNAdeg_R*AA_2AGTP_Ribo_RNA_utr1_sigma28_RNase;
    reaction_196_TXTL_RNAdeg_F = 10; reaction_196_TXTL_RNAdeg_R = 2000;
  reaction_197: AA_2AGTP_Ribo_RNA_utr1_sigma28_RNase => RNase + AA + 2 AGTP + Ribo; reaction_197_TXTL_RNAdeg_F*AA_2AGTP_Ribo_RNA_utr1_sigma28_RNase;
    reaction_197_TXTL_RNAdeg_F = 0.002777778;
  reaction_198: term_Ribo_RNA_utr1_sigma28 + RNase -> term_Ribo_RNA_utr1_sigma28_RNase; reaction_198_TXTL_RNAdeg_F*term_Ribo_RNA_utr1_sigma28*RNase - reaction_198_TXTL_RNAdeg_R*term_Ribo_RNA_utr1_sigma28_RNase;
    reaction_198_TXTL_RNAdeg_F = 10; reaction_198_TXTL_RNAdeg_R = 2000;
  reaction_199: term_Ribo_RNA_utr1_sigma28_RNase => RNase + Ribo; reaction_199_TXTL_RNAdeg_F*term_Ribo_RNA_utr1_sigma28_RNase;
    reaction_199_TXTL_RNAdeg_F = 0.002777778;
  reaction_200: AA_Ribo_RNA_utr1_sigma28 + RNase -> AA_Ribo_RNA_utr1_sigma28_RNase; reaction_200_TXTL_RNAdeg_F*AA_Ribo_RNA_utr1_sigma28*RNase - reaction_200_TXTL_RNAdeg_R*AA_Ribo_RNA_utr1_sigma28_RNase;
    reaction_200_TXTL_RNAdeg_F = 10; reaction_200_TXTL_RNAdeg_R = 2000;
  reaction_201: AA_Ribo_RNA_utr1_sigma28_RNase => RNase + AA + Ribo; reaction_201_TXTL_RNAdeg_F*AA_Ribo_RNA_utr1_sigma28_RNase;
    reaction_201_TXTL_RNAdeg_F = 0.002777778;
  reaction_202: AGTP => AGTP_USED; AGTPdeg_F*AGTP;

  // Events:
  event_203: at (time <= 5400): AGTPdeg_F = 0;
  event_204: at (time > 5400): AGTPdeg_F = 0.0002;
end
