// SBML level 3 version 1

model mwb7b30f7e_2bb5_4b6c_8324_279211b36574_B0()
  // mix_of_E30VNPRL_E30VNPRL_gene_expression
  // model units - substance: substance, time: second, volume: volume, area: area, length: metre, extent: substance

  // Compartments:
  compartment cell = 1 volume;

  // Species:
  species mw73633641_2eca_4c24_9c40_f1a831a85ce6_B0 in cell = 100.0001/cell; mw73633641_2eca_4c24_9c40_f1a831a85ce6_B0 is "RNAP";
  species mw2b343d8b_4d07_4836_844b_b44127112e3d_B0 in cell = 30.00002/cell; mw2b343d8b_4d07_4836_844b_b44127112e3d_B0 is "Ribo";
  species mw7f68c32d_d97e_4c82_ab9f_8a2c381c40c8_B0 in cell = 5.000003/cell; mw7f68c32d_d97e_4c82_ab9f_8a2c381c40c8_B0 is "RecBCD";
  species mwe84e6e02_afc6_4ec7_8e8c_c6cfee2e4870_B0 in cell = 100.0001/cell; mwe84e6e02_afc6_4ec7_8e8c_c6cfee2e4870_B0 is "RNase";
  species mwb62b7991_b106_4a2f_931f_40a65f85ab0d_B0 in cell = 3180048/cell; mwb62b7991_b106_4a2f_931f_40a65f85ab0d_B0 is "AGTP";
  species mw4d3dc3a0_c7e7_4793_bd6f_f38b03662af0_B0 in cell = 1908029/cell; mw4d3dc3a0_c7e7_4793_bd6f_f38b03662af0_B0 is "CUTP";
  species mw8304bde5_acc0_4aea_b6a2_f12c80948065_B0 in cell = 3.180048e7/cell; mw8304bde5_acc0_4aea_b6a2_f12c80948065_B0 is "AA";
  species mw4069bf5e_f87a_409a_8490_c7d740c73042_B0 in cell = 0; mw4069bf5e_f87a_409a_8490_c7d740c73042_B0 is "protein tetR";
  species mw0fad3201_6cd9_4687_8519_5cfd5e5092b1_B0 in cell = 0; mw0fad3201_6cd9_4687_8519_5cfd5e5092b1_B0 is "aTc";
  species mw9a01a893_6b8b_42bb_8c14_609b768e905d_B0 in cell = 0; mw9a01a893_6b8b_42bb_8c14_609b768e905d_B0 is "protein tetRdimer";
  species mw62fc188b_4039_4e2f_bf56_f8890887ccd3_B0 in cell = 0; mw62fc188b_4039_4e2f_bf56_f8890887ccd3_B0 is "RNA utr1--tetR";
  species mwb97b2b35_db15_4990_98ba_5a74215259ad_B0 in cell = 0; mwb97b2b35_db15_4990_98ba_5a74215259ad_B0 is "Ribo:RNA utr1--tetR";
  species mw874d6152_56ef_47b1_949c_9ed7b73480aa_B0 in cell = 0.5000003/cell; mw874d6152_56ef_47b1_949c_9ed7b73480aa_B0 is "DNA psigX--utr1--tetR";
  species mwd22ece93_f44b_48e4_bb8c_177fa0067589_B0 in cell = 0; mwd22ece93_f44b_48e4_bb8c_177fa0067589_B0 is "RNAPSIGX";
  species mw2dc1bd9a_10f3_4348_9fb4_b504286689ca_B0 in cell = 0; mw2dc1bd9a_10f3_4348_9fb4_b504286689ca_B0 is "RNAPSIGX:DNA psigX--utr1--tetR";
  species mw36352cbe_a247_45e6_b9e6_354dcc798511_B0 in cell = 0; mw36352cbe_a247_45e6_b9e6_354dcc798511_B0 is "AA:2AGTP:Ribo:RNA utr1--tetR";
  species mwd2f4a46e_c44c_455e_9bf7_a737b25087c5_B0 in cell = 0; mwd2f4a46e_c44c_455e_9bf7_a737b25087c5_B0 is "term_Ribo:RNA utr1--tetR";
  species mw3399a33c_c6bb_48bf_9b85_92187da7755e_B0 in cell = 0; mw3399a33c_c6bb_48bf_9b85_92187da7755e_B0 is "2 aTc:protein tetRdimer";
  species mw183f8092_3f68_4011_a9e5_e94287ff842e_B0 in cell = 0; mw183f8092_3f68_4011_a9e5_e94287ff842e_B0 is "CUTP:AGTP:RNAPSIGX:DNA psigX--utr1--tetR";
  species mw5dec5dad_6074_4727_acc8_cd49277114bb_B0 in cell = 0; mw5dec5dad_6074_4727_acc8_cd49277114bb_B0 is "term_RNAPSIGX:DNA psigX--utr1--tetR";
  species mw36f04b11_2109_44eb_89a8_e15c0b4d283d_B0 in cell = 0; mw36f04b11_2109_44eb_89a8_e15c0b4d283d_B0 is "AGTP:RNAPSIGX:DNA psigX--utr1--tetR";
  species mw368d475f_4f12_4e7f_af0a_98d65de40bd3_B0 in cell = 0; mw368d475f_4f12_4e7f_af0a_98d65de40bd3_B0 is "CUTP:RNAPSIGX:DNA psigX--utr1--tetR";
  species mwbef6706d_0ceb_4dbc_a1bf_58886b077efa_B0 in cell = 0; mwbef6706d_0ceb_4dbc_a1bf_58886b077efa_B0 is "AA:Ribo:RNA utr1--tetR";
  species mwf1fe5659_5ec5_45eb_9c43_16e33a2a8c10_B0 in cell = 0; mwf1fe5659_5ec5_45eb_9c43_16e33a2a8c10_B0 is "RNA utr1--tetR:RNase";
  species mw644b56a3_225e_4905_b91d_65641194fb7b_B0 in cell = 0; mw644b56a3_225e_4905_b91d_65641194fb7b_B0 is "Ribo:RNA utr1--tetR:RNase";
  species mw0b2d0b19_df92_4fa0_a113_72605c1f5822_B0 in cell = 0; mw0b2d0b19_df92_4fa0_a113_72605c1f5822_B0 is "AA:2AGTP:Ribo:RNA utr1--tetR:RNase";
  species mw9e19e54e_9c37_4f15_8e19_5b74b0445750_B0 in cell = 0; mw9e19e54e_9c37_4f15_8e19_5b74b0445750_B0 is "term_Ribo:RNA utr1--tetR:RNase";
  species mwf698caa3_a223_4f23_a862_f770f6446ab9_B0 in cell = 0; mwf698caa3_a223_4f23_a862_f770f6446ab9_B0 is "AA:Ribo:RNA utr1--tetR:RNase";
  species mw987fd738_fa8b_4146_9d23_664ff607676f_B0 in cell = 0; mw987fd738_fa8b_4146_9d23_664ff607676f_B0 is "AGTP_USED";

  // Parameters:
  mwcc808c82_e2e9_4595_a7df_a5d245930dcd_B0 = 0; mwcc808c82_e2e9_4595_a7df_a5d245930dcd_B0 is "AGTPdeg_F";

  // Reactions:
  mw992b20db_8cb1_4fc6_8953_3f52044ee46d_B0: mw9a01a893_6b8b_42bb_8c14_609b768e905d_B0 + 2 mw0fad3201_6cd9_4687_8519_5cfd5e5092b1_B0 -> mw3399a33c_c6bb_48bf_9b85_92187da7755e_B0; TXTL_INDUCER_TETR_ATC_F*mw9a01a893_6b8b_42bb_8c14_609b768e905d_B0*mw0fad3201_6cd9_4687_8519_5cfd5e5092b1_B0^2 - TXTL_INDUCER_TETR_ATC_R*mw3399a33c_c6bb_48bf_9b85_92187da7755e_B0;
    TXTL_INDUCER_TETR_ATC_F = 1e-5; TXTL_INDUCER_TETR_ATC_R = 0.1;
  mw98ecff50_6eaf_4545_8263_2a29f9ca3ed4_B0: 2 mw4069bf5e_f87a_409a_8490_c7d740c73042_B0 -> mw9a01a893_6b8b_42bb_8c14_609b768e905d_B0; kf*mw4069bf5e_f87a_409a_8490_c7d740c73042_B0^2 - kr*mw9a01a893_6b8b_42bb_8c14_609b768e905d_B0;
    kf = 1; kr = 1;
  mw5f73a082_a97e_42bd_a95d_884a701f5efc_B0: mw62fc188b_4039_4e2f_bf56_f8890887ccd3_B0 + mw2b343d8b_4d07_4836_844b_b44127112e3d_B0 -> mwb97b2b35_db15_4990_98ba_5a74215259ad_B0; TXTL_UTR_UTR1_F*mw62fc188b_4039_4e2f_bf56_f8890887ccd3_B0*mw2b343d8b_4d07_4836_844b_b44127112e3d_B0 - TXTL_UTR_UTR1_R*mwb97b2b35_db15_4990_98ba_5a74215259ad_B0;
    TXTL_UTR_UTR1_F = 0.2; TXTL_UTR_UTR1_R = 4;
  mwb243d6df_ff16_4547_ad1c_b6137ce24055_B0: mw874d6152_56ef_47b1_949c_9ed7b73480aa_B0 + mwd22ece93_f44b_48e4_bb8c_177fa0067589_B0 -> mw2dc1bd9a_10f3_4348_9fb4_b504286689ca_B0; TXTL_SIGX_RNAPbound_F*mw874d6152_56ef_47b1_949c_9ed7b73480aa_B0*mwd22ece93_f44b_48e4_bb8c_177fa0067589_B0 - TXTL_SIGX_RNAPbound_R*mw2dc1bd9a_10f3_4348_9fb4_b504286689ca_B0;
    TXTL_SIGX_RNAPbound_F = 10; TXTL_SIGX_RNAPbound_R = 0.1;
  mwdba330e3_ba61_4ec6_8547_df2f72fac148_B0: mw183f8092_3f68_4011_a9e5_e94287ff842e_B0 => mw2dc1bd9a_10f3_4348_9fb4_b504286689ca_B0; TXTL_NTP_consumption*mw183f8092_3f68_4011_a9e5_e94287ff842e_B0;
    TXTL_NTP_consumption = 0.7487705;
  mw156986dd_841d_414d_b68a_5df8ef67870f_B0: mw5dec5dad_6074_4727_acc8_cd49277114bb_B0 => mwd22ece93_f44b_48e4_bb8c_177fa0067589_B0 + mw874d6152_56ef_47b1_949c_9ed7b73480aa_B0; TXTL_RNAPBOUND_TERMINATION_RATE*mw5dec5dad_6074_4727_acc8_cd49277114bb_B0;
    TXTL_RNAPBOUND_TERMINATION_RATE = 0.05;
  mwd9a70698_960c_4a15_a32a_1dab6b9764de_B0: mw2dc1bd9a_10f3_4348_9fb4_b504286689ca_B0 + mwb62b7991_b106_4a2f_931f_40a65f85ab0d_B0 -> mw36f04b11_2109_44eb_89a8_e15c0b4d283d_B0; mwd9a70698_960c_4a15_a32a_1dab6b9764de_B0_TXTL_NTP_RNAP_F*mw2dc1bd9a_10f3_4348_9fb4_b504286689ca_B0*mwb62b7991_b106_4a2f_931f_40a65f85ab0d_B0 - mwd9a70698_960c_4a15_a32a_1dab6b9764de_B0_TXTL_NTP_RNAP_R*mw36f04b11_2109_44eb_89a8_e15c0b4d283d_B0;
    mwd9a70698_960c_4a15_a32a_1dab6b9764de_B0_TXTL_NTP_RNAP_F = 1000; mwd9a70698_960c_4a15_a32a_1dab6b9764de_B0_TXTL_NTP_RNAP_R = 120000000;
  mwf427960c_a13e_4fca_a63b_4c6a42eb54c3_B0: mw2dc1bd9a_10f3_4348_9fb4_b504286689ca_B0 + mw4d3dc3a0_c7e7_4793_bd6f_f38b03662af0_B0 -> mw368d475f_4f12_4e7f_af0a_98d65de40bd3_B0; mwf427960c_a13e_4fca_a63b_4c6a42eb54c3_B0_TXTL_NTP_RNAP_F*mw2dc1bd9a_10f3_4348_9fb4_b504286689ca_B0*mw4d3dc3a0_c7e7_4793_bd6f_f38b03662af0_B0 - mwf427960c_a13e_4fca_a63b_4c6a42eb54c3_B0_TXTL_NTP_RNAP_R*mw368d475f_4f12_4e7f_af0a_98d65de40bd3_B0;
    mwf427960c_a13e_4fca_a63b_4c6a42eb54c3_B0_TXTL_NTP_RNAP_F = 1000; mwf427960c_a13e_4fca_a63b_4c6a42eb54c3_B0_TXTL_NTP_RNAP_R = 120000000;
  mw83cd2708_c554_43de_b0ad_f276f6ed8394_B0: mw36f04b11_2109_44eb_89a8_e15c0b4d283d_B0 + mw4d3dc3a0_c7e7_4793_bd6f_f38b03662af0_B0 -> mw183f8092_3f68_4011_a9e5_e94287ff842e_B0; mw83cd2708_c554_43de_b0ad_f276f6ed8394_B0_TXTL_NTP_RNAP_F*mw36f04b11_2109_44eb_89a8_e15c0b4d283d_B0*mw4d3dc3a0_c7e7_4793_bd6f_f38b03662af0_B0 - mw83cd2708_c554_43de_b0ad_f276f6ed8394_B0_TXTL_NTP_RNAP_R*mw183f8092_3f68_4011_a9e5_e94287ff842e_B0;
    mw83cd2708_c554_43de_b0ad_f276f6ed8394_B0_TXTL_NTP_RNAP_F = 1; mw83cd2708_c554_43de_b0ad_f276f6ed8394_B0_TXTL_NTP_RNAP_R = 120000;
  mw374292dd_4f4f_4655_806b_d761e1e038e4_B0: mw368d475f_4f12_4e7f_af0a_98d65de40bd3_B0 + mwb62b7991_b106_4a2f_931f_40a65f85ab0d_B0 -> mw183f8092_3f68_4011_a9e5_e94287ff842e_B0; mw374292dd_4f4f_4655_806b_d761e1e038e4_B0_TXTL_NTP_RNAP_F*mw368d475f_4f12_4e7f_af0a_98d65de40bd3_B0*mwb62b7991_b106_4a2f_931f_40a65f85ab0d_B0 - mw374292dd_4f4f_4655_806b_d761e1e038e4_B0_TXTL_NTP_RNAP_R*mw183f8092_3f68_4011_a9e5_e94287ff842e_B0;
    mw374292dd_4f4f_4655_806b_d761e1e038e4_B0_TXTL_NTP_RNAP_F = 1; mw374292dd_4f4f_4655_806b_d761e1e038e4_B0_TXTL_NTP_RNAP_R = 120000;
  mwf66db316_43f9_41eb_900c_5caf0d1678cf_B0: mw183f8092_3f68_4011_a9e5_e94287ff842e_B0 => mw5dec5dad_6074_4727_acc8_cd49277114bb_B0 + mw62fc188b_4039_4e2f_bf56_f8890887ccd3_B0; TXTL_transcription_rate1*mw183f8092_3f68_4011_a9e5_e94287ff842e_B0;
    TXTL_transcription_rate1 = 0.001229508;
  mw7689eae1_0ae1_4db4_9f14_5e0683f68430_B0: mwb97b2b35_db15_4990_98ba_5a74215259ad_B0 + mw8304bde5_acc0_4aea_b6a2_f12c80948065_B0 -> mwbef6706d_0ceb_4dbc_a1bf_58886b077efa_B0; TL_AA_F*mwb97b2b35_db15_4990_98ba_5a74215259ad_B0*mw8304bde5_acc0_4aea_b6a2_f12c80948065_B0 - TL_AA_R*mwbef6706d_0ceb_4dbc_a1bf_58886b077efa_B0;
    TL_AA_F = 300; TL_AA_R = 0.1;
  mw0da90e86_f5d1_49bf_9b8d_dc6770b3eb15_B0: mwbef6706d_0ceb_4dbc_a1bf_58886b077efa_B0 + 2 mwb62b7991_b106_4a2f_931f_40a65f85ab0d_B0 -> mw36352cbe_a247_45e6_b9e6_354dcc798511_B0; TL_AGTP_F*mwbef6706d_0ceb_4dbc_a1bf_58886b077efa_B0*mwb62b7991_b106_4a2f_931f_40a65f85ab0d_B0^2 - TL_AGTP_R*mw36352cbe_a247_45e6_b9e6_354dcc798511_B0;
    TL_AGTP_F = 30; TL_AGTP_R = 10;
  mwae44000e_d938_4e82_84d8_dcb761c561df_B0: mw36352cbe_a247_45e6_b9e6_354dcc798511_B0 => mwd2f4a46e_c44c_455e_9bf7_a737b25087c5_B0; TXTL_TL_AA_consumption*mw36352cbe_a247_45e6_b9e6_354dcc798511_B0;
    TXTL_TL_AA_consumption = 0.03;
  mw287a7dfa_f848_42a7_8cb6_64e97785d94a_B0: mw36352cbe_a247_45e6_b9e6_354dcc798511_B0 => mwd2f4a46e_c44c_455e_9bf7_a737b25087c5_B0 + mw4069bf5e_f87a_409a_8490_c7d740c73042_B0; TXTL_TL_rate*mw36352cbe_a247_45e6_b9e6_354dcc798511_B0;
    TXTL_TL_rate = 0.01;
  mw770b7254_05ee_4217_88f3_73a407a1a443_B0: mwd2f4a46e_c44c_455e_9bf7_a737b25087c5_B0 => mw62fc188b_4039_4e2f_bf56_f8890887ccd3_B0 + mw2b343d8b_4d07_4836_844b_b44127112e3d_B0; TXTL_RIBOBOUND_TERMINATION_RATE*mwd2f4a46e_c44c_455e_9bf7_a737b25087c5_B0;
    TXTL_RIBOBOUND_TERMINATION_RATE = 50;
  mw438fee1d_1a73_41ea_9568_b3c4ba0bdc98_B0: mw62fc188b_4039_4e2f_bf56_f8890887ccd3_B0 + mwe84e6e02_afc6_4ec7_8e8c_c6cfee2e4870_B0 -> mwf1fe5659_5ec5_45eb_9c43_16e33a2a8c10_B0; mw438fee1d_1a73_41ea_9568_b3c4ba0bdc98_B0_TXTL_RNAdeg_F*mw62fc188b_4039_4e2f_bf56_f8890887ccd3_B0*mwe84e6e02_afc6_4ec7_8e8c_c6cfee2e4870_B0 - mw438fee1d_1a73_41ea_9568_b3c4ba0bdc98_B0_TXTL_RNAdeg_R*mwf1fe5659_5ec5_45eb_9c43_16e33a2a8c10_B0;
    mw438fee1d_1a73_41ea_9568_b3c4ba0bdc98_B0_TXTL_RNAdeg_F = 10; mw438fee1d_1a73_41ea_9568_b3c4ba0bdc98_B0_TXTL_RNAdeg_R = 2000;
  mw8ec5eeb3_68e8_4b67_9cc7_890419bb39db_B0: mwf1fe5659_5ec5_45eb_9c43_16e33a2a8c10_B0 => mwe84e6e02_afc6_4ec7_8e8c_c6cfee2e4870_B0; mw8ec5eeb3_68e8_4b67_9cc7_890419bb39db_B0_TXTL_RNAdeg_F*mwf1fe5659_5ec5_45eb_9c43_16e33a2a8c10_B0;
    mw8ec5eeb3_68e8_4b67_9cc7_890419bb39db_B0_TXTL_RNAdeg_F = 0.002777778;
  mw1d2715e3_54b3_4592_a616_32c6df52c1d2_B0: mwb97b2b35_db15_4990_98ba_5a74215259ad_B0 + mwe84e6e02_afc6_4ec7_8e8c_c6cfee2e4870_B0 -> mw644b56a3_225e_4905_b91d_65641194fb7b_B0; mw1d2715e3_54b3_4592_a616_32c6df52c1d2_B0_TXTL_RNAdeg_F*mwb97b2b35_db15_4990_98ba_5a74215259ad_B0*mwe84e6e02_afc6_4ec7_8e8c_c6cfee2e4870_B0 - mw1d2715e3_54b3_4592_a616_32c6df52c1d2_B0_TXTL_RNAdeg_R*mw644b56a3_225e_4905_b91d_65641194fb7b_B0;
    mw1d2715e3_54b3_4592_a616_32c6df52c1d2_B0_TXTL_RNAdeg_F = 10; mw1d2715e3_54b3_4592_a616_32c6df52c1d2_B0_TXTL_RNAdeg_R = 2000;
  mwb6a40eb0_5b97_4b86_a0f3_1b743a2d4b50_B0: mw644b56a3_225e_4905_b91d_65641194fb7b_B0 => mwe84e6e02_afc6_4ec7_8e8c_c6cfee2e4870_B0 + mw2b343d8b_4d07_4836_844b_b44127112e3d_B0; mwb6a40eb0_5b97_4b86_a0f3_1b743a2d4b50_B0_TXTL_RNAdeg_F*mw644b56a3_225e_4905_b91d_65641194fb7b_B0;
    mwb6a40eb0_5b97_4b86_a0f3_1b743a2d4b50_B0_TXTL_RNAdeg_F = 0.002777778;
  mw50ae8258_2d92_40c9_83c4_5fc0f5b7c027_B0: mw36352cbe_a247_45e6_b9e6_354dcc798511_B0 + mwe84e6e02_afc6_4ec7_8e8c_c6cfee2e4870_B0 -> mw0b2d0b19_df92_4fa0_a113_72605c1f5822_B0; mw50ae8258_2d92_40c9_83c4_5fc0f5b7c027_B0_TXTL_RNAdeg_F*mw36352cbe_a247_45e6_b9e6_354dcc798511_B0*mwe84e6e02_afc6_4ec7_8e8c_c6cfee2e4870_B0 - mw50ae8258_2d92_40c9_83c4_5fc0f5b7c027_B0_TXTL_RNAdeg_R*mw0b2d0b19_df92_4fa0_a113_72605c1f5822_B0;
    mw50ae8258_2d92_40c9_83c4_5fc0f5b7c027_B0_TXTL_RNAdeg_F = 10; mw50ae8258_2d92_40c9_83c4_5fc0f5b7c027_B0_TXTL_RNAdeg_R = 2000;
  mw90efdff8_d377_47b1_a092_e844214a13cc_B0: mw0b2d0b19_df92_4fa0_a113_72605c1f5822_B0 => mwe84e6e02_afc6_4ec7_8e8c_c6cfee2e4870_B0 + mw8304bde5_acc0_4aea_b6a2_f12c80948065_B0 + 2 mwb62b7991_b106_4a2f_931f_40a65f85ab0d_B0 + mw2b343d8b_4d07_4836_844b_b44127112e3d_B0; mw90efdff8_d377_47b1_a092_e844214a13cc_B0_TXTL_RNAdeg_F*mw0b2d0b19_df92_4fa0_a113_72605c1f5822_B0;
    mw90efdff8_d377_47b1_a092_e844214a13cc_B0_TXTL_RNAdeg_F = 0.002777778;
  mwf40f2087_8235_4b0b_b956_86f42c1f1a8a_B0: mwd2f4a46e_c44c_455e_9bf7_a737b25087c5_B0 + mwe84e6e02_afc6_4ec7_8e8c_c6cfee2e4870_B0 -> mw9e19e54e_9c37_4f15_8e19_5b74b0445750_B0; mwf40f2087_8235_4b0b_b956_86f42c1f1a8a_B0_TXTL_RNAdeg_F*mwd2f4a46e_c44c_455e_9bf7_a737b25087c5_B0*mwe84e6e02_afc6_4ec7_8e8c_c6cfee2e4870_B0 - mwf40f2087_8235_4b0b_b956_86f42c1f1a8a_B0_TXTL_RNAdeg_R*mw9e19e54e_9c37_4f15_8e19_5b74b0445750_B0;
    mwf40f2087_8235_4b0b_b956_86f42c1f1a8a_B0_TXTL_RNAdeg_F = 10; mwf40f2087_8235_4b0b_b956_86f42c1f1a8a_B0_TXTL_RNAdeg_R = 2000;
  mwbdca5a43_6bc6_43bc_9525_5a19c03e6f90_B0: mw9e19e54e_9c37_4f15_8e19_5b74b0445750_B0 => mwe84e6e02_afc6_4ec7_8e8c_c6cfee2e4870_B0 + mw2b343d8b_4d07_4836_844b_b44127112e3d_B0; mwbdca5a43_6bc6_43bc_9525_5a19c03e6f90_B0_TXTL_RNAdeg_F*mw9e19e54e_9c37_4f15_8e19_5b74b0445750_B0;
    mwbdca5a43_6bc6_43bc_9525_5a19c03e6f90_B0_TXTL_RNAdeg_F = 0.002777778;
  mwb940ab2c_0ab4_4fd4_9b65_1b9a48e6147b_B0: mwbef6706d_0ceb_4dbc_a1bf_58886b077efa_B0 + mwe84e6e02_afc6_4ec7_8e8c_c6cfee2e4870_B0 -> mwf698caa3_a223_4f23_a862_f770f6446ab9_B0; mwb940ab2c_0ab4_4fd4_9b65_1b9a48e6147b_B0_TXTL_RNAdeg_F*mwbef6706d_0ceb_4dbc_a1bf_58886b077efa_B0*mwe84e6e02_afc6_4ec7_8e8c_c6cfee2e4870_B0 - mwb940ab2c_0ab4_4fd4_9b65_1b9a48e6147b_B0_TXTL_RNAdeg_R*mwf698caa3_a223_4f23_a862_f770f6446ab9_B0;
    mwb940ab2c_0ab4_4fd4_9b65_1b9a48e6147b_B0_TXTL_RNAdeg_F = 10; mwb940ab2c_0ab4_4fd4_9b65_1b9a48e6147b_B0_TXTL_RNAdeg_R = 2000;
  mw8312da9a_0ca1_44e3_9941_cc2a52bfb41c_B0: mwf698caa3_a223_4f23_a862_f770f6446ab9_B0 => mwe84e6e02_afc6_4ec7_8e8c_c6cfee2e4870_B0 + mw8304bde5_acc0_4aea_b6a2_f12c80948065_B0 + mw2b343d8b_4d07_4836_844b_b44127112e3d_B0; mw8312da9a_0ca1_44e3_9941_cc2a52bfb41c_B0_TXTL_RNAdeg_F*mwf698caa3_a223_4f23_a862_f770f6446ab9_B0;
    mw8312da9a_0ca1_44e3_9941_cc2a52bfb41c_B0_TXTL_RNAdeg_F = 0.002777778;
  mw92882118_14cc_452d_99cd_26e3e65974a2_B0: mwb62b7991_b106_4a2f_931f_40a65f85ab0d_B0 => mw987fd738_fa8b_4146_9d23_664ff607676f_B0; mwcc808c82_e2e9_4595_a7df_a5d245930dcd_B0*mwb62b7991_b106_4a2f_931f_40a65f85ab0d_B0;

  // Events:
  event_59: at (time <= 5400): mwcc808c82_e2e9_4595_a7df_a5d245930dcd_B0 = 0;
  event_60: at (time > 5400): mwcc808c82_e2e9_4595_a7df_a5d245930dcd_B0 = 0.0002;

  // Unit definitions:
  unit volume = litre;
  unit substance = mole;
  unit area = metre^2;
end
