// SBML level 3 version 1

model DPmodel()
  // model units - substance: count, time: second, extent: mole

  // Compartments:
  compartment cell = 1 litre;

  // Species:
  species inp in cell = 50/cell;
  species X in cell = 50/cell;
  species C1 in cell = 0;
  species Xp in cell = 0;
  species E in cell = 50/cell;
  species C2 in cell = 0;
  species C3 in cell = 0;
  species out in cell = 0;
  species C4 in cell = 0;

  // Parameters:
  k1f = 1 per_second;
  k1r = 1 per_second;
  k2f = 1 per_second;
  k3f = 1 per_second;
  k3r = 1 per_second;
  k4f = 1 per_second;
  k5f = 1 per_second;
  k5r = 1 per_second;
  k6f = 1 per_second;
  k7f = 1 per_second;
  k7r = 1 per_second;
  k8f = 1 per_second;

  // Reactions:
  r1: inp + X -> C1; k1f*inp*X - k1r*C1;
  r2: C1 => inp + Xp; k2f*C1;
  r3: E + Xp -> C2; k3f*E*Xp - k3r*C2;
  r4: C2 => E + X; k4f*C2;
  r5: inp + Xp -> C3; k5f*inp*Xp - k5r*C3;
  r6: C3 => out + inp; k6f*C3;
  r7: E + out -> C4; k7f*E*out - k7r*C4;
  r8: C4 => Xp + E; k8f*C4;

  // Unit definitions:
  unit per_second = 1 / second;
  unit count = dimensionless;
end
