// SBML level 3 version 1

model connected_model()
  // model units - substance: count, time: seconds, extent: mole

  // Compartments:
  compartment cell = 1 litre;

  // Species:
  species inp_DP1multiple in cell = 100/cell;
  species X_DP1multiple in cell = 100/cell;
  species C1_DP1multiple in cell = 0;
  species Xp_DP1multiple in cell = 0;
  species E_DP1multiple in cell = 100/cell;
  species C2_DP1multiple in cell = 0;
  species C3_DP1multiple in cell = 0;
  species pA_IFFL_IFFL in cell = 0; pA_IFFL_IFFL is "out";
  species C4_DP1multiple in cell = 0;
  species inp_IFFL_IFFL in cell = 0;
  species DA_IFFL_IFFL in cell = 50/cell;
  species C1_IFFL_IFFL in cell = 0;
  species mA_IFFL_IFFL in cell = 0;
  species pA_IFFL_IFFL in cell = 0;
  species C2_IFFL_IFFL in cell = 0;
  species DB_IFFL_IFFL in cell = 50/cell;
  species mB_IFFL_IFFL in cell = 0;
  species pB_IFFL_IFFL in cell = 0;
  species C3_IFFL_IFFL in cell = 0;
  species DC_IFFL_IFFL in cell = 50/cell;
  species C4_IFFL_IFFL in cell = 0;
  species C5_IFFL_IFFL in cell = 0;
  species C6_IFFL_IFFL in cell = 0;
  species mC_IFFL_IFFL in cell = 0;
  species out_IFFL_IFFL in cell = 0;

  // Parameters:
  k1f_DP1 = 1 per_second;
  k1r_DP1 = 1 per_second;
  k2f_DP1 = 1 per_second;
  k3f_DP1 = 1 per_second;
  k3r_DP1 = 1 per_second;
  k4f_DP1 = 1 per_second;
  k5f_DP1 = 1 per_second;
  k5r_DP1 = 1 per_second;
  k6f_DP1 = 1 per_second;
  k7f_DP1 = 1 per_second;
  k7r_DP1 = 1 per_second;
  k8f_DP1 = 1 per_second;
  k1f_DP2 = 1 per_second;
  k1r_DP2 = 1 per_second;
  k2f_DP2 = 1 per_second;
  k3f_DP2 = 1 per_second;
  k3r_DP2 = 1 per_second;
  k4f_DP2 = 1 per_second;
  k5f_DP2 = 1 per_second;
  k5r_DP2 = 1 per_second;
  k6f_DP2 = 1 per_second;
  k7f_DP2 = 1 per_second;
  k7r_DP2 = 1 per_second;
  k8f_DP2 = 1 per_second;
  k1f_IFFL = 1 per_second;
  k1r_IFFL = 1 per_second;
  k2f_IFFL = 1 per_second;
  k3f_IFFL = 1 per_second;
  k4f_IFFL = 1 per_second;
  k5f_IFFL = 1 per_second;
  k6f_IFFL = 1 per_second;
  k6r_IFFL = 1 per_second;
  k7f_IFFL = 1 per_second;
  k8f_IFFL = 1 per_second;
  k9f_IFFL = 1 per_second;
  k10f_IFFL = 1 per_second;
  k11f_IFFL = 1 per_second;
  k11r_IFFL = 1 per_second;
  k12f_IFFL = 1 per_second;
  k12r_IFFL = 1 per_second;
  k13f_IFFL = 1 per_second;
  k13r_IFFL = 1 per_second;
  k14f_IFFL = 1 per_second;
  k14r_IFFL = 1 per_second;
  k15f_IFFL = 1 per_second;
  k16f_IFFL = 1 per_second;
  k17f_IFFL = 1 per_second;
  k18f_IFFL = 1 per_second;

  // Reactions:
  r1_DP1: inp_DP1multiple + X_DP1multiple -> C1_DP1multiple; k1f_DP1*inp_DP1multiple*X_DP1multiple - k1r_DP1*C1_DP1multiple;
  r2_DP1: C1_DP1multiple => inp_DP1multiple + Xp_DP1multiple; k2f_DP1*C1_DP1multiple;
  r3_DP1: E_DP1multiple + Xp_DP1multiple -> C2_DP1multiple; k3f_DP1*E_DP1multiple*Xp_DP1multiple - k3r_DP1*C2_DP1multiple;
  r4_DP1: C2_DP1multiple => E_DP1multiple + X_DP1multiple; k4f_DP1*C2_DP1multiple;
  r5_DP1: inp_DP1multiple + Xp_DP1multiple -> C3_DP1multiple; k5f_DP1*inp_DP1multiple*Xp_DP1multiple - k5r_DP1*C3_DP1multiple;
  r6_DP1: C3_DP1multiple => pA_IFFL_IFFL + inp_DP1multiple; k6f_DP1*C3_DP1multiple;
  r7_DP1: E_DP1multiple + pA_IFFL_IFFL -> C4_DP1multiple; k7f_DP1*E_DP1multiple*pA_IFFL_IFFL - k7r_DP1*C4_DP1multiple;
  r8_DP1: C4_DP1multiple => Xp_DP1multiple + E_DP1multiple; k8f_DP1*C4_DP1multiple;
  r1_DP2: inp_DP1multiple + X_DP1multiple -> C1_DP1multiple; k1f_DP2*inp_DP1multiple*X_DP1multiple - k1r_DP2*C1_DP1multiple;
  r2_DP2: C1_DP1multiple => inp_DP1multiple + Xp_DP1multiple; k2f_DP2*C1_DP1multiple;
  r3_DP2: E_DP1multiple + Xp_DP1multiple -> C2_DP1multiple; k3f_DP2*E_DP1multiple*Xp_DP1multiple - k3r_DP2*C2_DP1multiple;
  r4_DP2: C2_DP1multiple => E_DP1multiple + X_DP1multiple; k4f_DP2*C2_DP1multiple;
  r5_DP2: inp_DP1multiple + Xp_DP1multiple -> C3_DP1multiple; k5f_DP2*inp_DP1multiple*Xp_DP1multiple - k5r_DP2*C3_DP1multiple;
  r6_DP2: C3_DP1multiple => pA_IFFL_IFFL + inp_DP1multiple; k6f_DP2*C3_DP1multiple;
  r7_DP2: E_DP1multiple + pA_IFFL_IFFL -> C4_DP1multiple; k7f_DP2*E_DP1multiple*pA_IFFL_IFFL - k7r_DP2*C4_DP1multiple;
  r8_DP2: C4_DP1multiple => Xp_DP1multiple + E_DP1multiple; k8f_DP2*C4_DP1multiple;
  r1_IFFL: inp_IFFL_IFFL + DA_IFFL_IFFL -> C1_IFFL_IFFL; k1f_IFFL*inp_IFFL_IFFL*DA_IFFL_IFFL - k1r_IFFL*C1_IFFL_IFFL;
  r2_IFFL: C1_IFFL_IFFL => C1_IFFL_IFFL + mA_IFFL_IFFL; k2f_IFFL*C1_IFFL_IFFL;
  r3_IFFL: mA_IFFL_IFFL => mA_IFFL_IFFL + pA_IFFL_IFFL; k3f_IFFL*mA_IFFL_IFFL;
  r4_IFFL: mA_IFFL_IFFL => ; k4f_IFFL*mA_IFFL_IFFL;
  r5_IFFL: pA_IFFL_IFFL => ; k5f_IFFL*pA_IFFL_IFFL;
  r6_IFFL: pA_IFFL_IFFL + DB_IFFL_IFFL -> C2_IFFL_IFFL; k6f_IFFL*pA_IFFL_IFFL*DB_IFFL_IFFL - k6r_IFFL*C2_IFFL_IFFL;
  r7_IFFL: C2_IFFL_IFFL => C2_IFFL_IFFL + mB_IFFL_IFFL; k7f_IFFL*C2_IFFL_IFFL;
  r8_IFFL: mB_IFFL_IFFL => mB_IFFL_IFFL + pB_IFFL_IFFL; k8f_IFFL*mB_IFFL_IFFL;
  r9_IFFL: mB_IFFL_IFFL => ; k9f_IFFL*mB_IFFL_IFFL;
  r10_IFFL: pB_IFFL_IFFL => ; k10f_IFFL*pB_IFFL_IFFL;
  r11_IFFL: pB_IFFL_IFFL + DC_IFFL_IFFL -> C3_IFFL_IFFL; k11f_IFFL*pB_IFFL_IFFL*DC_IFFL_IFFL - k11r_IFFL*C3_IFFL_IFFL;
  r12_IFFL: pA_IFFL_IFFL + DC_IFFL_IFFL -> C4_IFFL_IFFL; k12f_IFFL*pA_IFFL_IFFL*DC_IFFL_IFFL - k12r_IFFL*C4_IFFL_IFFL;
  r13_IFFL: pA_IFFL_IFFL + C3_IFFL_IFFL -> C5_IFFL_IFFL; k13f_IFFL*pA_IFFL_IFFL*C3_IFFL_IFFL - k13r_IFFL*C5_IFFL_IFFL;
  r14_IFFL: pB_IFFL_IFFL + C4_IFFL_IFFL -> C6_IFFL_IFFL; k14f_IFFL*pB_IFFL_IFFL*C4_IFFL_IFFL - k14r_IFFL*C6_IFFL_IFFL;
  r15_IFFL: C4_IFFL_IFFL => C4_IFFL_IFFL + mC_IFFL_IFFL; k15f_IFFL*C4_IFFL_IFFL;
  r16_IFFL: mC_IFFL_IFFL => mC_IFFL_IFFL + out_IFFL_IFFL; k16f_IFFL*mC_IFFL_IFFL;
  r17_IFFL: mC_IFFL_IFFL => ; k17f_IFFL*mC_IFFL_IFFL;
  r18_IFFL: out_IFFL_IFFL => ; k18f_IFFL*out_IFFL_IFFL;

  // Unit definitions:
  unit per_second = 1 / second;
end
