// SBML level 3 version 1

model DP()
  // model units - substance: count, time: second, extent: mole

  // Compartments:
  compartment cell = 1 litre;

  // Species:
  species inP in cell;
  species X in cell = 50/cell;
  species inP_X in cell = 0; inP_X is "inP:X";
  species X_P in cell = 0; X_P is "X:P";
  species E in cell = 50/cell;
  species E_X_P in cell = 0; E_X_P is "E:X:P";
  species inP_X_P in cell = 0; inP_X_P is "inP:X:P";
  species X_P_P in cell = 0; X_P_P is "X:P:P";
  species E_X_P_P in cell = 0; E_X_P_P is "E:X:P:P";

  // Parameters:
  k1f = 1 per_second;
  k1r = 1 per_second;
  k2f = 2*k1f; k2f has per_second;
  k3f = 1 per_second;
  k3r = 1 per_second;
  k4f = 1 per_second;
  k5f = 1 per_second;
  k5r = 1 per_second;
  k6f = 1 per_second;
  k7f = 1 per_second;
  k7r = 1 per_second;
  k8f = 1 per_second;

  // Assignment rules:
  inP := 2*X;
  inP := 2*X;

  // Rate rules:
  k3f' = 2;
  k3f' = 2;

  // Reactions:
  r1: inP + X -> inP_X; k1f*inP*X - k1r*inP_X;
  r2: inP_X => inP + X_P; k2f*inP_X;
  r3: E + X_P -> E_X_P; k3f*E*X_P - k3r*E_X_P;
  r4: E_X_P => E + X; k4f*E_X_P;
  r5: inP + X_P -> inP_X_P; k5f*inP*X_P - k5r*inP_X_P;
  r6: inP_X_P => X_P_P + inP; k6f*inP_X_P;
  r7: E + X_P_P -> E_X_P_P; k7f*E*X_P_P - k7r*E_X_P_P;
  r8: E_X_P_P => X_P + E; k8f*E_X_P_P;

  // Events:
  ev1: at (k6f < 0): k7f = 10;
  ev1: at (k6f < 0): k7f = 10;

  // Constraints:
  constraint k1f > 0;  // constraint_name
  constraint k1f > 0;  // constraint_name

  // Unit definitions:
  unit per_second = 1 / second;
  unit count = dimensionless;
end
