// SBML level 3 version 1

model connected_model()
  // model units - substance: count, time: seconds, extent: mole

  // Species:
  species inp_DP1multiple in cell = 100/cell;
  species X_DP1multiple in cell = 100/cell;
  species C1_DP1multiple in cell = 0;
  species Xp_DP1multiple in cell = 0;
  species E_DP1multiple in cell = 100/cell;
  species C2_DP1multiple in cell = 0;
  species C3_DP1multiple in cell = 0;
  species pA_IFFL in cell = 0;
  species C4_DP1multiple in cell = 0;
  species inp_IFFL in cell = 0;
  species DA_IFFL in cell = 50/cell;
  species C1_IFFL in cell = 0;
  species mA_IFFL in cell = 0;
  species pA_IFFL in cell = 0;
  species C2_IFFL in cell = 0;
  species DB_IFFL in cell = 50/cell;
  species mB_IFFL in cell = 0;
  species pB_IFFL in cell = 0;
  species C3_IFFL in cell = 0;
  species DC_IFFL in cell = 50/cell;
  species C4_IFFL in cell = 0;
  species C5_IFFL in cell = 0;
  species C6_IFFL in cell = 0;
  species mC_IFFL in cell = 0;
  species out_IFFL in cell = 0;

  // Parameters:
  k1f_DP1 = 1 per_second;
  k1r_DP1 = 1 per_second;
  k2f_DP1 = 1 per_second;
  k3f_DP1 = 1 per_second;
  k3r_DP1 = 1 per_second;
  k4f_DP1 = 1 per_second;
  k5f_DP1 = 1 per_second;
  k5r_DP1 = 1 per_second;
  k6f_DP1 = 1 per_second;
  k7f_DP1 = 1 per_second;
  k7r_DP1 = 1 per_second;
  k8f_DP1 = 1 per_second;
  k1f_DP2 = 1 per_second;
  k1r_DP2 = 1 per_second;
  k2f_DP2 = 1 per_second;
  k3f_DP2 = 1 per_second;
  k3r_DP2 = 1 per_second;
  k4f_DP2 = 1 per_second;
  k5f_DP2 = 1 per_second;
  k5r_DP2 = 1 per_second;
  k6f_DP2 = 1 per_second;
  k7f_DP2 = 1 per_second;
  k7r_DP2 = 1 per_second;
  k8f_DP2 = 1 per_second;
  IFFL_k1f = 1 per_second;
  IFFL_k1r = 1 per_second;
  IFFL_k2f = 1 per_second;
  IFFL_k3f = 1 per_second;
  IFFL_k4f = 1 per_second;
  IFFL_k5f = 1 per_second;
  IFFL_k6f = 1 per_second;
  IFFL_k6r = 1 per_second;
  IFFL_k7f = 1 per_second;
  IFFL_k8f = 1 per_second;
  IFFL_k9f = 1 per_second;
  IFFL_k10f = 1 per_second;
  IFFL_k11f = 1 per_second;
  IFFL_k11r = 1 per_second;
  IFFL_k12f = 1 per_second;
  IFFL_k12r = 1 per_second;
  IFFL_k13f = 1 per_second;
  IFFL_k13r = 1 per_second;
  IFFL_k14f = 1 per_second;
  IFFL_k14r = 1 per_second;
  IFFL_k15f = 1 per_second;
  IFFL_k16f = 1 per_second;
  IFFL_k17f = 1 per_second;
  IFFL_k18f = 1 per_second;

  // Reactions:
  r1_DP1: inp_DP1multiple + X_DP1multiple -> C1_DP1multiple; k1f_DP1*inp_DP1multiple*X_DP1multiple - k1r_DP1*C1_DP1multiple;
  r2_DP1: C1_DP1multiple => inp_DP1multiple + Xp_DP1multiple; k2f_DP1*C1_DP1multiple;
  r3_DP1: E_DP1multiple + Xp_DP1multiple -> C2_DP1multiple; k3f_DP1*E_DP1multiple*Xp_DP1multiple - k3r_DP1*C2_DP1multiple;
  r4_DP1: C2_DP1multiple => E_DP1multiple + X_DP1multiple; k4f_DP1*C2_DP1multiple;
  r5_DP1: inp_DP1multiple + Xp_DP1multiple -> C3_DP1multiple; k5f_DP1*inp_DP1multiple*Xp_DP1multiple - k5r_DP1*C3_DP1multiple;
  r6_DP1: C3_DP1multiple => pA_IFFL + inp_DP1multiple; k6f_DP1*C3_DP1multiple;
  r7_DP1: E_DP1multiple + pA_IFFL -> C4_DP1multiple; k7f_DP1*E_DP1multiple*pA_IFFL - k7r_DP1*C4_DP1multiple;
  r8_DP1: C4_DP1multiple => Xp_DP1multiple + E_DP1multiple; k8f_DP1*C4_DP1multiple;
  r1_DP2: inp_DP1multiple + X_DP1multiple -> C1_DP1multiple; k1f_DP2*inp_DP1multiple*X_DP1multiple - k1r_DP2*C1_DP1multiple;
  r2_DP2: C1_DP1multiple => inp_DP1multiple + Xp_DP1multiple; k2f_DP2*C1_DP1multiple;
  r3_DP2: E_DP1multiple + Xp_DP1multiple -> C2_DP1multiple; k3f_DP2*E_DP1multiple*Xp_DP1multiple - k3r_DP2*C2_DP1multiple;
  r4_DP2: C2_DP1multiple => E_DP1multiple + X_DP1multiple; k4f_DP2*C2_DP1multiple;
  r5_DP2: inp_DP1multiple + Xp_DP1multiple -> C3_DP1multiple; k5f_DP2*inp_DP1multiple*Xp_DP1multiple - k5r_DP2*C3_DP1multiple;
  r6_DP2: C3_DP1multiple => pA_IFFL + inp_DP1multiple; k6f_DP2*C3_DP1multiple;
  r7_DP2: E_DP1multiple + pA_IFFL -> C4_DP1multiple; k7f_DP2*E_DP1multiple*pA_IFFL - k7r_DP2*C4_DP1multiple;
  r8_DP2: C4_DP1multiple => Xp_DP1multiple + E_DP1multiple; k8f_DP2*C4_DP1multiple;
  IFFL_r1: inp_IFFL + DA_IFFL -> C1_IFFL; IFFL_k1f*inp_IFFL*DA_IFFL - IFFL_k1r*C1_IFFL;
  IFFL_r2: C1_IFFL => C1_IFFL + mA_IFFL; IFFL_k2f*C1_IFFL;
  IFFL_r3: mA_IFFL => mA_IFFL + pA_IFFL; IFFL_k3f*mA_IFFL;
  IFFL_r4: mA_IFFL => ; IFFL_k4f*mA_IFFL;
  IFFL_r5: pA_IFFL => ; IFFL_k5f*pA_IFFL;
  IFFL_r6: pA_IFFL + DB_IFFL -> C2_IFFL; IFFL_k6f*pA_IFFL*DB_IFFL - IFFL_k6r*C2_IFFL;
  IFFL_r7: C2_IFFL => C2_IFFL + mB_IFFL; IFFL_k7f*C2_IFFL;
  IFFL_r8: mB_IFFL => mB_IFFL + pB_IFFL; IFFL_k8f*mB_IFFL;
  IFFL_r9: mB_IFFL => ; IFFL_k9f*mB_IFFL;
  IFFL_r10: pB_IFFL => ; IFFL_k10f*pB_IFFL;
  IFFL_r11: pB_IFFL + DC_IFFL -> C3_IFFL; IFFL_k11f*pB_IFFL*DC_IFFL - IFFL_k11r*C3_IFFL;
  IFFL_r12: pA_IFFL + DC_IFFL -> C4_IFFL; IFFL_k12f*pA_IFFL*DC_IFFL - IFFL_k12r*C4_IFFL;
  IFFL_r13: pA_IFFL + C3_IFFL -> C5_IFFL; IFFL_k13f*pA_IFFL*C3_IFFL - IFFL_k13r*C5_IFFL;
  IFFL_r14: pB_IFFL + C4_IFFL -> C6_IFFL; IFFL_k14f*pB_IFFL*C4_IFFL - IFFL_k14r*C6_IFFL;
  IFFL_r15: C4_IFFL => C4_IFFL + mC_IFFL; IFFL_k15f*C4_IFFL;
  IFFL_r16: mC_IFFL => mC_IFFL + out_IFFL; IFFL_k16f*mC_IFFL;
  IFFL_r17: mC_IFFL => ; IFFL_k17f*mC_IFFL;
  IFFL_r18: out_IFFL => ; IFFL_k18f*out_IFFL;
end
