// SBML level 3 version 1

model fastModel()
  // model units - substance: count, time: second, extent: mole

  // Compartments:
  compartment cell = 1 litre;

  // Species:
  species inp_1 in cell = 50/cell;
  species X in cell = 50/cell;
  species C1_1 in cell = 0;
  species Xp_1 in cell = 0;
  species E_1 in cell = 50/cell;
  species out_1 in cell = 0;
  species C4_1 in cell = 0;

  // Parameters:
  k1f_1 = 1 per_second;
  k1r_1 = 1 per_second;
  k2f_1 = 1 per_second;
  k3f_1 = 1 per_second;
  k3r_1 = 1 per_second;
  k4f_1 = 1 per_second;
  k5f_1 = 1 per_second;
  k5r_1 = 1 per_second;
  k6f_1 = 1 per_second;
  k7f_1 = 1 per_second;
  k7r_1 = 1 per_second;
  k8f_1 = 1 per_second;

  // Reactions:
  r1_1: inp_1 + X -> C1_1; k1f_1*inp_1*X - k1r_1*C1_1;  // fast
    TXTL_INDUCER_TETR_ATC_F = 1e-5; TXTL_INDUCER_TETR_ATC_R = 0.1;
  r2_1: C1_1 => inp_1 + Xp_1; k2f_1*C1_1;  // fast
  r7_1: E_1 + out_1 -> C4_1; k7f_1*E_1*out_1 - k7r_1*C4_1;  // fast

  // Unit definitions:
  unit per_second = 1 / second;
  unit count = dimensionless;
end
