// SBML level 3 version 1

model DP_1()
  // model units - substance: count, time: second, extent: mole

  // Compartments:
  compartment cell = 1 litre;

  // Species:
  species inp_1 in cell = 50/cell;
  species X in cell = 0;
  species C1_1 in cell = 0;
  species Xp_1 in cell = 50/cell;
  species E_1 in cell = 50/cell;
  species C2_1 in cell = 0;
  species C3_1 in cell = 0;
  species out_1 in cell = 0;
  species C4_1 in cell = 0;

  // Parameters:
  k1f_1 = 1 per_second;
  k1r_1 = 1 per_second;
  k2f_1 = 1 per_second;
  k3f_1 = 1 per_second;
  k3r_1 = 1 per_second;
  k4f_1 = 1 per_second;
  k5f_1 = 1 per_second;
  k5r_1 = 1 per_second;
  k6f_1 = 1 per_second;
  k7f_1 = 1 per_second;
  k7r_1 = 1 per_second;
  k8f_1 = 1 per_second;

  // Reactions:
  r3_1: E_1 + Xp_1 -> C2_1; k3f_1*E_1*Xp_1 - k3r_1*C2_1;
  r4_1: C2_1 => E_1 + X; k4f_1*C2_1;
  r5_1: inp_1 + Xp_1 -> C3_1; k5f_1*inp_1*Xp_1 - k5r_1*C3_1;
  r6_1: C3_1 => out_1 + inp_1; k6f_1*C3_1;
  r8_1: C4_1 => Xp_1 + E_1; k8f_1*C4_1;

  // Unit definitions:
  unit per_second = 1 / second;
  unit count = dimensionless;
end
