// SBML level 3 version 1

model DP_2()
  // model units - substance: count, time: second, extent: mole

  // Compartments:
  compartment cell = 1 litre;

  // Species:
  species inp_2 in cell = 50/cell;
  species X in cell = 50/cell;
  species C1_2 in cell = 0;
  species Xp_2 in cell = 0;
  species E_2 in cell = 50/cell;
  species C2_2 in cell = 0;
  species C3_2 in cell = 0;
  species out_2 in cell = 0;
  species C4_2 in cell = 0;

  // Parameters:
  k1f_2 = 1 per_second;
  k1r_2 = 1 per_second;
  k2f_2 = 1 per_second;
  k3f_2 = 1 per_second;
  k3r_2 = 1 per_second;
  k4f_2 = 1 per_second;
  k5f_2 = 1 per_second;
  k5r_2 = 1 per_second;
  k6f_2 = 1 per_second;
  k7f_2 = 1 per_second;
  k7r_2 = 1 per_second;
  k8f_2 = 1 per_second;
  k2r = 1 per_second;
  k2f = 1 per_second;

  // Reactions:
  r1_2: inp_2 + X -> C1_2; k1f_2*inp_2*X - k1r_2*C1_2;
  r2_2: C1_2 -> inp_2 + Xp_2; k2f*C1_2 - k2r*inp_2*Xp_2;
  r3_2: E_2 + Xp_2 -> C2_2; k3f_2*E_2*Xp_2 - k3r_2*C2_2;
  r4_2: C2_2 => E_2 + X; k4f_2*C2_2;
  r5_2: inp_2 + Xp_2 -> C3_2; k5f_2*inp_2*Xp_2 - k5r_2*C3_2;
  r6_2: C3_2 => out_2 + inp_2; k6f_2*C3_2;
  r7_2: E_2 + out_2 -> C4_2; k7f_2*E_2*out_2 - k7r_2*C4_2;
  r8_2: C4_2 => Xp_2 + E_2; k8f_2*C4_2;

  // Unit definitions:
  unit per_second = 1 / second;
  unit count = dimensionless;
end
