// SBML level 3 version 1

model fastModel()
  // model units - substance: count, time: second, extent: mole

  // Compartments:
  compartment cell = 1 litre;

  // Species:
  species $inP_1 in cell = 50/cell;
  species X in cell = 50/cell;
  species inP_X_1 in cell = 0; inP_X_1 is "inP:X";
  species X_P_1 in cell = 0; X_P_1 is "X:P";
  species E_1 in cell = 50/cell;
  species X_P_P_1 in cell = 0; X_P_P_1 is "X:P:P";
  species E_X_P_P_1 in cell = 0; E_X_P_P_1 is "E:X:P:P";

  // Parameters:
  k1f_1 = 1 per_second;
  k1r_1 = 1 per_second;
  k2f_1 = 1 per_second;
  k3f_1 = 1 per_second;
  k3r_1 = 1 per_second;
  k4f_1 = 1 per_second;
  k5f_1 = 1 per_second;
  k5r_1 = 1 per_second;
  k6f_1 = 1 per_second;
  k7f_1 = 1 per_second;
  k7r_1 = 1 per_second;
  k8f_1 = 1 per_second;

  // Reactions:
  r1_1: $inP_1 + X -> inP_X_1; k1f_1*inP_1*X - k1r_1*inP_X_1;  // fast
  r2_1: inP_X_1 => $inP_1 + X_P_1; k2f_1*inP_X_1;  // fast
  r7_1: E_1 + X_P_P_1 -> E_X_P_P_1; k7f_1*E_1*X_P_P_1 - k7r_1*E_X_P_P_1;  // fast

  // Unit definitions:
  unit per_second = 1 / second;
  unit count = dimensionless;
end
