// SBML level 3 version 1

model mix_of_E30VNPRL_E30VNPRL_gene_expression()
  // mix_of_E30VNPRL_E30VNPRL_gene_expression
  // model units - substance: substance, time: second, volume: volume, area: area, length: metre, extent: substance

  // Compartments:
  compartment contents = 1 volume;

  // Species:
  species RNAP in contents = 50/contents;
  species Ribo in contents = 30.00002/contents;
  species RecBCD in contents = 5.000003/contents;
  species RNase in contents = 100.0001/contents;
  species AGTP in contents = 3180048/contents;
  species CUTP in contents = 1908029/contents;
  species AA in contents = 3.180048e7/contents;
  species protein_tetR in contents = 0;
  species aTc in contents = 0;
  species protein_tetRdimer in contents = 0;
  species RNA_utr1_tetR in contents = 0; RNA_utr1_tetR is "RNA utr1--tetR";
  species Ribo_RNA_utr1_tetR in contents = 0; Ribo_RNA_utr1_tetR is "Ribo:RNA utr1--tetR";
  species DNA_ptet_utr1_tetR in contents = 1.000001/contents; DNA_ptet_utr1_tetR is "DNA ptet--utr1--tetR";
  species RNAP_DNA_ptet_utr1_tetR in contents = 0; RNAP_DNA_ptet_utr1_tetR is "RNAP:DNA ptet--utr1--tetR";
  species CUTP_AGTP_RNAP_DNA_ptet_utr1_tetR in contents = 0; CUTP_AGTP_RNAP_DNA_ptet_utr1_tetR is "CUTP:AGTP:RNAP:DNA ptet--utr1--tetR";
  species term_RNAP_DNA_ptet_utr1_tetR in contents = 0; term_RNAP_DNA_ptet_utr1_tetR is "term_RNAP:DNA ptet--utr1--tetR";
  species AA_2AGTP_Ribo_RNA_utr1_tetR in contents = 0; AA_2AGTP_Ribo_RNA_utr1_tetR is "AA:2AGTP:Ribo:RNA utr1--tetR";
  species term_Ribo_RNA_utr1_tetR in contents = 0; term_Ribo_RNA_utr1_tetR is "term_Ribo:RNA utr1--tetR";
  species protein_deGFP_contents_20 in contents = 0;
  species protein_deGFP_contents_21 in contents = 0; protein_deGFP_contents_21 is "protein deGFP*";
  species RNA_utr1_deGFP in contents = 0; RNA_utr1_deGFP is "RNA utr1--deGFP";
  species Ribo_RNA_utr1_deGFP in contents = 0; Ribo_RNA_utr1_deGFP is "Ribo:RNA utr1--deGFP";
  species DNA_ptet_utr1_deGFP in contents = 1.000001/contents; DNA_ptet_utr1_deGFP is "DNA ptet--utr1--deGFP";
  species RNAP_DNA_ptet_utr1_deGFP in contents = 0; RNAP_DNA_ptet_utr1_deGFP is "RNAP:DNA ptet--utr1--deGFP";
  species CUTP_AGTP_RNAP_DNA_ptet_utr1_deGFP in contents = 0; CUTP_AGTP_RNAP_DNA_ptet_utr1_deGFP is "CUTP:AGTP:RNAP:DNA ptet--utr1--deGFP";
  species term_RNAP_DNA_ptet_utr1_deGFP in contents = 0; term_RNAP_DNA_ptet_utr1_deGFP is "term_RNAP:DNA ptet--utr1--deGFP";
  species AA_2AGTP_Ribo_RNA_utr1_deGFP in contents = 0; AA_2AGTP_Ribo_RNA_utr1_deGFP is "AA:2AGTP:Ribo:RNA utr1--deGFP";
  species term_Ribo_RNA_utr1_deGFP in contents = 0; term_Ribo_RNA_utr1_deGFP is "term_Ribo:RNA utr1--deGFP";
  species _2_aTc_protein_tetRdimer in contents = 0; _2_aTc_protein_tetRdimer is "2 aTc:protein tetRdimer";
  species AGTP_RNAP_DNA_ptet_utr1_tetR in contents = 0; AGTP_RNAP_DNA_ptet_utr1_tetR is "AGTP:RNAP:DNA ptet--utr1--tetR";
  species CUTP_RNAP_DNA_ptet_utr1_tetR in contents = 0; CUTP_RNAP_DNA_ptet_utr1_tetR is "CUTP:RNAP:DNA ptet--utr1--tetR";
  species DNA_ptet_utr1_tetR_protein_tetRdimer in contents = 0; DNA_ptet_utr1_tetR_protein_tetRdimer is "DNA ptet--utr1--tetR:protein tetRdimer";
  species AA_Ribo_RNA_utr1_tetR in contents = 0; AA_Ribo_RNA_utr1_tetR is "AA:Ribo:RNA utr1--tetR";
  species RNA_utr1_tetR_RNase in contents = 0; RNA_utr1_tetR_RNase is "RNA utr1--tetR:RNase";
  species Ribo_RNA_utr1_tetR_RNase in contents = 0; Ribo_RNA_utr1_tetR_RNase is "Ribo:RNA utr1--tetR:RNase";
  species AA_2AGTP_Ribo_RNA_utr1_tetR_RNase in contents = 0; AA_2AGTP_Ribo_RNA_utr1_tetR_RNase is "AA:2AGTP:Ribo:RNA utr1--tetR:RNase";
  species term_Ribo_RNA_utr1_tetR_RNase in contents = 0; term_Ribo_RNA_utr1_tetR_RNase is "term_Ribo:RNA utr1--tetR:RNase";
  species AA_Ribo_RNA_utr1_tetR_RNase in contents = 0; AA_Ribo_RNA_utr1_tetR_RNase is "AA:Ribo:RNA utr1--tetR:RNase";
  species AGTP_RNAP_DNA_ptet_utr1_deGFP in contents = 0; AGTP_RNAP_DNA_ptet_utr1_deGFP is "AGTP:RNAP:DNA ptet--utr1--deGFP";
  species CUTP_RNAP_DNA_ptet_utr1_deGFP in contents = 0; CUTP_RNAP_DNA_ptet_utr1_deGFP is "CUTP:RNAP:DNA ptet--utr1--deGFP";
  species DNA_ptet_utr1_deGFP_protein_tetRdimer in contents = 0; DNA_ptet_utr1_deGFP_protein_tetRdimer is "DNA ptet--utr1--deGFP:protein tetRdimer";
  species AA_Ribo_RNA_utr1_deGFP in contents = 0; AA_Ribo_RNA_utr1_deGFP is "AA:Ribo:RNA utr1--deGFP";
  species RNA_utr1_deGFP_RNase in contents = 0; RNA_utr1_deGFP_RNase is "RNA utr1--deGFP:RNase";
  species Ribo_RNA_utr1_deGFP_RNase in contents = 0; Ribo_RNA_utr1_deGFP_RNase is "Ribo:RNA utr1--deGFP:RNase";
  species AA_2AGTP_Ribo_RNA_utr1_deGFP_RNase in contents = 0; AA_2AGTP_Ribo_RNA_utr1_deGFP_RNase is "AA:2AGTP:Ribo:RNA utr1--deGFP:RNase";
  species term_Ribo_RNA_utr1_deGFP_RNase in contents = 0; term_Ribo_RNA_utr1_deGFP_RNase is "term_Ribo:RNA utr1--deGFP:RNase";
  species AA_Ribo_RNA_utr1_deGFP_RNase in contents = 0; AA_Ribo_RNA_utr1_deGFP_RNase is "AA:Ribo:RNA utr1--deGFP:RNase";
  species AGTP_USED in contents = 0;

  // Parameters:
  AGTPdeg_F = 0;

  // Reactions:
  reaction_51: protein_tetRdimer + 2 aTc -> _2_aTc_protein_tetRdimer; TXTL_INDUCER_TETR_ATC_F*protein_tetRdimer*aTc^2 - TXTL_INDUCER_TETR_ATC_R*_2_aTc_protein_tetRdimer;
    TXTL_INDUCER_TETR_ATC_F = 1e-5; TXTL_INDUCER_TETR_ATC_R = 0.1;
  reaction_52: 2 protein_tetR -> protein_tetRdimer; kf*protein_tetR^2 - kr*protein_tetRdimer;
    kf = 1; kr = 1;
  reaction_53: RNA_utr1_tetR + Ribo -> Ribo_RNA_utr1_tetR; reaction_53_TXTL_UTR_UTR1_F*RNA_utr1_tetR*Ribo - reaction_53_TXTL_UTR_UTR1_R*Ribo_RNA_utr1_tetR;
    reaction_53_TXTL_UTR_UTR1_F = 0.2; reaction_53_TXTL_UTR_UTR1_R = 4;
  reaction_54: DNA_ptet_utr1_tetR + RNAP -> RNAP_DNA_ptet_utr1_tetR; reaction_54_TXTL_PTET_RNAPbound_F*DNA_ptet_utr1_tetR*RNAP - reaction_54_TXTL_PTET_RNAPbound_R*RNAP_DNA_ptet_utr1_tetR;
    reaction_54_TXTL_PTET_RNAPbound_F = 20; reaction_54_TXTL_PTET_RNAPbound_R = 400;
  reaction_55: CUTP_AGTP_RNAP_DNA_ptet_utr1_tetR => RNAP_DNA_ptet_utr1_tetR; reaction_55_TXTL_NTP_consumption*CUTP_AGTP_RNAP_DNA_ptet_utr1_tetR;
    reaction_55_TXTL_NTP_consumption = 0.7487705;
  reaction_56: term_RNAP_DNA_ptet_utr1_tetR => RNAP + DNA_ptet_utr1_tetR; reaction_56_TXTL_RNAPBOUND_TERMINATION_RATE*term_RNAP_DNA_ptet_utr1_tetR;
    reaction_56_TXTL_RNAPBOUND_TERMINATION_RATE = 0.05;
  reaction_57: RNAP_DNA_ptet_utr1_tetR + AGTP -> AGTP_RNAP_DNA_ptet_utr1_tetR; reaction_57_TXTL_NTP_RNAP_F*RNAP_DNA_ptet_utr1_tetR*AGTP - reaction_57_TXTL_NTP_RNAP_R*AGTP_RNAP_DNA_ptet_utr1_tetR;
    reaction_57_TXTL_NTP_RNAP_F = 1000; reaction_57_TXTL_NTP_RNAP_R = 120000000;
  reaction_58: RNAP_DNA_ptet_utr1_tetR + CUTP -> CUTP_RNAP_DNA_ptet_utr1_tetR; reaction_58_TXTL_NTP_RNAP_F*RNAP_DNA_ptet_utr1_tetR*CUTP - reaction_58_TXTL_NTP_RNAP_R*CUTP_RNAP_DNA_ptet_utr1_tetR;
    reaction_58_TXTL_NTP_RNAP_F = 1000; reaction_58_TXTL_NTP_RNAP_R = 120000000;
  reaction_59: AGTP_RNAP_DNA_ptet_utr1_tetR + CUTP -> CUTP_AGTP_RNAP_DNA_ptet_utr1_tetR; reaction_59_TXTL_NTP_RNAP_F*AGTP_RNAP_DNA_ptet_utr1_tetR*CUTP - reaction_59_TXTL_NTP_RNAP_R*CUTP_AGTP_RNAP_DNA_ptet_utr1_tetR;
    reaction_59_TXTL_NTP_RNAP_F = 1; reaction_59_TXTL_NTP_RNAP_R = 120000;
  reaction_60: CUTP_RNAP_DNA_ptet_utr1_tetR + AGTP -> CUTP_AGTP_RNAP_DNA_ptet_utr1_tetR; reaction_60_TXTL_NTP_RNAP_F*CUTP_RNAP_DNA_ptet_utr1_tetR*AGTP - reaction_60_TXTL_NTP_RNAP_R*CUTP_AGTP_RNAP_DNA_ptet_utr1_tetR;
    reaction_60_TXTL_NTP_RNAP_F = 1; reaction_60_TXTL_NTP_RNAP_R = 120000;
  reaction_61: CUTP_AGTP_RNAP_DNA_ptet_utr1_tetR => term_RNAP_DNA_ptet_utr1_tetR + RNA_utr1_tetR; reaction_61_TXTL_transcription_rate1*CUTP_AGTP_RNAP_DNA_ptet_utr1_tetR;
    reaction_61_TXTL_transcription_rate1 = 0.001229508;
  reaction_62: DNA_ptet_utr1_tetR + protein_tetRdimer -> DNA_ptet_utr1_tetR_protein_tetRdimer; reaction_62_ptet_sequestration_F*DNA_ptet_utr1_tetR*protein_tetRdimer - reaction_62_ptet_sequestration_R*DNA_ptet_utr1_tetR_protein_tetRdimer;
    reaction_62_ptet_sequestration_F = 0.25; reaction_62_ptet_sequestration_R = 0.000111;
  reaction_63: Ribo_RNA_utr1_tetR + AA -> AA_Ribo_RNA_utr1_tetR; reaction_63_TL_AA_F*Ribo_RNA_utr1_tetR*AA - reaction_63_TL_AA_R*AA_Ribo_RNA_utr1_tetR;
    reaction_63_TL_AA_F = 300; reaction_63_TL_AA_R = 0.1;
  reaction_64: AA_Ribo_RNA_utr1_tetR + 2 AGTP -> AA_2AGTP_Ribo_RNA_utr1_tetR; reaction_64_TL_AGTP_F*AA_Ribo_RNA_utr1_tetR*AGTP^2 - reaction_64_TL_AGTP_R*AA_2AGTP_Ribo_RNA_utr1_tetR;
    reaction_64_TL_AGTP_F = 30; reaction_64_TL_AGTP_R = 10;
  reaction_65: AA_2AGTP_Ribo_RNA_utr1_tetR => term_Ribo_RNA_utr1_tetR; reaction_65_TXTL_TL_AA_consumption*AA_2AGTP_Ribo_RNA_utr1_tetR;
    reaction_65_TXTL_TL_AA_consumption = 0.03;
  reaction_66: AA_2AGTP_Ribo_RNA_utr1_tetR => term_Ribo_RNA_utr1_tetR + protein_tetR; reaction_66_TXTL_TL_rate*AA_2AGTP_Ribo_RNA_utr1_tetR;
    reaction_66_TXTL_TL_rate = 0.01;
  reaction_67: term_Ribo_RNA_utr1_tetR => RNA_utr1_tetR + Ribo; reaction_67_TXTL_RIBOBOUND_TERMINATION_RATE*term_Ribo_RNA_utr1_tetR;
    reaction_67_TXTL_RIBOBOUND_TERMINATION_RATE = 50;
  reaction_68: RNA_utr1_tetR + RNase -> RNA_utr1_tetR_RNase; reaction_68_TXTL_RNAdeg_F*RNA_utr1_tetR*RNase - reaction_68_TXTL_RNAdeg_R*RNA_utr1_tetR_RNase;
    reaction_68_TXTL_RNAdeg_F = 10; reaction_68_TXTL_RNAdeg_R = 2000;
  reaction_69: RNA_utr1_tetR_RNase => RNase; reaction_69_TXTL_RNAdeg_F*RNA_utr1_tetR_RNase;
    reaction_69_TXTL_RNAdeg_F = 0.002777778;
  reaction_70: Ribo_RNA_utr1_tetR + RNase -> Ribo_RNA_utr1_tetR_RNase; reaction_70_TXTL_RNAdeg_F*Ribo_RNA_utr1_tetR*RNase - reaction_70_TXTL_RNAdeg_R*Ribo_RNA_utr1_tetR_RNase;
    reaction_70_TXTL_RNAdeg_F = 10; reaction_70_TXTL_RNAdeg_R = 2000;
  reaction_71: Ribo_RNA_utr1_tetR_RNase => RNase + Ribo; reaction_71_TXTL_RNAdeg_F*Ribo_RNA_utr1_tetR_RNase;
    reaction_71_TXTL_RNAdeg_F = 0.002777778;
  reaction_72: AA_2AGTP_Ribo_RNA_utr1_tetR + RNase -> AA_2AGTP_Ribo_RNA_utr1_tetR_RNase; reaction_72_TXTL_RNAdeg_F*AA_2AGTP_Ribo_RNA_utr1_tetR*RNase - reaction_72_TXTL_RNAdeg_R*AA_2AGTP_Ribo_RNA_utr1_tetR_RNase;
    reaction_72_TXTL_RNAdeg_F = 10; reaction_72_TXTL_RNAdeg_R = 2000;
  reaction_73: AA_2AGTP_Ribo_RNA_utr1_tetR_RNase => RNase + AA + 2 AGTP + Ribo; reaction_73_TXTL_RNAdeg_F*AA_2AGTP_Ribo_RNA_utr1_tetR_RNase;
    reaction_73_TXTL_RNAdeg_F = 0.002777778;
  reaction_74: term_Ribo_RNA_utr1_tetR + RNase -> term_Ribo_RNA_utr1_tetR_RNase; reaction_74_TXTL_RNAdeg_F*term_Ribo_RNA_utr1_tetR*RNase - reaction_74_TXTL_RNAdeg_R*term_Ribo_RNA_utr1_tetR_RNase;
    reaction_74_TXTL_RNAdeg_F = 10; reaction_74_TXTL_RNAdeg_R = 2000;
  reaction_75: term_Ribo_RNA_utr1_tetR_RNase => RNase + Ribo; reaction_75_TXTL_RNAdeg_F*term_Ribo_RNA_utr1_tetR_RNase;
    reaction_75_TXTL_RNAdeg_F = 0.002777778;
  reaction_76: AA_Ribo_RNA_utr1_tetR + RNase -> AA_Ribo_RNA_utr1_tetR_RNase; reaction_76_TXTL_RNAdeg_F*AA_Ribo_RNA_utr1_tetR*RNase - reaction_76_TXTL_RNAdeg_R*AA_Ribo_RNA_utr1_tetR_RNase;
    reaction_76_TXTL_RNAdeg_F = 10; reaction_76_TXTL_RNAdeg_R = 2000;
  reaction_77: AA_Ribo_RNA_utr1_tetR_RNase => RNase + AA + Ribo; reaction_77_TXTL_RNAdeg_F*AA_Ribo_RNA_utr1_tetR_RNase;
    reaction_77_TXTL_RNAdeg_F = 0.002777778;
  reaction_78: protein_deGFP_contents_20 => protein_deGFP_contents_21; TXTL_PROT_deGFP_MATURATION*protein_deGFP_contents_20;
    TXTL_PROT_deGFP_MATURATION = 0.002310491;
  reaction_79: RNA_utr1_deGFP + Ribo -> Ribo_RNA_utr1_deGFP; reaction_79_TXTL_UTR_UTR1_F*RNA_utr1_deGFP*Ribo - reaction_79_TXTL_UTR_UTR1_R*Ribo_RNA_utr1_deGFP;
    reaction_79_TXTL_UTR_UTR1_F = 0.2; reaction_79_TXTL_UTR_UTR1_R = 4;
  reaction_80: DNA_ptet_utr1_deGFP + RNAP -> RNAP_DNA_ptet_utr1_deGFP; reaction_80_TXTL_PTET_RNAPbound_F*DNA_ptet_utr1_deGFP*RNAP - reaction_80_TXTL_PTET_RNAPbound_R*RNAP_DNA_ptet_utr1_deGFP;
    reaction_80_TXTL_PTET_RNAPbound_F = 20; reaction_80_TXTL_PTET_RNAPbound_R = 400;
  reaction_81: CUTP_AGTP_RNAP_DNA_ptet_utr1_deGFP => RNAP_DNA_ptet_utr1_deGFP; reaction_81_TXTL_NTP_consumption*CUTP_AGTP_RNAP_DNA_ptet_utr1_deGFP;
    reaction_81_TXTL_NTP_consumption = 0.7485294;
  reaction_82: term_RNAP_DNA_ptet_utr1_deGFP => RNAP + DNA_ptet_utr1_deGFP; reaction_82_TXTL_RNAPBOUND_TERMINATION_RATE*term_RNAP_DNA_ptet_utr1_deGFP;
    reaction_82_TXTL_RNAPBOUND_TERMINATION_RATE = 0.05;
  reaction_83: RNAP_DNA_ptet_utr1_deGFP + AGTP -> AGTP_RNAP_DNA_ptet_utr1_deGFP; reaction_83_TXTL_NTP_RNAP_F*RNAP_DNA_ptet_utr1_deGFP*AGTP - reaction_83_TXTL_NTP_RNAP_R*AGTP_RNAP_DNA_ptet_utr1_deGFP;
    reaction_83_TXTL_NTP_RNAP_F = 1000; reaction_83_TXTL_NTP_RNAP_R = 120000000;
  reaction_84: RNAP_DNA_ptet_utr1_deGFP + CUTP -> CUTP_RNAP_DNA_ptet_utr1_deGFP; reaction_84_TXTL_NTP_RNAP_F*RNAP_DNA_ptet_utr1_deGFP*CUTP - reaction_84_TXTL_NTP_RNAP_R*CUTP_RNAP_DNA_ptet_utr1_deGFP;
    reaction_84_TXTL_NTP_RNAP_F = 1000; reaction_84_TXTL_NTP_RNAP_R = 120000000;
  reaction_85: AGTP_RNAP_DNA_ptet_utr1_deGFP + CUTP -> CUTP_AGTP_RNAP_DNA_ptet_utr1_deGFP; reaction_85_TXTL_NTP_RNAP_F*AGTP_RNAP_DNA_ptet_utr1_deGFP*CUTP - reaction_85_TXTL_NTP_RNAP_R*CUTP_AGTP_RNAP_DNA_ptet_utr1_deGFP;
    reaction_85_TXTL_NTP_RNAP_F = 1; reaction_85_TXTL_NTP_RNAP_R = 120000;
  reaction_86: CUTP_RNAP_DNA_ptet_utr1_deGFP + AGTP -> CUTP_AGTP_RNAP_DNA_ptet_utr1_deGFP; reaction_86_TXTL_NTP_RNAP_F*CUTP_RNAP_DNA_ptet_utr1_deGFP*AGTP - reaction_86_TXTL_NTP_RNAP_R*CUTP_AGTP_RNAP_DNA_ptet_utr1_deGFP;
    reaction_86_TXTL_NTP_RNAP_F = 1; reaction_86_TXTL_NTP_RNAP_R = 120000;
  reaction_87: CUTP_AGTP_RNAP_DNA_ptet_utr1_deGFP => term_RNAP_DNA_ptet_utr1_deGFP + RNA_utr1_deGFP; reaction_87_TXTL_transcription_rate1*CUTP_AGTP_RNAP_DNA_ptet_utr1_deGFP;
    reaction_87_TXTL_transcription_rate1 = 0.001470588;
  reaction_88: DNA_ptet_utr1_deGFP + protein_tetRdimer -> DNA_ptet_utr1_deGFP_protein_tetRdimer; reaction_88_ptet_sequestration_F*DNA_ptet_utr1_deGFP*protein_tetRdimer - reaction_88_ptet_sequestration_R*DNA_ptet_utr1_deGFP_protein_tetRdimer;
    reaction_88_ptet_sequestration_F = 0.25; reaction_88_ptet_sequestration_R = 0.000111;
  reaction_89: Ribo_RNA_utr1_deGFP + AA -> AA_Ribo_RNA_utr1_deGFP; reaction_89_TL_AA_F*Ribo_RNA_utr1_deGFP*AA - reaction_89_TL_AA_R*AA_Ribo_RNA_utr1_deGFP;
    reaction_89_TL_AA_F = 300; reaction_89_TL_AA_R = 0.1;
  reaction_90: AA_Ribo_RNA_utr1_deGFP + 2 AGTP -> AA_2AGTP_Ribo_RNA_utr1_deGFP; reaction_90_TL_AGTP_F*AA_Ribo_RNA_utr1_deGFP*AGTP^2 - reaction_90_TL_AGTP_R*AA_2AGTP_Ribo_RNA_utr1_deGFP;
    reaction_90_TL_AGTP_F = 30; reaction_90_TL_AGTP_R = 10;
  reaction_91: AA_2AGTP_Ribo_RNA_utr1_deGFP => term_Ribo_RNA_utr1_deGFP; reaction_91_TXTL_TL_AA_consumption*AA_2AGTP_Ribo_RNA_utr1_deGFP;
    reaction_91_TXTL_TL_AA_consumption = 0.024;
  reaction_92: AA_2AGTP_Ribo_RNA_utr1_deGFP => term_Ribo_RNA_utr1_deGFP + protein_deGFP_contents_20; reaction_92_TXTL_TL_rate*AA_2AGTP_Ribo_RNA_utr1_deGFP;
    reaction_92_TXTL_TL_rate = 0.012;
  reaction_93: term_Ribo_RNA_utr1_deGFP => RNA_utr1_deGFP + Ribo; reaction_93_TXTL_RIBOBOUND_TERMINATION_RATE*term_Ribo_RNA_utr1_deGFP;
    reaction_93_TXTL_RIBOBOUND_TERMINATION_RATE = 50;
  reaction_94: RNA_utr1_deGFP + RNase -> RNA_utr1_deGFP_RNase; reaction_94_TXTL_RNAdeg_F*RNA_utr1_deGFP*RNase - reaction_94_TXTL_RNAdeg_R*RNA_utr1_deGFP_RNase;
    reaction_94_TXTL_RNAdeg_F = 10; reaction_94_TXTL_RNAdeg_R = 2000;
  reaction_95: RNA_utr1_deGFP_RNase => RNase; reaction_95_TXTL_RNAdeg_F*RNA_utr1_deGFP_RNase;
    reaction_95_TXTL_RNAdeg_F = 0.002777778;
  reaction_96: Ribo_RNA_utr1_deGFP + RNase -> Ribo_RNA_utr1_deGFP_RNase; reaction_96_TXTL_RNAdeg_F*Ribo_RNA_utr1_deGFP*RNase - reaction_96_TXTL_RNAdeg_R*Ribo_RNA_utr1_deGFP_RNase;
    reaction_96_TXTL_RNAdeg_F = 10; reaction_96_TXTL_RNAdeg_R = 2000;
  reaction_97: Ribo_RNA_utr1_deGFP_RNase => RNase + Ribo; reaction_97_TXTL_RNAdeg_F*Ribo_RNA_utr1_deGFP_RNase;
    reaction_97_TXTL_RNAdeg_F = 0.002777778;
  reaction_98: AA_2AGTP_Ribo_RNA_utr1_deGFP + RNase -> AA_2AGTP_Ribo_RNA_utr1_deGFP_RNase; reaction_98_TXTL_RNAdeg_F*AA_2AGTP_Ribo_RNA_utr1_deGFP*RNase - reaction_98_TXTL_RNAdeg_R*AA_2AGTP_Ribo_RNA_utr1_deGFP_RNase;
    reaction_98_TXTL_RNAdeg_F = 10; reaction_98_TXTL_RNAdeg_R = 2000;
  reaction_99: AA_2AGTP_Ribo_RNA_utr1_deGFP_RNase => RNase + AA + 2 AGTP + Ribo; reaction_99_TXTL_RNAdeg_F*AA_2AGTP_Ribo_RNA_utr1_deGFP_RNase;
    reaction_99_TXTL_RNAdeg_F = 0.002777778;
  reaction_100: term_Ribo_RNA_utr1_deGFP + RNase -> term_Ribo_RNA_utr1_deGFP_RNase; reaction_100_TXTL_RNAdeg_F*term_Ribo_RNA_utr1_deGFP*RNase - reaction_100_TXTL_RNAdeg_R*term_Ribo_RNA_utr1_deGFP_RNase;
    reaction_100_TXTL_RNAdeg_F = 10; reaction_100_TXTL_RNAdeg_R = 2000;
  reaction_101: term_Ribo_RNA_utr1_deGFP_RNase => RNase + Ribo; reaction_101_TXTL_RNAdeg_F*term_Ribo_RNA_utr1_deGFP_RNase;
    reaction_101_TXTL_RNAdeg_F = 0.002777778;
  reaction_102: AA_Ribo_RNA_utr1_deGFP + RNase -> AA_Ribo_RNA_utr1_deGFP_RNase; reaction_102_TXTL_RNAdeg_F*AA_Ribo_RNA_utr1_deGFP*RNase - reaction_102_TXTL_RNAdeg_R*AA_Ribo_RNA_utr1_deGFP_RNase;
    reaction_102_TXTL_RNAdeg_F = 10; reaction_102_TXTL_RNAdeg_R = 2000;
  reaction_103: AA_Ribo_RNA_utr1_deGFP_RNase => RNase + AA + Ribo; reaction_103_TXTL_RNAdeg_F*AA_Ribo_RNA_utr1_deGFP_RNase;
    reaction_103_TXTL_RNAdeg_F = 0.002777778;
  reaction_104: AGTP => AGTP_USED; AGTPdeg_F*AGTP;

  // Events:
  event_105: at (time <= 5400): AGTPdeg_F = 0;
  event_106: at (time > 5400): AGTPdeg_F = 0.0002;

  // Unit definitions:
  unit volume = litre;
  unit substance = mole;
  unit area = metre^2;
end
