// SBML level 3 version 1

model DoublePhosphorylation_DP2()
  // model units - substance: count, time: seconds, extent: mole

  // Compartments:
  compartment cell = 1 litre;

  // Species:
  species inp_DP2 in cell = 50/cell;
  species X_DP2 in cell = 50/cell;
  species C1_DP2 in cell = 0;
  species Xp_DP2 in cell = 0;
  species E_DP2 in cell = 50/cell;
  species C2_DP2 in cell = 0;
  species C3_DP2 in cell = 0;
  species out_DP2 in cell = 0;
  species C4_DP2 in cell = 0;

  // Parameters:
  k1f_DP2 = 1 per_second;
  k1r_DP2 = 1 per_second;
  k2f_DP2 = 1 per_second;
  k3f_DP2 = 1 per_second;
  k3r_DP2 = 1 per_second;
  k4f_DP2 = 1 per_second;
  k5f_DP2 = 1 per_second;
  k5r_DP2 = 1 per_second;
  k6f_DP2 = 1 per_second;
  k7f_DP2 = 1 per_second;
  k7r_DP2 = 1 per_second;
  k8f_DP2 = 1 per_second;

  // Reactions:
  r1_DP2: inp_DP2 + X_DP2 -> C1_DP2; k1f_DP2*inp_DP2*X_DP2 - k1r_DP2*C1_DP2;
  r2_DP2: C1_DP2 => inp_DP2 + Xp_DP2; k2f_DP2*C1_DP2;
  r3_DP2: E_DP2 + Xp_DP2 -> C2_DP2; k3f_DP2*E_DP2*Xp_DP2 - k3r_DP2*C2_DP2;
  r4_DP2: C2_DP2 => E_DP2 + X_DP2; k4f_DP2*C2_DP2;
  r5_DP2: inp_DP2 + Xp_DP2 -> C3_DP2; k5f_DP2*inp_DP2*Xp_DP2 - k5r_DP2*C3_DP2;
  r6_DP2: C3_DP2 => out_DP2 + inp_DP2; k6f_DP2*C3_DP2;
  r7_DP2: E_DP2 + out_DP2 -> C4_DP2; k7f_DP2*E_DP2*out_DP2 - k7r_DP2*C4_DP2;
  r8_DP2: C4_DP2 => Xp_DP2 + E_DP2; k8f_DP2*C4_DP2;

  // Unit definitions:
  unit per_second = 1 / second;
end
