// SBML level 3 version 1

model main()

  // Species:
  species inp_DP1 in cell = 50/cell;  // substance in count
  species X_DP1 in cell = 50/cell;  // substance in count
  species C1_DP1 in cell = 0;  // substance in count
  species Xp_DP1 in cell = 0;  // substance in count
  species E_DP1 in cell = 50/cell;  // substance in count
  species C2_DP1 in cell = 0;  // substance in count
  species C3_DP1 in cell = 0;  // substance in count
  species out_DP1 in cell = 0; out_DP1 is "pA_IFFL";  // substance in count
  species C4_DP1 in cell = 0;  // substance in count
  species inp_DP2 in cell = 50/cell;  // substance in count
  species X_DP2 in cell = 50/cell;  // substance in count
  species C1_DP2 in cell = 0;  // substance in count
  species Xp_DP2 in cell = 0;  // substance in count
  species E_DP2 in cell = 50/cell;  // substance in count
  species C2_DP2 in cell = 0;  // substance in count
  species C3_DP2 in cell = 0;  // substance in count
  species out_DP2 in cell = 0; out_DP2 is "pB_IFFL";  // substance in count
  species C4_DP2 in cell = 0;  // substance in count
  species inp_IFFL in cell = 0;  // substance in count
  species DA_IFFL in cell = 50/cell;  // substance in count
  species C1_IFFL in cell = 0;  // substance in count
  species mA_IFFL in cell = 0;  // substance in count
  species pA_IFFL in cell = 0;  // substance in count
  species C2_IFFL in cell = 0;  // substance in count
  species DB_IFFL in cell = 50/cell;  // substance in count
  species mB_IFFL in cell = 0;  // substance in count
  species pB_IFFL in cell = 0;  // substance in count
  species C3_IFFL in cell = 0;  // substance in count
  species DC_IFFL in cell = 50/cell;  // substance in count
  species C4_IFFL in cell = 0;  // substance in count
  species C5_IFFL in cell = 0;  // substance in count
  species C6_IFFL in cell = 0;  // substance in count
  species mC_IFFL in cell = 0;  // substance in count
  species out_IFFL in cell = 0;  // substance in count

  // Parameters:
  k1f = 1 per_second;
  k1r = 1 per_second;
  k2f = 1 per_second;
  k3f = 1 per_second;
  k3r = 1 per_second;
  k4f = 1 per_second;
  k5f = 1 per_second;
  k5r = 1 per_second;
  k6f = 1 per_second;
  k7f = 1 per_second;
  k7r = 1 per_second;
  k8f = 1 per_second;
  DP2_k1f = 1 per_second;
  DP2_k1r = 1 per_second;
  DP2_k2f = 1 per_second;
  DP2_k3f = 1 per_second;
  DP2_k3r = 1 per_second;
  DP2_k4f = 1 per_second;
  DP2_k5f = 1 per_second;
  DP2_k5r = 1 per_second;
  DP2_k6f = 1 per_second;
  DP2_k7f = 1 per_second;
  DP2_k7r = 1 per_second;
  DP2_k8f = 1 per_second;
  IFFL_k1f = 1 per_second;
  IFFL_k1r = 1 per_second;
  IFFL_k2f = 1 per_second;
  IFFL_k3f = 1 per_second;
  IFFL_k4f = 1 per_second;
  IFFL_k5f = 1 per_second;
  IFFL_k6f = 1 per_second;
  IFFL_k6r = 1 per_second;
  IFFL_k7f = 1 per_second;
  IFFL_k8f = 1 per_second;
  IFFL_k9f = 1 per_second;
  IFFL_k10f = 1 per_second;
  IFFL_k11f = 1 per_second;
  IFFL_k11r = 1 per_second;
  IFFL_k12f = 1 per_second;
  IFFL_k12r = 1 per_second;
  IFFL_k13f = 1 per_second;
  IFFL_k13r = 1 per_second;
  IFFL_k14f = 1 per_second;
  IFFL_k14r = 1 per_second;
  IFFL_k15f = 1 per_second;
  IFFL_k16f = 1 per_second;
  IFFL_k17f = 1 per_second;
  IFFL_k18f = 1 per_second;

  // Reactions:
  r1: inp_DP1 + X_DP1 -> C1_DP1; k1f*inp_DP1*X_DP1 - k1r*C1_DP1;
  r2: C1_DP1 => inp_DP1 + Xp_DP1; k2f*C1_DP1;
  r3: E_DP1 + Xp_DP1 -> C2_DP1; k3f*E_DP1*Xp_DP1 - k3r*C2_DP1;
  r4: C2_DP1 => E_DP1 + X_DP1; k4f*C2_DP1;
  r5: inp_DP1 + Xp_DP1 -> C3_DP1; k5f*inp_DP1*Xp_DP1 - k5r*C3_DP1;
  r6: C3_DP1 => out_DP1 + inp_DP1; k6f*C3_DP1;
  r7: E_DP1 + out_DP1 -> C4_DP1; k7f*E_DP1*out_DP1 - k7r*C4_DP1;
  r8: C4_DP1 => Xp_DP1 + E_DP1; k8f*C4_DP1;
  DP2_r1: inp_DP2 + X_DP2 -> C1_DP2; DP2_k1f*inp_DP2*X_DP2 - DP2_k1r*C1_DP2;
  DP2_r2: C1_DP2 => inp_DP2 + Xp_DP2; DP2_k2f*C1_DP2;
  DP2_r3: E_DP2 + Xp_DP2 -> C2_DP2; DP2_k3f*E_DP2*Xp_DP2 - DP2_k3r*C2_DP2;
  DP2_r4: C2_DP2 => E_DP2 + X_DP2; DP2_k4f*C2_DP2;
  DP2_r5: inp_DP2 + Xp_DP2 -> C3_DP2; DP2_k5f*inp_DP2*Xp_DP2 - DP2_k5r*C3_DP2;
  DP2_r6: C3_DP2 => out_DP2 + inp_DP2; DP2_k6f*C3_DP2;
  DP2_r7: E_DP2 + out_DP2 -> C4_DP2; DP2_k7f*E_DP2*out_DP2 - DP2_k7r*C4_DP2;
  DP2_r8: C4_DP2 => Xp_DP2 + E_DP2; DP2_k8f*C4_DP2;
  IFFL_r1: inp_IFFL + DA_IFFL -> C1_IFFL; IFFL_k1f*inp_IFFL*DA_IFFL - IFFL_k1r*C1_IFFL;
  IFFL_r2: C1_IFFL => C1_IFFL + mA_IFFL; IFFL_k2f*C1_IFFL;
  IFFL_r3: mA_IFFL => mA_IFFL + pA_IFFL; IFFL_k3f*mA_IFFL;
  IFFL_r4: mA_IFFL => ; IFFL_k4f*mA_IFFL;
  IFFL_r5: pA_IFFL => ; IFFL_k5f*pA_IFFL;
  IFFL_r6: pA_IFFL + DB_IFFL -> C2_IFFL; IFFL_k6f*pA_IFFL*DB_IFFL - IFFL_k6r*C2_IFFL;
  IFFL_r7: C2_IFFL => C2_IFFL + mB_IFFL; IFFL_k7f*C2_IFFL;
  IFFL_r8: mB_IFFL => mB_IFFL + pB_IFFL; IFFL_k8f*mB_IFFL;
  IFFL_r9: mB_IFFL => ; IFFL_k9f*mB_IFFL;
  IFFL_r10: pB_IFFL => ; IFFL_k10f*pB_IFFL;
  IFFL_r11: pB_IFFL + DC_IFFL -> C3_IFFL; IFFL_k11f*pB_IFFL*DC_IFFL - IFFL_k11r*C3_IFFL;
  IFFL_r12: pA_IFFL + DC_IFFL -> C4_IFFL; IFFL_k12f*pA_IFFL*DC_IFFL - IFFL_k12r*C4_IFFL;
  IFFL_r13: pA_IFFL + C3_IFFL -> C5_IFFL; IFFL_k13f*pA_IFFL*C3_IFFL - IFFL_k13r*C5_IFFL;
  IFFL_r14: pB_IFFL + C4_IFFL -> C6_IFFL; IFFL_k14f*pB_IFFL*C4_IFFL - IFFL_k14r*C6_IFFL;
  IFFL_r15: C4_IFFL => C4_IFFL + mC_IFFL; IFFL_k15f*C4_IFFL;
  IFFL_r16: mC_IFFL => mC_IFFL + out_IFFL; IFFL_k16f*mC_IFFL;
  IFFL_r17: mC_IFFL => ; IFFL_k17f*mC_IFFL;
  IFFL_r18: out_IFFL => ; IFFL_k18f*out_IFFL;
end
