// SBML level 3 version 1

model main()

  // Species:
  species inp_DP1 in cell1 = 50/cell1;  // substance in count
  species X_DP1 in cell1 = 50/cell1;  // substance in count
  species C1_DP1 in cell1 = 0;  // substance in count
  species Xp_DP1 in cell1 = 0;  // substance in count
  species E_DP1 in cell1 = 50/cell1;  // substance in count
  species C2_DP1 in cell1 = 0;  // substance in count
  species C3_DP1 in cell1 = 0;  // substance in count
  species pA_IFFL in cell1 = 0;  // substance in count
  species C4_DP1 in cell1 = 0;  // substance in count
  species inp_DP2 in cell2 = 50/cell2;  // substance in count
  species X_DP2 in cell2 = 50/cell2;  // substance in count
  species C1_DP2 in cell2 = 0;  // substance in count
  species Xp_DP2 in cell2 = 0;  // substance in count
  species E_DP2 in cell2 = 50/cell2;  // substance in count
  species C2_DP2 in cell2 = 0;  // substance in count
  species C3_DP2 in cell2 = 0;  // substance in count
  species pA_IFFL1 in cell2 = 0;  // substance in count
  species C4_DP2 in cell2 = 0;  // substance in count
  species inp_IFFL in cell = 0;  // substance in count
  species DA_IFFL in cell = 50/cell;  // substance in count
  species C1_IFFL in cell = 0;  // substance in count
  species mA_IFFL in cell = 0;  // substance in count
  species pA_IFFL in cell = 0;  // substance in count
  species C2_IFFL in cell = 0;  // substance in count
  species DB_IFFL in cell = 50/cell;  // substance in count
  species mB_IFFL in cell = 0;  // substance in count
  species pB_IFFL in cell = 0;  // substance in count
  species C3_IFFL in cell = 0;  // substance in count
  species DC_IFFL in cell = 50/cell;  // substance in count
  species C4_IFFL in cell = 0;  // substance in count
  species C5_IFFL in cell = 0;  // substance in count
  species C6_IFFL in cell = 0;  // substance in count
  species mC_IFFL in cell = 0;  // substance in count
  species out_IFFL in cell = 0;  // substance in count
  species inp_IFFL1 in cell11 = 0;  // substance in count
  species DA_IFFL1 in cell11 = 50/cell11;  // substance in count
  species C1_IFFL1 in cell11 = 0;  // substance in count
  species mA_IFFL1 in cell11 = 0;  // substance in count
  species pA_IFFL1 in cell11 = 0;  // substance in count
  species C2_IFFL1 in cell11 = 0;  // substance in count
  species DB_IFFL1 in cell11 = 50/cell11;  // substance in count
  species mB_IFFL1 in cell11 = 0;  // substance in count
  species pB_IFFL1 in cell11 = 0;  // substance in count
  species C3_IFFL1 in cell11 = 0;  // substance in count
  species DC_IFFL1 in cell11 = 50/cell11;  // substance in count
  species C4_IFFL1 in cell11 = 0;  // substance in count
  species C5_IFFL1 in cell11 = 0;  // substance in count
  species C6_IFFL1 in cell11 = 0;  // substance in count
  species mC_IFFL1 in cell11 = 0;  // substance in count
  species out_IFFL1 in cell11 = 0;  // substance in count

  // Parameters:
  k1f1 = 1 per_second;
  k1r1 = 1 per_second;
  k2f1 = 1 per_second;
  k3f1 = 1 per_second;
  k3r1 = 1 per_second;
  k4f1 = 1 per_second;
  k5f1 = 1 per_second;
  k5r1 = 1 per_second;
  k6f1 = 1 per_second;
  k7f1 = 1 per_second;
  k7r1 = 1 per_second;
  k8f1 = 1 per_second;
  k1f2 = 1 per_second;
  k1r2 = 1 per_second;
  k2f2 = 1 per_second;
  k3f2 = 1 per_second;
  k3r2 = 1 per_second;
  k4f2 = 1 per_second;
  k5f2 = 1 per_second;
  k5r2 = 1 per_second;
  k6f2 = 1 per_second;
  k7f2 = 1 per_second;
  k7r2 = 1 per_second;
  k8f2 = 1 per_second;
  IFFL_k1f = 1 per_second;
  IFFL_k1r = 1 per_second;
  IFFL_k2f = 1 per_second;
  IFFL_k3f = 1 per_second;
  IFFL_k4f = 1 per_second;
  IFFL_k5f = 1 per_second;
  IFFL_k6f = 1 per_second;
  IFFL_k6r = 1 per_second;
  IFFL_k7f = 1 per_second;
  IFFL_k8f = 1 per_second;
  IFFL_k9f = 1 per_second;
  IFFL_k10f = 1 per_second;
  IFFL_k11f = 1 per_second;
  IFFL_k11r = 1 per_second;
  IFFL_k12f = 1 per_second;
  IFFL_k12r = 1 per_second;
  IFFL_k13f = 1 per_second;
  IFFL_k13r = 1 per_second;
  IFFL_k14f = 1 per_second;
  IFFL_k14r = 1 per_second;
  IFFL_k15f = 1 per_second;
  IFFL_k16f = 1 per_second;
  IFFL_k17f = 1 per_second;
  IFFL_k18f = 1 per_second;
  IFFL_k1f1 = 1 per_second;
  IFFL_k1r1 = 1 per_second;
  IFFL_k2f1 = 1 per_second;
  IFFL_k3f1 = 1 per_second;
  IFFL_k4f1 = 1 per_second;
  IFFL_k5f1 = 1 per_second;
  IFFL_k6f1 = 1 per_second;
  IFFL_k6r1 = 1 per_second;
  IFFL_k7f1 = 1 per_second;
  IFFL_k8f1 = 1 per_second;
  IFFL_k9f1 = 1 per_second;
  IFFL_k10f1 = 1 per_second;
  IFFL_k11f1 = 1 per_second;
  IFFL_k11r1 = 1 per_second;
  IFFL_k12f1 = 1 per_second;
  IFFL_k12r1 = 1 per_second;
  IFFL_k13f1 = 1 per_second;
  IFFL_k13r1 = 1 per_second;
  IFFL_k14f1 = 1 per_second;
  IFFL_k14r1 = 1 per_second;
  IFFL_k15f1 = 1 per_second;
  IFFL_k16f1 = 1 per_second;
  IFFL_k17f1 = 1 per_second;
  IFFL_k18f1 = 1 per_second;

  // Reactions:
  r11: inp_DP1 + X_DP1 -> C1_DP1; k1f1*inp_DP1*X_DP1 - k1r1*C1_DP1;
  r21: C1_DP1 => inp_DP1 + Xp_DP1; k2f1*C1_DP1;
  r31: E_DP1 + Xp_DP1 -> C2_DP1; k3f1*E_DP1*Xp_DP1 - k3r1*C2_DP1;
  r41: C2_DP1 => E_DP1 + X_DP1; k4f1*C2_DP1;
  r51: inp_DP1 + Xp_DP1 -> C3_DP1; k5f1*inp_DP1*Xp_DP1 - k5r1*C3_DP1;
  r61: C3_DP1 => pA_IFFL + inp_DP1; k6f1*C3_DP1;
  r71: E_DP1 + pA_IFFL -> C4_DP1; k7f1*E_DP1*pA_IFFL - k7r1*C4_DP1;
  r81: C4_DP1 => Xp_DP1 + E_DP1; k8f1*C4_DP1;
  r12: inp_DP2 + X_DP2 -> C1_DP2; k1f2*inp_DP2*X_DP2 - k1r2*C1_DP2;
  r22: C1_DP2 => inp_DP2 + Xp_DP2; k2f2*C1_DP2;
  r32: E_DP2 + Xp_DP2 -> C2_DP2; k3f2*E_DP2*Xp_DP2 - k3r2*C2_DP2;
  r42: C2_DP2 => E_DP2 + X_DP2; k4f2*C2_DP2;
  r52: inp_DP2 + Xp_DP2 -> C3_DP2; k5f2*inp_DP2*Xp_DP2 - k5r2*C3_DP2;
  r62: C3_DP2 => pA_IFFL1 + inp_DP2; k6f2*C3_DP2;
  r72: E_DP2 + pA_IFFL1 -> C4_DP2; k7f2*E_DP2*pA_IFFL1 - k7r2*C4_DP2;
  r82: C4_DP2 => Xp_DP2 + E_DP2; k8f2*C4_DP2;
  IFFL_r1: inp_IFFL + DA_IFFL -> C1_IFFL; IFFL_k1f*inp_IFFL*DA_IFFL - IFFL_k1r*C1_IFFL;
  IFFL_r2: C1_IFFL => C1_IFFL + mA_IFFL; IFFL_k2f*C1_IFFL;
  IFFL_r3: mA_IFFL => mA_IFFL + pA_IFFL; IFFL_k3f*mA_IFFL;
  IFFL_r4: mA_IFFL => ; IFFL_k4f*mA_IFFL;
  IFFL_r5: pA_IFFL => ; IFFL_k5f*pA_IFFL;
  IFFL_r6: pA_IFFL + DB_IFFL -> C2_IFFL; IFFL_k6f*pA_IFFL*DB_IFFL - IFFL_k6r*C2_IFFL;
  IFFL_r7: C2_IFFL => C2_IFFL + mB_IFFL; IFFL_k7f*C2_IFFL;
  IFFL_r8: mB_IFFL => mB_IFFL + pB_IFFL; IFFL_k8f*mB_IFFL;
  IFFL_r9: mB_IFFL => ; IFFL_k9f*mB_IFFL;
  IFFL_r10: pB_IFFL => ; IFFL_k10f*pB_IFFL;
  IFFL_r11: pB_IFFL + DC_IFFL -> C3_IFFL; IFFL_k11f*pB_IFFL*DC_IFFL - IFFL_k11r*C3_IFFL;
  IFFL_r12: pA_IFFL + DC_IFFL -> C4_IFFL; IFFL_k12f*pA_IFFL*DC_IFFL - IFFL_k12r*C4_IFFL;
  IFFL_r13: pA_IFFL + C3_IFFL -> C5_IFFL; IFFL_k13f*pA_IFFL*C3_IFFL - IFFL_k13r*C5_IFFL;
  IFFL_r14: pB_IFFL + C4_IFFL -> C6_IFFL; IFFL_k14f*pB_IFFL*C4_IFFL - IFFL_k14r*C6_IFFL;
  IFFL_r15: C4_IFFL => C4_IFFL + mC_IFFL; IFFL_k15f*C4_IFFL;
  IFFL_r16: mC_IFFL => mC_IFFL + out_IFFL; IFFL_k16f*mC_IFFL;
  IFFL_r17: mC_IFFL => ; IFFL_k17f*mC_IFFL;
  IFFL_r18: out_IFFL => ; IFFL_k18f*out_IFFL;
  IFFL_r111: inp_IFFL1 + DA_IFFL1 -> C1_IFFL1; IFFL_k1f1*inp_IFFL1*DA_IFFL1 - IFFL_k1r1*C1_IFFL1;
  IFFL_r21: C1_IFFL1 => C1_IFFL1 + mA_IFFL1; IFFL_k2f1*C1_IFFL1;
  IFFL_r31: mA_IFFL1 => mA_IFFL1 + pA_IFFL1; IFFL_k3f1*mA_IFFL1;
  IFFL_r41: mA_IFFL1 => ; IFFL_k4f1*mA_IFFL1;
  IFFL_r51: pA_IFFL1 => ; IFFL_k5f1*pA_IFFL1;
  IFFL_r61: pA_IFFL1 + DB_IFFL1 -> C2_IFFL1; IFFL_k6f1*pA_IFFL1*DB_IFFL1 - IFFL_k6r1*C2_IFFL1;
  IFFL_r71: C2_IFFL1 => C2_IFFL1 + mB_IFFL1; IFFL_k7f1*C2_IFFL1;
  IFFL_r81: mB_IFFL1 => mB_IFFL1 + pB_IFFL1; IFFL_k8f1*mB_IFFL1;
  IFFL_r91: mB_IFFL1 => ; IFFL_k9f1*mB_IFFL1;
  IFFL_r101: pB_IFFL1 => ; IFFL_k10f1*pB_IFFL1;
  IFFL_r121: pA_IFFL1 + DC_IFFL1 -> C4_IFFL1; IFFL_k12f1*pA_IFFL1*DC_IFFL1 - IFFL_k12r1*C4_IFFL1;
  IFFL_r131: pA_IFFL1 + C3_IFFL1 -> C5_IFFL1; IFFL_k13f1*pA_IFFL1*C3_IFFL1 - IFFL_k13r1*C5_IFFL1;
  IFFL_r141: pB_IFFL1 + C4_IFFL1 -> C6_IFFL1; IFFL_k14f1*pB_IFFL1*C4_IFFL1 - IFFL_k14r1*C6_IFFL1;
  IFFL_r151: C4_IFFL1 => C4_IFFL1 + mC_IFFL1; IFFL_k15f1*C4_IFFL1;
  IFFL_r161: mC_IFFL1 => mC_IFFL1 + out_IFFL1; IFFL_k16f1*mC_IFFL1;
  IFFL_r171: mC_IFFL1 => ; IFFL_k17f1*mC_IFFL1;
  IFFL_r181: out_IFFL1 => ; IFFL_k18f1*out_IFFL1;
end
