// SBML level 3 version 1

model EnzymaticRxnModel()
  // model units - substance: count, time: seconds, extent: mole

  // Compartments:
  compartment cell = 1 litre;
  compartment cell1 = 1 litre;

  // Species:
  species inp_DP in cell = 50/cell;
  species X_DP in cell = 50/cell;
  species C1_DP in cell = 0;
  species Xp_DP in cell = 0;
  species E_DP in cell = 50/cell;
  species C2_DP in cell = 0;
  species C3_DP in cell = 0;
  species out_DP in cell = 0;
  species C4_DP in cell = 0;

  // Parameters:
  k1f = 1 per_second;
  k1r = 1 per_second;
  k2f = 1 per_second;
  k3f = 1 per_second;
  k3r = 1 per_second;
  k4f = 1 per_second;
  k5f = 1 per_second;
  k5r = 1 per_second;
  k6f = 1 per_second;
  k7f = 1 per_second;
  k7r = 1 per_second;
  k8f = 1 per_second;

  // Reactions:
  r1: inp_DP + X_DP -> C1_DP; k1f*inp_DP*X_DP - k1r*C1_DP;
  r2: C1_DP => inp_DP + Xp_DP; k2f*C1_DP;
  r3: E_DP + Xp_DP -> C2_DP; k3f*E_DP*Xp_DP - k3r*C2_DP;
  r4: C2_DP => E_DP + X_DP; k4f*C2_DP;
  r5: inp_DP + Xp_DP -> C3_DP; k5f*inp_DP*Xp_DP - k5r*C3_DP;
  r6: C3_DP => out_DP + inp_DP; k6f*C3_DP;
  r7: E_DP + out_DP -> C4_DP; k7f*E_DP*out_DP - k7r*C4_DP;
  r8: C4_DP => Xp_DP + E_DP; k8f*C4_DP;

  // Unit definitions:
  unit per_second = 1 / second;
end
