// SBML level 3 version 1

model EnzymaticRxnModel_IFFL()
  // model units - substance: count, time: seconds, extent: mole

  // Compartments:
  compartment cell = 1 litre;
  compartment cell1_IFFL = 1 litre;

  // Species:
  species inp_IFFL_IFFL in cell = 50/cell;
  species DA_IFFL_IFFL in cell = 50/cell;
  species C1_IFFL_IFFL in cell = 0;
  species mA_IFFL_IFFL in cell = 0;
  species pA_IFFL_IFFL in cell = 0;
  species C2_IFFL_IFFL in cell = 0;
  species DB_IFFL_IFFL in cell = 50/cell;
  species mB_IFFL_IFFL in cell = 0;
  species pB_IFFL_IFFL in cell = 0;
  species C3_IFFL_IFFL in cell = 0;
  species DC_IFFL_IFFL in cell = 50/cell;
  species C4_IFFL_IFFL in cell = 0;
  species C5_IFFL_IFFL in cell = 0;
  species C6_IFFL_IFFL in cell = 0;
  species mC_IFFL_IFFL in cell = 0;
  species out_IFFL_IFFL in cell = 0;

  // Parameters:
  IFFL_k1f_IFFL = 1 per_second;
  IFFL_k1r_IFFL = 1 per_second;
  IFFL_k2f_IFFL = 1 per_second;
  IFFL_k3f_IFFL = 1 per_second;
  IFFL_k4f_IFFL = 1 per_second;
  IFFL_k5f_IFFL = 1 per_second;
  IFFL_k6f_IFFL = 1 per_second;
  IFFL_k6r_IFFL = 1 per_second;
  IFFL_k7f_IFFL = 1 per_second;
  IFFL_k8f_IFFL = 1 per_second;
  IFFL_k9f_IFFL = 1 per_second;
  IFFL_k10f_IFFL = 1 per_second;
  IFFL_k11f_IFFL = 1 per_second;
  IFFL_k11r_IFFL = 1 per_second;
  IFFL_k12f_IFFL = 1 per_second;
  IFFL_k12r_IFFL = 1 per_second;
  IFFL_k13f_IFFL = 1 per_second;
  IFFL_k13r_IFFL = 1 per_second;
  IFFL_k14f_IFFL = 1 per_second;
  IFFL_k14r_IFFL = 1 per_second;
  IFFL_k15f_IFFL = 1 per_second;
  IFFL_k16f_IFFL = 1 per_second;
  IFFL_k17f_IFFL = 1 per_second;
  IFFL_k18f_IFFL = 1 per_second;

  // Reactions:
  IFFL_r1_IFFL: inp_IFFL_IFFL + DA_IFFL_IFFL -> C1_IFFL_IFFL; IFFL_k1f_IFFL*inp_IFFL_IFFL*DA_IFFL_IFFL - IFFL_k1r_IFFL*C1_IFFL_IFFL;
  IFFL_r2_IFFL: C1_IFFL_IFFL => C1_IFFL_IFFL + mA_IFFL_IFFL; IFFL_k2f_IFFL*C1_IFFL_IFFL;
  IFFL_r3_IFFL: mA_IFFL_IFFL => mA_IFFL_IFFL + pA_IFFL_IFFL; IFFL_k3f_IFFL*mA_IFFL_IFFL;
  IFFL_r4_IFFL: mA_IFFL_IFFL => ; IFFL_k4f_IFFL*mA_IFFL_IFFL;
  IFFL_r5_IFFL: pA_IFFL_IFFL => ; IFFL_k5f_IFFL*pA_IFFL_IFFL;
  IFFL_r6_IFFL: pA_IFFL_IFFL + DB_IFFL_IFFL -> C2_IFFL_IFFL; IFFL_k6f_IFFL*pA_IFFL_IFFL*DB_IFFL_IFFL - IFFL_k6r_IFFL*C2_IFFL_IFFL;
  IFFL_r7_IFFL: C2_IFFL_IFFL => C2_IFFL_IFFL + mB_IFFL_IFFL; IFFL_k7f_IFFL*C2_IFFL_IFFL;
  IFFL_r8_IFFL: mB_IFFL_IFFL => mB_IFFL_IFFL + pB_IFFL_IFFL; IFFL_k8f_IFFL*mB_IFFL_IFFL;
  IFFL_r9_IFFL: mB_IFFL_IFFL => ; IFFL_k9f_IFFL*mB_IFFL_IFFL;
  IFFL_r10_IFFL: pB_IFFL_IFFL => ; IFFL_k10f_IFFL*pB_IFFL_IFFL;
  IFFL_r11_IFFL: pB_IFFL_IFFL + DC_IFFL_IFFL -> C3_IFFL_IFFL; IFFL_k11f_IFFL*pB_IFFL_IFFL*DC_IFFL_IFFL - IFFL_k11r_IFFL*C3_IFFL_IFFL;
  IFFL_r12_IFFL: pA_IFFL_IFFL + DC_IFFL_IFFL -> C4_IFFL_IFFL; IFFL_k12f_IFFL*pA_IFFL_IFFL*DC_IFFL_IFFL - IFFL_k12r_IFFL*C4_IFFL_IFFL;
  IFFL_r13_IFFL: pA_IFFL_IFFL + C3_IFFL_IFFL -> C5_IFFL_IFFL; IFFL_k13f_IFFL*pA_IFFL_IFFL*C3_IFFL_IFFL - IFFL_k13r_IFFL*C5_IFFL_IFFL;
  IFFL_r14_IFFL: pB_IFFL_IFFL + C4_IFFL_IFFL -> C6_IFFL_IFFL; IFFL_k14f_IFFL*pB_IFFL_IFFL*C4_IFFL_IFFL - IFFL_k14r_IFFL*C6_IFFL_IFFL;
  IFFL_r15_IFFL: C4_IFFL_IFFL => C4_IFFL_IFFL + mC_IFFL_IFFL; IFFL_k15f_IFFL*C4_IFFL_IFFL;
  IFFL_r16_IFFL: mC_IFFL_IFFL => mC_IFFL_IFFL + out_IFFL_IFFL; IFFL_k16f_IFFL*mC_IFFL_IFFL;
  IFFL_r17_IFFL: mC_IFFL_IFFL => ; IFFL_k17f_IFFL*mC_IFFL_IFFL;
  IFFL_r18_IFFL: out_IFFL_IFFL => ; IFFL_k18f_IFFL*out_IFFL_IFFL;

  // Unit definitions:
  unit per_second = 1 / second;
end
