// SBML level 3 version 1

model EnzymaticRxnModel1()
  // model units - substance: count, time: seconds, extent: mole

  // Compartments:
  compartment cell11 = 1 litre;
  compartment cell1 = 1 litre; cell1 is "cell11";

  // Species:
  species inp_IFFL1 in cell11 = 50/cell11;
  species DA_IFFL1 in cell11 = 50/cell11;
  species C1_IFFL1 in cell11 = 0;
  species mA_IFFL1 in cell11 = 0;
  species pA_IFFL1 in cell11 = 0;
  species C2_IFFL1 in cell11 = 0;
  species DB_IFFL1 in cell11 = 50/cell11;
  species mB_IFFL1 in cell11 = 0;
  species pB_IFFL1 in cell11 = 0;
  species C3_IFFL1 in cell11 = 0;
  species DC_IFFL1 in cell11 = 50/cell11;
  species C4_IFFL1 in cell11 = 0;
  species C5_IFFL1 in cell11 = 0;
  species C6_IFFL1 in cell11 = 0;
  species mC_IFFL1 in cell11 = 0;
  species out_IFFL1 in cell11 = 0;

  // Parameters:
  IFFL_k1f1 = 1 per_second;
  IFFL_k1r1 = 1 per_second;
  IFFL_k2f1 = 1 per_second;
  IFFL_k3f1 = 1 per_second;
  IFFL_k4f1 = 1 per_second;
  IFFL_k5f1 = 1 per_second;
  IFFL_k6f1 = 1 per_second;
  IFFL_k6r1 = 1 per_second;
  IFFL_k7f1 = 1 per_second;
  IFFL_k8f1 = 1 per_second;
  IFFL_k9f1 = 1 per_second;
  IFFL_k10f1 = 1 per_second;
  IFFL_k11f1 = 1 per_second;
  IFFL_k11r1 = 1 per_second;
  IFFL_k12f1 = 1 per_second;
  IFFL_k12r1 = 1 per_second;
  IFFL_k13f1 = 1 per_second;
  IFFL_k13r1 = 1 per_second;
  IFFL_k14f1 = 1 per_second;
  IFFL_k14r1 = 1 per_second;
  IFFL_k15f1 = 1 per_second;
  IFFL_k16f1 = 1 per_second;
  IFFL_k17f1 = 1 per_second;
  IFFL_k18f1 = 1 per_second;

  // Reactions:
  IFFL_r111: inp_IFFL1 + DA_IFFL1 -> C1_IFFL1; IFFL_k1f1*inp_IFFL1*DA_IFFL1 - IFFL_k1r1*C1_IFFL1;
  IFFL_r21: C1_IFFL1 => C1_IFFL1 + mA_IFFL1; IFFL_k2f1*C1_IFFL1;
  IFFL_r31: mA_IFFL1 => mA_IFFL1 + pA_IFFL1; IFFL_k3f1*mA_IFFL1;
  IFFL_r41: mA_IFFL1 => ; IFFL_k4f1*mA_IFFL1;
  IFFL_r51: pA_IFFL1 => ; IFFL_k5f1*pA_IFFL1;
  IFFL_r61: pA_IFFL1 + DB_IFFL1 -> C2_IFFL1; IFFL_k6f1*pA_IFFL1*DB_IFFL1 - IFFL_k6r1*C2_IFFL1;
  IFFL_r71: C2_IFFL1 => C2_IFFL1 + mB_IFFL1; IFFL_k7f1*C2_IFFL1;
  IFFL_r81: mB_IFFL1 => mB_IFFL1 + pB_IFFL1; IFFL_k8f1*mB_IFFL1;
  IFFL_r91: mB_IFFL1 => ; IFFL_k9f1*mB_IFFL1;
  IFFL_r101: pB_IFFL1 => ; IFFL_k10f1*pB_IFFL1;
  IFFL_r11: pB_IFFL1 + DC_IFFL1 -> C3_IFFL1; IFFL_k11f1*pB_IFFL1*DC_IFFL1 - IFFL_k11r1*C3_IFFL1;
  IFFL_r121: pA_IFFL1 + DC_IFFL1 -> C4_IFFL1; IFFL_k12f1*pA_IFFL1*DC_IFFL1 - IFFL_k12r1*C4_IFFL1;
  IFFL_r131: pA_IFFL1 + C3_IFFL1 -> C5_IFFL1; IFFL_k13f1*pA_IFFL1*C3_IFFL1 - IFFL_k13r1*C5_IFFL1;
  IFFL_r141: pB_IFFL1 + C4_IFFL1 -> C6_IFFL1; IFFL_k14f1*pB_IFFL1*C4_IFFL1 - IFFL_k14r1*C6_IFFL1;
  IFFL_r151: C4_IFFL1 => C4_IFFL1 + mC_IFFL1; IFFL_k15f1*C4_IFFL1;
  IFFL_r161: mC_IFFL1 => mC_IFFL1 + out_IFFL1; IFFL_k16f1*mC_IFFL1;
  IFFL_r171: mC_IFFL1 => ; IFFL_k17f1*mC_IFFL1;
  IFFL_r181: out_IFFL1 => ; IFFL_k18f1*out_IFFL1;

  // Unit definitions:
  unit per_second = 1 / second;
end
