// SBML level 3 version 1

model EnzymaticRxnModel()
  // model units - substance: count, time: second, extent: mole

  // Compartments:
  compartment cell = 1 litre;
  compartment cell1 = 1 litre;

  // Species:
  species inp_IFFL in cell1 = 50/cell1;
  species DA_IFFL in cell = 50/cell;
  species C1_IFFL in cell = 0;
  species mA_IFFL in cell = 0;
  species pA_IFFL in cell = 0;
  species C2_IFFL in cell = 0;
  species DB_IFFL in cell = 50/cell;
  species mB_IFFL in cell = 0;
  species pB_IFFL in cell = 0;
  species C3_IFFL in cell1 = 0;
  species DC_IFFL in cell = 50/cell;
  species C4_IFFL in cell = 0;
  species C5_IFFL in cell = 0;
  species C6_IFFL in cell = 0;
  species mC_IFFL in cell = 0;
  species out_IFFL in cell = 0;

  // Parameters:
  k1f = 1 per_second;
  k1r = 1 per_second;
  k2f = 1 per_second;
  k3f = 1 per_second;
  k4f = 1 per_second;
  k5f = 1 per_second;
  k6f = 1 per_second;
  k6r = 1 per_second;
  k7f = 1 per_second;
  k8f = 1 per_second;
  k9f = 1 per_second;
  k10f = 1 per_second;
  k11f = 1 per_second;
  k11r = 1 per_second;
  k12f = 1 per_second;
  k12r = 1 per_second;
  k13f = 1 per_second;
  k13r = 1 per_second;
  k14f = 1 per_second;
  k14r = 1 per_second;
  k15f = 1 per_second;
  k16f = 1 per_second;
  k17f = 1 per_second;
  k18f = 1 per_second;

  // Reactions:
  r1: inp_IFFL + DA_IFFL -> C1_IFFL; k1f*inp_IFFL*DA_IFFL - k1r*C1_IFFL;
  r2: C1_IFFL => C1_IFFL + mA_IFFL; k2f*C1_IFFL;
  r3: mA_IFFL => mA_IFFL + pA_IFFL; k3f*mA_IFFL;
  r4: mA_IFFL => ; k4f*mA_IFFL;
  r5: pA_IFFL => ; k5f*pA_IFFL;
  r6: pA_IFFL + DB_IFFL -> C2_IFFL; k6f*pA_IFFL*DB_IFFL - k6r*C2_IFFL;
  r7: C2_IFFL => C2_IFFL + mB_IFFL; k7f*C2_IFFL;
  r8: mB_IFFL => mB_IFFL + pB_IFFL; k8f*mB_IFFL;
  r9: mB_IFFL => ; k9f*mB_IFFL;
  r10: pB_IFFL => ; k10f*pB_IFFL;
  r11: pB_IFFL + DC_IFFL -> C3_IFFL; k11f*pB_IFFL*DC_IFFL - k11r*C3_IFFL;
  r12: pA_IFFL + DC_IFFL -> C4_IFFL; k12f*pA_IFFL*DC_IFFL - k12r*C4_IFFL;
  r13: pA_IFFL + C3_IFFL -> C5_IFFL; k13f*pA_IFFL*C3_IFFL - k13r*C5_IFFL;
  r14: pB_IFFL + C4_IFFL -> C6_IFFL; k14f*pB_IFFL*C4_IFFL - k14r*C6_IFFL;
  r15: C4_IFFL => C4_IFFL + mC_IFFL; k15f*C4_IFFL;
  r16: mC_IFFL => mC_IFFL + out_IFFL; k16f*mC_IFFL;
  r17: mC_IFFL => ; k17f*mC_IFFL;
  r18: out_IFFL => ; k18f*out_IFFL;

  // Unit definitions:
  unit per_second = 1 / second;
end
