// SBML level 3 version 1

model EnzymaticRxnModel()
  // model units - substance: count, time: seconds, extent: mole

  // Compartments:
  compartment cell = 1 litre;
  compartment cell1 = 1 litre;

  // Species:
  species inp_DP1 in cell = 50/cell;
  species X_DP1 in cell = 50/cell;
  species C1_DP1 in cell = 0;
  species Xp_DP1 in cell = 0;
  species E_DP1 in cell = 50/cell;
  species C2_DP1 in cell = 0;
  species C3_DP1 in cell = 0;
  species out_DP1 in cell = 0;
  species C4_DP1 in cell = 0;

  // Parameters:
  k1f = 1 per_second;
  k1r = 1 per_second;
  k2f = 1 per_second;
  k3f = 1 per_second;
  k3r = 1 per_second;
  k4f = 1 per_second;
  k5f = 1 per_second;
  k5r = 1 per_second;
  k6f = 1 per_second;
  k7f = 1 per_second;
  k7r = 1 per_second;
  k8f = 1 per_second;

  // Reactions:
  r1: inp_DP1 + X_DP1 -> C1_DP1; k1f*inp_DP1*X_DP1 - k1r*C1_DP1;
  r2: C1_DP1 => inp_DP1 + Xp_DP1; k2f*C1_DP1;
  r3: E_DP1 + Xp_DP1 -> C2_DP1; k3f*E_DP1*Xp_DP1 - k3r*C2_DP1;
  r4: C2_DP1 => E_DP1 + X_DP1; k4f*C2_DP1;
  r5: inp_DP1 + Xp_DP1 -> C3_DP1; k5f*inp_DP1*Xp_DP1 - k5r*C3_DP1;
  r6: C3_DP1 => out_DP1 + inp_DP1; k6f*C3_DP1;
  r7: E_DP1 + out_DP1 -> C4_DP1; k7f*E_DP1*out_DP1 - k7r*C4_DP1;
  r8: C4_DP1 => Xp_DP1 + E_DP1; k8f*C4_DP1;

  // Unit definitions:
  unit per_second = 1 / second;
end
