// SBML level 3 version 1

model EnzymaticRxnModel()
  // model units - substance: count, time: seconds, extent: mole

  // Compartments:
  compartment cell = 1 litre;
  compartment cell1 = 1 litre;

  // Species:
  species inp_DP2 in cell = 50/cell;
  species X_DP2 in cell = 50/cell;
  species C1_DP2 in cell = 0;
  species Xp_DP2 in cell = 0;
  species E_DP2 in cell = 50/cell;
  species C2_DP2 in cell = 0;
  species C3_DP2 in cell = 0;
  species out_DP2 in cell = 0;
  species C4_DP2 in cell = 0;

  // Parameters:
  DP2_k1f = 1 per_second;
  DP2_k1r = 1 per_second;
  DP2_k2f = 1 per_second;
  DP2_k3f = 1 per_second;
  DP2_k3r = 1 per_second;
  DP2_k4f = 1 per_second;
  DP2_k5f = 1 per_second;
  DP2_k5r = 1 per_second;
  DP2_k6f = 1 per_second;
  DP2_k7f = 1 per_second;
  DP2_k7r = 1 per_second;
  DP2_k8f = 1 per_second;

  // Reactions:
  DP2_r1: inp_DP2 + X_DP2 -> C1_DP2; DP2_k1f*inp_DP2*X_DP2 - DP2_k1r*C1_DP2;
  DP2_r2: C1_DP2 => inp_DP2 + Xp_DP2; DP2_k2f*C1_DP2;
  DP2_r3: E_DP2 + Xp_DP2 -> C2_DP2; DP2_k3f*E_DP2*Xp_DP2 - DP2_k3r*C2_DP2;
  DP2_r4: C2_DP2 => E_DP2 + X_DP2; DP2_k4f*C2_DP2;
  DP2_r5: inp_DP2 + Xp_DP2 -> C3_DP2; DP2_k5f*inp_DP2*Xp_DP2 - DP2_k5r*C3_DP2;
  DP2_r6: C3_DP2 => out_DP2 + inp_DP2; DP2_k6f*C3_DP2;
  DP2_r7: E_DP2 + out_DP2 -> C4_DP2; DP2_k7f*E_DP2*out_DP2 - DP2_k7r*C4_DP2;
  DP2_r8: C4_DP2 => Xp_DP2 + E_DP2; DP2_k8f*C4_DP2;

  // Unit definitions:
  unit per_second = 1 / second;
end
