// SBML level 3 version 1

model main()

  // Species:
  species inp_DP1 in cell = 50/cell;  // substance in count
  species X_DP1 in cell = 50/cell;  // substance in count
  species C1_DP1 in cell = 0;  // substance in count
  species Xp_DP1 in cell = 0;  // substance in count
  species E_DP1 in cell = 50/cell;  // substance in count
  species C2_DP1 in cell = 0;  // substance in count
  species C3_DP1 in cell = 0;  // substance in count
  species out_DP1 in cell = 0;  // substance in count
  species C4_DP1 in cell = 0;  // substance in count
  species inp_DP2 in cell = 50/cell;  // substance in count
  species X_DP2 in cell = 50/cell;  // substance in count
  species C1_DP2 in cell = 0;  // substance in count
  species Xp_DP2 in cell = 0;  // substance in count
  species E_DP2 in cell = 50/cell;  // substance in count
  species C2_DP2 in cell = 0;  // substance in count
  species C3_DP2 in cell = 0;  // substance in count
  species out_DP2 in cell = 0;  // substance in count
  species C4_DP2 in cell = 0;  // substance in count
  species inp_IFFL in cell = 50/cell;  // substance in count
  species DA_IFFL in cell = 50/cell;  // substance in count
  species C1_IFFL in cell = 0;  // substance in count
  species mA_IFFL in cell = 0;  // substance in count
  species pA_IFFL in cell = 0;  // substance in count
  species C2_IFFL in cell = 0;  // substance in count
  species DB_IFFL in cell = 50/cell;  // substance in count
  species mB_IFFL in cell = 0;  // substance in count
  species pB_IFFL in cell = 0;  // substance in count
  species C3_IFFL in cell = 0;  // substance in count
  species DC_IFFL in cell = 50/cell;  // substance in count
  species C4_IFFL in cell = 0;  // substance in count
  species C5_IFFL in cell = 0;  // substance in count
  species C6_IFFL in cell = 0;  // substance in count
  species mC_IFFL in cell = 0;  // substance in count
  species out_IFFL in cell = 0;  // substance in count
  species out_DP1pA_IFFL in cell = 0;  // substance in count
  species out_DP2pB_IFFL in cell = 0;  // substance in count

  // Reactions:
  r1: inp_DP1 + X_DP1 -> C1_DP1; k1f*inp_DP1*X_DP1 - k1r*C1_DP1;
  r2: C1_DP1 => inp_DP1 + Xp_DP1; k2f*C1_DP1;
  r3: E_DP1 + Xp_DP1 -> C2_DP1; k3f*E_DP1*Xp_DP1 - k3r*C2_DP1;
  r4: C2_DP1 => E_DP1 + X_DP1; k4f*C2_DP1;
  r5: inp_DP1 + Xp_DP1 -> C3_DP1; k5f*inp_DP1*Xp_DP1 - k5r*C3_DP1;
  r6: C3_DP1 => out_DP1 + inp_DP1; k6f*C3_DP1;
  r7: E_DP1 + out_DP1 -> C4_DP1; k7f*E_DP1*out_DP1 - k7r*C4_DP1;
  r8: C4_DP1 => Xp_DP1 + E_DP1; k8f*C4_DP1;
  r9: mB_IFFL => ; k9f*mB_IFFL;
  r10: pB_IFFL => ; k10f*pB_IFFL;
  r11: pB_IFFL + DC_IFFL -> C3_IFFL; k11f*pB_IFFL*DC_IFFL - k11r*C3_IFFL;
  r12: pA_IFFL + DC_IFFL -> C4_IFFL; k12f*pA_IFFL*DC_IFFL - k12r*C4_IFFL;
  r13: pA_IFFL + C3_IFFL -> C5_IFFL; k13f*pA_IFFL*C3_IFFL - k13r*C5_IFFL;
  r14: pB_IFFL + C4_IFFL -> C6_IFFL; k14f*pB_IFFL*C4_IFFL - k14r*C6_IFFL;
  r15: C4_IFFL => C4_IFFL + mC_IFFL; k15f*C4_IFFL;
  r16: mC_IFFL => mC_IFFL + out_IFFL; k16f*mC_IFFL;
  r17: mC_IFFL => ; k17f*mC_IFFL;
  r18: out_IFFL => ; k18f*out_IFFL;
end
