// SBML level 3 version 1

model EnzymaticRxnModel()
  // model units - substance: count, time: seconds, extent: mole

  // Compartments:
  compartment cell = 1 litre;
  compartment cell1 = 1 litre;

  // Species:
  species inp_IFFL in cell = 50/cell;
  species DA_IFFL in cell = 50/cell;
  species C1_IFFL in cell = 0;
  species mA_IFFL in cell = 0;
  species pA_IFFL in cell = 0;
  species C2_IFFL in cell = 0;
  species DB_IFFL in cell = 50/cell;
  species mB_IFFL in cell = 0;
  species pB_IFFL in cell = 0;
  species C3_IFFL in cell = 0;
  species DC_IFFL in cell = 50/cell;
  species C4_IFFL in cell = 0;
  species C5_IFFL in cell = 0;
  species C6_IFFL in cell = 0;
  species mC_IFFL in cell = 0;
  species out_IFFL in cell = 0;

  // Parameters:
  IFFL_k1f = 1 per_second;
  IFFL_k1r = 1 per_second;
  IFFL_k2f = 1 per_second;
  IFFL_k3f = 1 per_second;
  IFFL_k4f = 1 per_second;
  IFFL_k5f = 1 per_second;
  IFFL_k6f = 1 per_second;
  IFFL_k6r = 1 per_second;
  IFFL_k7f = 1 per_second;
  IFFL_k8f = 1 per_second;
  IFFL_k9f = 1 per_second;
  IFFL_k10f = 1 per_second;
  IFFL_k11f = 1 per_second;
  IFFL_k11r = 1 per_second;
  IFFL_k12f = 1 per_second;
  IFFL_k12r = 1 per_second;
  IFFL_k13f = 1 per_second;
  IFFL_k13r = 1 per_second;
  IFFL_k14f = 1 per_second;
  IFFL_k14r = 1 per_second;
  IFFL_k15f = 1 per_second;
  IFFL_k16f = 1 per_second;
  IFFL_k17f = 1 per_second;
  IFFL_k18f = 1 per_second;

  // Reactions:
  IFFL_r1: inp_IFFL + DA_IFFL -> C1_IFFL; IFFL_k1f*inp_IFFL*DA_IFFL - IFFL_k1r*C1_IFFL;
  IFFL_r2: C1_IFFL => C1_IFFL + mA_IFFL; IFFL_k2f*C1_IFFL;
  IFFL_r3: mA_IFFL => mA_IFFL + pA_IFFL; IFFL_k3f*mA_IFFL;
  IFFL_r4: mA_IFFL => ; IFFL_k4f*mA_IFFL;
  IFFL_r5: pA_IFFL => ; IFFL_k5f*pA_IFFL;
  IFFL_r6: pA_IFFL + DB_IFFL -> C2_IFFL; IFFL_k6f*pA_IFFL*DB_IFFL - IFFL_k6r*C2_IFFL;
  IFFL_r7: C2_IFFL => C2_IFFL + mB_IFFL; IFFL_k7f*C2_IFFL;
  IFFL_r8: mB_IFFL => mB_IFFL + pB_IFFL; IFFL_k8f*mB_IFFL;
  IFFL_r9: mB_IFFL => ; IFFL_k9f*mB_IFFL;
  IFFL_r10: pB_IFFL => ; IFFL_k10f*pB_IFFL;
  IFFL_r11: pB_IFFL + DC_IFFL -> C3_IFFL; IFFL_k11f*pB_IFFL*DC_IFFL - IFFL_k11r*C3_IFFL;
  IFFL_r12: pA_IFFL + DC_IFFL -> C4_IFFL; IFFL_k12f*pA_IFFL*DC_IFFL - IFFL_k12r*C4_IFFL;
  IFFL_r13: pA_IFFL + C3_IFFL -> C5_IFFL; IFFL_k13f*pA_IFFL*C3_IFFL - IFFL_k13r*C5_IFFL;
  IFFL_r14: pB_IFFL + C4_IFFL -> C6_IFFL; IFFL_k14f*pB_IFFL*C4_IFFL - IFFL_k14r*C6_IFFL;
  IFFL_r15: C4_IFFL => C4_IFFL + mC_IFFL; IFFL_k15f*C4_IFFL;
  IFFL_r16: mC_IFFL => mC_IFFL + out_IFFL; IFFL_k16f*mC_IFFL;
  IFFL_r17: mC_IFFL => ; IFFL_k17f*mC_IFFL;
  IFFL_r18: out_IFFL => ; IFFL_k18f*out_IFFL;

  // Unit definitions:
  unit per_second = 1 / second;
end
